# OpenSim document version 30000
ForceSet test:
  defaults:
    CoordinateActuator default: optimal_force=300
    PointActuator default: point=(0 0 0) point_is_global=false direction=(-1 0 0) force_is_global=true
        optimal_force=1000
    TorqueActuator default: torque_is_global=true axis=(-1 0 0) optimal_force=300
  PointActuator FX: body=pelvis point=(-0.0724376 0 0) point_is_global=false direction=(1 0 0) force_is_global=true
      optimal_force=4
  PointActuator FY: body=pelvis point=(-0.0724376 0 0) point_is_global=false direction=(0 1 0) force_is_global=true
      optimal_force=8
  PointActuator FZ: body=pelvis point=(-0.0724376 0 0) point_is_global=false direction=(0 0 1) force_is_global=true
      optimal_force=4
  TorqueActuator MX: bodyA=pelvis bodyB=ground torque_is_global=true axis=(1 0 0) optimal_force=2
  TorqueActuator MY: bodyA=pelvis bodyB=ground torque_is_global=true axis=(0 1 0) optimal_force=2
  TorqueActuator MZ: bodyA=pelvis bodyB=ground torque_is_global=true axis=(0 0 1) optimal_force=2
  CoordinateActuator back_tilt_reserve: coordinate=back_tilt optimal_force=1
  CoordinateActuator back_list_reserve: coordinate=back_list optimal_force=1
  CoordinateActuator back_rotation_reserve: coordinate=back_rotation optimal_force=1
  CoordinateActuator elv_angle_reserve: coordinate=elv_angle optimal_force=1
  CoordinateActuator shoulder_elv_reserve: coordinate=shoulder_elv optimal_force=1
  CoordinateActuator shoulder_rot_reserve: coordinate=shoulder_rot optimal_force=1
  CoordinateActuator elbow_flexion_reserve: coordinate=elbow_flexion optimal_force=1
  CoordinateActuator pro_sup_reserve: coordinate=pro_sup optimal_force=1
  CoordinateActuator deviation_reserve: coordinate=deviation optimal_force=1
  CoordinateActuator flexion_reserve: coordinate=flexion optimal_force=1
  CoordinateActuator cmc_flexion_reserve: coordinate=cmc_flexion optimal_force=1
  CoordinateActuator cmc_abduction_reserve: coordinate=cmc_abduction optimal_force=1
  CoordinateActuator mp_flexion_reserve: coordinate=mp_flexion optimal_force=1
  CoordinateActuator ip_flexion_reserve: coordinate=ip_flexion optimal_force=1
  CoordinateActuator 2mcp_flexion_reserve: coordinate=2mcp_flexion optimal_force=1
  CoordinateActuator 2mcp_abduction_reserve: coordinate=2mcp_abduction optimal_force=1
  CoordinateActuator 2pm_flexion_reserve: coordinate=2pm_flexion optimal_force=1
  CoordinateActuator 2md_flexion_reserve: coordinate=2md_flexion optimal_force=1
