# OpenSim document version 30000
Model Av2:
  length_units: meters
  force_units: N
  gravity: 0 -9.80665 0
  credits:
    Menegolo Andrea IMPORTANT NOTE: The geometry files included in the ULB_Project.zip file have similar names but different reference frames from the ones included in the OpenSim distribution. Please, include the Geometry directory from this model in the front of your GeometryPath.
  publications:
    Delp, S.L., Loan, J.P., Hoy, M.G., Zajac, F.E., Topp E.L., Rosen, J.M.: An interactive graphics-based model of the lower extremity to study orthopaedic surgical procedures, IEEE Transactions on Biomedical Engineering, vol. 37, pp. 757-767, 1990. Yamaguchi G.T., Zajac F.E.: A planar model of the knee joint to characterize the knee extensor mechanism." J . Biomecl7. vol. 21. pp. 1-10. 1989. Anderson F.C., Pandy M.G.: A dynamic optimization solution for vertical jumping in three dimensions. Computer Methods in Biomechanics and Biomedical Engineering 2:201-231, 1999. Anderson F.C., Pandy M.G.: Dynamic optimization of human walking. Journal of Biomechanical Engineering 123:381-390, 2001. Delp SL, Anderson FC, Arnold AS, Loan P, Habib A, John CT, Guendelman E, Thelen DG (in press). OpenSim: Open-source Software to Create and Analyze Dynamic Simulations of Movement. IEEE Transactions on Biomedical Engineering. (2007) Holzbaur KR, Murray WM, Delp SL.: A model of the upper extremity for simulating musculoskeletal surgery and analyzing neuromuscular control., Ann Biomed Eng. 2005 Jun;33(6):829-40. (2005)
  BodySet:
    Body ground: mass=0 mass_center=(0 0 0) inertia_xx=0 inertia_yy=0 inertia_zz=0 meshes=treadmill.vtp
    Body pelvis: mass=11.777 mass_center=(-0.0731533 0 0) inertia_xx=0.1028 inertia_yy=0.0871 inertia_zz=0.0579
        meshes=(sacrum.vtp pelvis_r.vtp pelvis_l.vtp)
      CustomJoint ground_pelvis: parent_body=ground location_in_parent=(0 0 0) location=(0 0 0)
        Coordinate pelvis_tilt: motion_type=rotational default_value=-1.067537e-8 range=(-1.570796 1.570796)
            clamped=true locked=true
        Coordinate pelvis_list: motion_type=rotational default_value=9.254645e-8 range=(-1.570796 1.570796)
            clamped=true locked=true
        Coordinate pelvis_rotation: motion_type=rotational default_value=0.3839724 range=(-1.570796 1.570796)
            clamped=true locked=true
        Coordinate pelvis_tx: motion_type=translational default_value=-0.052 range=(-5 5) clamped=true
        Coordinate pelvis_ty: motion_type=translational default_value=-0.077 range=(-1 2) clamped=true
        Coordinate pelvis_tz: motion_type=translational default_value=0.525 range=(-3 3) clamped=true
        SpatialTransform:
          TransformAxis rotation1: coordinates=pelvis_tilt axis=(1 0 0) LinearFunction(coefficients=1 0)
          TransformAxis rotation2: coordinates=pelvis_list axis=(0 1 0) LinearFunction(coefficients=1 0)
          TransformAxis rotation3: coordinates=pelvis_rotation axis=(0 0 1) LinearFunction(coefficients=1 0)
          TransformAxis translation1: coordinates=pelvis_tx axis=(1 0 0) LinearFunction(coefficients=1 0)
          TransformAxis translation2: coordinates=pelvis_ty axis=(0 1 0) LinearFunction(coefficients=1 0)
          TransformAxis translation3: coordinates=pelvis_tz axis=(0 0 1) LinearFunction(coefficients=1 0)
    Body thorax: mass=26.03969 mass_center=(0 -0.20958 0) inertia_xx=0.619367 inertia_yy=0.2493769 inertia_zz=0.5593151
        meshes=(thorax.vtp hat_skull.vtp hat_jaw.vtp hat_spine.vtp)
      CustomJoint back: parent_body=pelvis location_in_parent=(-0.1041943 0.08432805 0)
          location=(-0.01900762 -0.3509456 0)
        Coordinate back_tilt: motion_type=rotational default_value=-7.900992e-15 range=(-1.570796 1.570796)
            clamped=true
        Coordinate back_list: motion_type=rotational default_value=-1.478105e-7 range=(-1.570796 1.570796) clamped=true
        Coordinate back_rotation: motion_type=rotational default_value=2.596403e-10 range=(-1.570796 1.570796)
            clamped=true locked=true
        SpatialTransform: axes_held_at_zero=(translation1 translation2 translation3)
          TransformAxis rotation1: coordinates=back_tilt axis=(1 0 0) LinearFunction(coefficients=1 0)
          TransformAxis rotation2: coordinates=back_list axis=(0 1 0) LinearFunction(coefficients=1 0)
          TransformAxis rotation3: coordinates=back_rotation axis=(0 0 1) LinearFunction(coefficients=1 0)
      WrapEllipsoid Thorax: xyz_body_rotation=(0.0434587 -0.331962 0.189892) translation=(-0.03579 -0.118033 0.0657386)
          quadrant=all dimensions=(0.0927202 0.125171 0.0741761)
      WrapEllipsoid Thorax_l: xyz_body_rotation=(-0.0434587 0.331962 0.189892)
          translation=(-0.03579 -0.118033 -0.0657386) quadrant=all dimensions=(0.0927202 0.125171 0.0741761)
    Body femur_r: mass=9.3014 mass_center=(0 -0.17 0) inertia_xx=0.1339 inertia_yy=0.0351 inertia_zz=0.1412
        meshes=femur_r.vtp
      CustomJoint hip_r: parent_body=pelvis location_in_parent=(-0.07315329 -0.06839367 0.08639745) location=(0 0 0)
        Coordinate hip_flexion_r: motion_type=rotational default_value=1.256637 range=(-2.094395 2.094395) clamped=true
            locked=true
        Coordinate hip_adduction_r: motion_type=rotational default_value=0 range=(-2.094395 2.094395) clamped=true
            locked=true
        Coordinate hip_rotation_r: motion_type=rotational default_value=0 range=(-2.094395 2.094395) clamped=true
            locked=true
        SpatialTransform: axes_held_at_zero=(translation1 translation2 translation3)
          TransformAxis rotation1: coordinates=hip_flexion_r axis=(0 0 1) LinearFunction(coefficients=1 0)
          TransformAxis rotation2: coordinates=hip_adduction_r axis=(1 0 0) LinearFunction(coefficients=1 0)
          TransformAxis rotation3: coordinates=hip_rotation_r axis=(0 1 0) LinearFunction(coefficients=1 0)
    Body tibia_r: mass=3.7075 mass_center=(0 -0.1867 0) inertia_xx=0.0504 inertia_yy=0.0051 inertia_zz=0.0511
        meshes=(tibia_r.vtp fibula_r.vtp)
      CustomJoint knee_r: parent_body=femur_r location_in_parent=(0 0 0) location=(0 0 0)
        Coordinate knee_angle_r: motion_type=rotational default_value=-0.8726612 range=(-2.094395 0.1745329)
            clamped=true locked=true
        SpatialTransform: axes_held_at_zero=(rotation2 rotation3 translation3)
          TransformAxis rotation1: coordinates=knee_angle_r axis=(0 0 1) LinearFunction(coefficients=1 0)
          TransformAxis translation1: coordinates=knee_angle_r axis=(1 0 0)
            MultiplierFunction: scale=1
              SimmSpline: x=(-2.0944 -1.74533 -1.39626 -1.0472 -0.698132 -0.349066 -0.174533 0.197344 0.337395 0.490178 1.52146 2.0944)
                  y=(-0.0032 0.00179 0.00411 0.0041 0.00212 -0.001 -0.0031 -0.005227 -0.005435 -0.005574 -0.005435 -0.00525)
          TransformAxis translation2: coordinates=knee_angle_r axis=(0 1 0)
            MultiplierFunction: scale=1
              SimmSpline: x=(-2.0944 -1.22173 -0.523599 -0.349066 -0.174533 0.159149 2.0944)
                  y=(-0.4226 -0.4082 -0.399 -0.3976 -0.3966 -0.395264 -0.396)
    Body talus_r: mass=0.1 mass_center=(0 0 0) inertia_xx=0.001 inertia_yy=0.001 inertia_zz=0.001 meshes=talus_r.vtp
      CustomJoint ankle_r: parent_body=tibia_r location_in_parent=(0 -0.43 0) location=(0 0 0)
        Coordinate ankle_angle_r: motion_type=rotational default_value=0 range=(-1.570796 1.570796) clamped=true
            locked=true
        SpatialTransform: axes_held_at_zero=(rotation2 rotation3 translation1 translation2 translation3)
          TransformAxis rotation1: coordinates=ankle_angle_r axis=(0 0 1) LinearFunction(coefficients=1 0)
    Body calcn_r: mass=1.25 mass_center=(0.1 0.03 0) inertia_xx=0.0014 inertia_yy=0.0039 inertia_zz=0.0041
        meshes=foot_r.vtp
      CustomJoint subtalar_r: parent_body=talus_r location_in_parent=(-0.04877 -0.04195 0.00792) location=(0 0 0)
        Coordinate subtalar_angle_r: motion_type=rotational default_value=0 range=(-1.570796 1.570796) clamped=true
            locked=true
        SpatialTransform: axes_held_at_zero=(rotation2 rotation3 translation1 translation2 translation3)
          TransformAxis rotation1: coordinates=subtalar_angle_r axis=(0.7871796 0.6047475 -0.1209495)
              LinearFunction(coefficients=1 0)
    Body toes_r: mass=0.2166 mass_center=(0.0346 0.006 -0.0175) inertia_xx=0.0001 inertia_yy=0.0002 inertia_zz=0.001
        meshes=bofoot_r.vtp
      CustomJoint mtp_r: parent_body=calcn_r location_in_parent=(0.1788 -0.002 0.00108) location=(0 0 0)
        Coordinate mtp_angle_r: motion_type=rotational default_value=0 range=(-1.570796 1.570796) clamped=true
            locked=true
        SpatialTransform: axes_held_at_zero=(rotation2 rotation3 translation1 translation2 translation3)
          TransformAxis rotation1: coordinates=mtp_angle_r axis=(-0.5809544 0 0.8139361)
              LinearFunction(coefficients=1 0)
    Body femur_l: mass=9.3014 mass_center=(0 -0.17 0) inertia_xx=0.1339 inertia_yy=0.0351 inertia_zz=0.1412
        meshes=femur_l.vtp
      CustomJoint hip_l: parent_body=pelvis location_in_parent=(-0.07315329 -0.06839367 -0.08639745) location=(0 0 0)
        Coordinate hip_flexion_l: motion_type=rotational default_value=1.256637 range=(-2.094395 2.094395) clamped=true
            locked=true
        Coordinate hip_adduction_l: motion_type=rotational default_value=0 range=(-2.094395 2.094395) clamped=true
            locked=true
        Coordinate hip_rotation_l: motion_type=rotational default_value=0 range=(-2.094395 2.094395) clamped=true
            locked=true
        SpatialTransform: axes_held_at_zero=(translation1 translation2 translation3)
          TransformAxis rotation1: coordinates=hip_flexion_l axis=(0 0 1) LinearFunction(coefficients=1 0)
          TransformAxis rotation2: coordinates=hip_adduction_l axis=(-1 0 0) LinearFunction(coefficients=1 0)
          TransformAxis rotation3: coordinates=hip_rotation_l axis=(0 -1 0) LinearFunction(coefficients=1 0)
    Body tibia_l: mass=3.7075 mass_center=(0 -0.1867 0) inertia_xx=0.0504 inertia_yy=0.0051 inertia_zz=0.0511
        meshes=(tibia_l.vtp fibula_l.vtp)
      CustomJoint knee_l: parent_body=femur_l location_in_parent=(0 0 0) location=(0 0 0)
        Coordinate knee_angle_l: motion_type=rotational default_value=-0.8726623 range=(-2.094395 0.1745329)
            clamped=true locked=true
        SpatialTransform: axes_held_at_zero=(rotation2 rotation3 translation3)
          TransformAxis rotation1: coordinates=knee_angle_l axis=(0 0 1) LinearFunction(coefficients=1 0)
          TransformAxis translation1: coordinates=knee_angle_l axis=(1 0 0)
            MultiplierFunction: scale=1
              SimmSpline: x=(-2.0944 -1.74533 -1.39626 -1.0472 -0.698132 -0.349066 -0.174533 0.197344 0.337395 0.490178 1.52146 2.0944)
                  y=(-0.0032 0.00179 0.00411 0.0041 0.00212 -0.001 -0.0031 -0.005227 -0.005435 -0.005574 -0.005435 -0.00525)
          TransformAxis translation2: coordinates=knee_angle_l axis=(0 1 0)
            MultiplierFunction: scale=1
              SimmSpline: x=(-2.0944 -1.22173 -0.523599 -0.349066 -0.174533 0.159149 2.0944)
                  y=(-0.4226 -0.4082 -0.399 -0.3976 -0.3966 -0.395264 -0.396)
    Body talus_l: mass=0.1 mass_center=(0 0 0) inertia_xx=0.001 inertia_yy=0.001 inertia_zz=0.001 meshes=talus_l.vtp
      CustomJoint ankle_l: parent_body=tibia_l location_in_parent=(0 -0.43 0) location=(0 0 0)
        Coordinate ankle_angle_l: motion_type=rotational default_value=0 range=(-1.570796 1.570796) clamped=true
            locked=true
        SpatialTransform: axes_held_at_zero=(rotation2 rotation3 translation1 translation2 translation3)
          TransformAxis rotation1: coordinates=ankle_angle_l axis=(0 0 1) LinearFunction(coefficients=1 0)
    Body calcn_l: mass=1.25 mass_center=(0.1 0.03 0) inertia_xx=0.0014 inertia_yy=0.0039 inertia_zz=0.0041
        meshes=foot_l.vtp
      CustomJoint subtalar_l: parent_body=talus_l location_in_parent=(-0.04877 -0.04195 -0.00792) location=(0 0 0)
        Coordinate subtalar_angle_l: motion_type=rotational default_value=0 range=(-1.570796 1.570796) clamped=true
            locked=true
        SpatialTransform: axes_held_at_zero=(rotation2 rotation3 translation1 translation2 translation3)
          TransformAxis rotation1: coordinates=subtalar_angle_l axis=(-0.7871796 -0.6047475 -0.1209495)
              LinearFunction(coefficients=1 0)
    Body toes_l: mass=0.2166 mass_center=(0.0346 0.006 -0.0175) inertia_xx=0.0001 inertia_yy=0.0002 inertia_zz=0.001
        meshes=bofoot_l.vtp
      CustomJoint mtp_l: parent_body=calcn_l location_in_parent=(0.1788 -0.002 -0.00108) location=(0 0 0)
        Coordinate mtp_angle_l: motion_type=rotational default_value=0 range=(-1.570796 1.570796) clamped=true
            locked=true
        SpatialTransform: axes_held_at_zero=(rotation2 rotation3 translation1 translation2 translation3)
          TransformAxis rotation1: coordinates=mtp_angle_l axis=(0.5809544 0 0.8139361)
              LinearFunction(coefficients=1 0)
    Body clavicle: mass=0.2959055 mass_center=(0 0 0) inertia_xx=0.007038261 inertia_yy=0.002833829
        inertia_zz=0.006355853 meshes=clavicle.vtp
      CustomJoint sternoclavicular: parent_body=thorax location_in_parent=(0.00586455 0.006425503 0.02361118)
          location=(0 0 0)
        Coordinate sternoclavicular_r2: motion_type=rotational default_value=-2.379893e-5 range=(-99999.9 99999.9)
            clamped=false
        Coordinate sternoclavicular_r3: motion_type=rotational default_value=1.00801e-5 range=(-99999.9 99999.9)
            clamped=false
        SpatialTransform: axes_held_at_zero=(rotation3 translation1 translation2 translation3)
          TransformAxis rotation1: coordinates=sternoclavicular_r2 axis=(0.0153 0.9892987 -0.1451)
              LinearFunction(coefficients=1 0)
          TransformAxis rotation2: coordinates=sternoclavicular_r3 axis=(-0.9944725 0 -0.104997)
              LinearFunction(coefficients=1 0)
    Body clavphant: mass=1e-8 mass_center=(0 0 0) inertia_xx=0.0001 inertia_yy=0.0001 inertia_zz=0.0001
      CustomJoint unrotscap: parent_body=clavicle location_in_parent=(-0.01328679 0.01860893 0.1256682)
          location=(0 0 0)
        Coordinate unrotscap_r3: motion_type=rotational default_value=-1.00801e-5 range=(-99999.9 99999.9)
            clamped=false
        Coordinate unrotscap_r2: motion_type=rotational default_value=2.379893e-5 range=(-99999.9 99999.9)
            clamped=false
        SpatialTransform: axes_held_at_zero=(rotation3 translation1 translation2 translation3)
          TransformAxis rotation1: coordinates=unrotscap_r3 axis=(-0.9944725 0 -0.104997)
              LinearFunction(coefficients=1 0)
          TransformAxis rotation2: coordinates=unrotscap_r2 axis=(0.0153 0.9892987 -0.1451)
              LinearFunction(coefficients=1 0)
    Body scapula: mass=1.479528 mass_center=(0 0 0) inertia_xx=0.03519131 inertia_yy=0.01416914 inertia_zz=0.03177927
        meshes=scapula.vtp
      CustomJoint acromioclavicular: parent_body=clavphant location_in_parent=(0 0 0) location=(0 0 0)
        Coordinate acromioclavicular_r2: motion_type=rotational default_value=-4.818799e-6 range=(-99999.9 99999.9)
            clamped=false
        Coordinate acromioclavicular_r3: motion_type=rotational default_value=3.894384e-5 range=(-99999.9 99999.9)
            clamped=false
        Coordinate acromioclavicular_r1: motion_type=rotational default_value=1.750499e-5 range=(-99999.9 99999.9)
            clamped=false
        SpatialTransform: axes_held_at_zero=(translation1 translation2 translation3)
          TransformAxis rotation1: coordinates=acromioclavicular_r2 axis=(0.1570949 0.9472686 -0.2792909)
              LinearFunction(coefficients=1 0)
          TransformAxis rotation2: coordinates=acromioclavicular_r3 axis=(-0.754084 0.297594 0.585487)
              LinearFunction(coefficients=1 0)
          TransformAxis rotation3: coordinates=acromioclavicular_r1 axis=(0.6376998 0.1186 0.7610998)
              LinearFunction(coefficients=1 0)
      WrapEllipsoid Deltoid2: xyz_body_rotation=(3.13042 -1.54881 -1.31423)
          translation=(-0.00537777 -0.0350483 0.00890117) active=false quadrant=-y
          dimensions=(0.0278161 0.037088 0.032452)
      WrapTorus Delt3: xyz_body_rotation=(0.620988 0.32882 -0.560774) translation=(-0.0902162 -0.0396843 -0.0343065)
          active=false quadrant=all inner_radius=0.03708805 outer_radius=0.05563207
      WrapTorus INFSP: xyz_body_rotation=(0.0253073 0.58835 0.151844) translation=(-0.052016 -0.0184513 -0.0103846)
          quadrant=all inner_radius=0.007417609 outer_radius=0.01761682
      WrapEllipsoid TMIN: xyz_body_rotation=(-2.09754 -0.280823 -1.76348)
          translation=(-0.0387571 -0.0481217 -0.0332865) quadrant=x dimensions=(0.0278161 0.0278161 0.04636)
      WrapCylinder TRIlongglen: xyz_body_rotation=(1.37532 -0.294612 2.43596)
          translation=(-0.0332865 -0.0286505 -0.0122391) quadrant=x radius=0.002781604 length=0.02781604
    Body scapphant: mass=1e-8 mass_center=(0 0 0) inertia_xx=0.0001 inertia_yy=0.0001 inertia_zz=0.0001
      CustomJoint unrothum: parent_body=scapula location_in_parent=(-0.008854767 -0.03152484 0.008344811)
          location=(0 0 0)
        Coordinate unrothum_r1: motion_type=rotational default_value=-1.750499e-5 range=(-99999.9 99999.9)
            clamped=false
        Coordinate unrothum_r3: motion_type=rotational default_value=-3.894384e-5 range=(-99999.9 99999.9)
            clamped=false
        Coordinate unrothum_r2: motion_type=rotational default_value=4.818799e-6 range=(-99999.9 99999.9) clamped=false
        SpatialTransform: axes_held_at_zero=(translation1 translation2 translation3)
          TransformAxis rotation1: coordinates=unrothum_r1 axis=(0.6376998 0.1186 0.7610998)
              LinearFunction(coefficients=1 0)
          TransformAxis rotation2: coordinates=unrothum_r3 axis=(-0.754084 0.297594 0.585487)
              LinearFunction(coefficients=1 0)
          TransformAxis rotation3: coordinates=unrothum_r2 axis=(0.1570949 0.9472686 -0.2792909)
              LinearFunction(coefficients=1 0)
    Body humphant: mass=1e-8 mass_center=(0 0 0) inertia_xx=0.0001 inertia_yy=0.0001 inertia_zz=0.0001
      CustomJoint shoulder0: parent_body=scapphant location_in_parent=(0 0 0) location=(0 0 0)
        Coordinate elv_angle: motion_type=rotational default_value=2.264179e-7 range=(-1.570796 2.268928) clamped=true
        SpatialTransform: axes_held_at_zero=(rotation2 rotation3 translation1 translation2 translation3)
          TransformAxis rotation1: coordinates=elv_angle axis=(0.0048 0.9990892 0.04240001)
              LinearFunction(coefficients=1 0)
    Body humphant1: mass=1e-8 mass_center=(0 0 0) inertia_xx=0.0001 inertia_yy=0.0001 inertia_zz=0.0001
      CustomJoint shoulder1: parent_body=humphant location_in_parent=(0 0 0) location=(0 0 0)
        Coordinate shoulder_elv: motion_type=rotational default_value=9.834278e-5 range=(0 3.141593) clamped=true
        Coordinate shoulder1_r2: motion_type=rotational default_value=-2.264107e-7 range=(-99999.9 99999.9)
            clamped=false
        SpatialTransform: axes_held_at_zero=(rotation3 translation1 translation2 translation3)
          TransformAxis rotation1: coordinates=shoulder_elv axis=(-0.9982614 0.0023 0.05889802)
              LinearFunction(coefficients=1 0)
          TransformAxis rotation2: coordinates=shoulder1_r2 axis=(0.0048 0.9990892 0.04240001)
              LinearFunction(coefficients=1 0)
    Body humerus: mass=1.706802 mass_center=(0 -0.132296 0) inertia_xx=0.00526139 inertia_yy=0.00245534
        inertia_zz=0.00563393 meshes=humerus.vtp
      CustomJoint shoulder2: parent_body=humphant1 location_in_parent=(0 0 0) location=(0 0 0)
        Coordinate shoulder_rot: motion_type=rotational default_value=5.70361e-6 range=(-1.570796 1.570796)
            clamped=true
        SpatialTransform: axes_held_at_zero=(rotation2 rotation3 translation1 translation2 translation3)
          TransformAxis rotation1: coordinates=shoulder_rot axis=(0.0048 0.9990892 0.04240001)
              LinearFunction(coefficients=1 0)
      WrapEllipsoid DELT1hh: xyz_body_rotation=(0.0584685 1.00461 0.570374)
          translation=(-0.0123533 -0.0112868 -0.0232846) quadrant=z dimensions=(0.0266618 0.0888725 0.0444363)
      WrapCylinder delt2hum: xyz_body_rotation=(1.68093 -0.0249582 0.0516617)
          translation=(0.00151084 -0.0851395 0.000977604) quadrant=all radius=0.00835402 length=0.0444363
      WrapEllipsoid delt3hum: xyz_body_rotation=(1.72735 0.0759218 -2.74313)
          translation=(0.00168858 -0.0526126 0.000977604) quadrant=x dimensions=(0.00888725 0.00888725 0.0444363)
      WrapEllipsoid SUPSP: xyz_body_rotation=(0.0380482 0.00855211 -1.30673)
          translation=(0.000177748 0.00684319 0.00382152) quadrant=all dimensions=(0.0177745 0.0177745 0.0177745)
      WrapEllipsoid INFSP_and_TMIN_hum_head: xyz_body_rotation=(-0.286583 -0.00907571 -0.0684169)
          translation=(-0.000266615 0.00231069 0.00337715) quadrant=all dimensions=(0.0177745 0.0222182 0.0177745)
      WrapEllipsoid SUBSCAP: xyz_body_rotation=(-0.924501 0.288852 0.381529)
          translation=(-0.00222182 0.000622112 -0.00399927) quadrant=all dimensions=(0.0177745 0.0151084 0.0248844)
      WrapCylinder TMINhum: xyz_body_rotation=(1.75353 0.0692896 2.74628) translation=(-0.00124421 -0.0404371 0)
          quadrant=x radius=0.00622108 length=0.06221082
      WrapSphere TMAJ_LAT_PEC_CORBhh: translation=(0.000622112 0 0.00533235) quadrant=all radius=0.02666178
      WrapCylinder TMAJ_LAThum: xyz_body_rotation=(1.53641 -0.0637045 1.41424)
          translation=(0.000622112 -0.0393706 -0.00488799) quadrant=-x radius=0.00622108 length=0.03554904
      WrapEllipsoid PEC1hh: xyz_body_rotation=(-0.620465 -0.310494 0.363727)
          translation=(-0.00328829 0.000444363 -0.00222182) quadrant=-z dimensions=(0.0266618 0.0177745 0.0177745)
      WrapCylinder PEC12hum: xyz_body_rotation=(1.55928 -0.0774926 -0.925897)
          translation=(0.00177745 -0.0451473 -0.00151084) quadrant=x radius=0.007998532 length=0.06221082
      WrapSphere PEC23hh: translation=(-0.00764304 0.00186633 -0.000355488) quadrant=all radius=0.01777451
      WrapCylinder PEC3hum: xyz_body_rotation=(1.44094 -0.0561996 1.75196)
          translation=(0.000799852 -0.0489688 -0.000355488) quadrant=-x radius=0.007109806 length=0.06221082
      WrapCylinder LAT_TMAJhh: xyz_body_rotation=(-0.305084 -0.018326 -0.686613)
          translation=(-0.0199075 0.00906499 0.00835406) quadrant=-y radius=0.00622108 length=0.03999267
      WrapSphere LAT_TMAJ2hh: xyz_body_rotation=(-0.127235 0.276111 0.0197222)
          translation=(-0.00142196 0.00817625 0.00462138) quadrant=-z radius=0.02666178
      WrapCylinder CORBhum: xyz_body_rotation=(-1.60832 0.0959931 0.875283)
          translation=(0.00239957 -0.106825 -0.00524348) quadrant=x radius=0.007109806 length=0.0444363
      WrapEllipsoid TRIlonghh: xyz_body_rotation=(3.00162 -0.853466 2.57419)
          translation=(-0.00693206 -0.00364378 -0.00124421) quadrant=z dimensions=(0.0311054 0.0177745 0.0177745)
      WrapCylinder TRI: xyz_body_rotation=(-0.14015 -0.00628319 0.154985) translation=(0.00248843 -0.259419 -0.0105759)
          quadrant=all radius=0.01421961 length=0.03554904
      WrapEllipsoid ANC: xyz_body_rotation=(0.00750492 -0.196699 1.04929)
          translation=(0.0119089 -0.254264 -0.000710977) quadrant=-x dimensions=(0.0177745 0.0177745 0.0177745)
      WrapEllipsoid BIClong: xyz_body_rotation=(-2.00434 -1.00164 0.975465)
          translation=(0.00293279 0.00648771 0.000266615) quadrant=-y dimensions=(0.0222182 0.0177745 0.0177745)
      WrapEllipsoid Elbow_BIC_BRD: xyz_body_rotation=(-0.128631 0.137532 0.0307178)
          translation=(0.00168858 -0.256841 -0.0124421) quadrant=x dimensions=(0.0133309 0.0133309 0.0888725)
      WrapEllipsoid Elbow_PT_ECRL: xyz_body_rotation=(-0.161094 -0.110828 0.61453)
          translation=(0.00266618 -0.255242 -0.00613221) quadrant=x dimensions=(0.015997 0.0222182 0.0311054)
    Body ulna: mass=0.5038933 mass_center=(0 -0.0979351 0) inertia_xx=0.00210642 inertia_yy=0.00044875
        inertia_zz=0.00216247 meshes=ulna.vtp
      CustomJoint elbow: parent_body=humerus location_in_parent=(0.005421229 -0.258086 -0.01093133) location=(0 0 0)
        Coordinate elbow_flexion: motion_type=rotational default_value=4.533537e-9 range=(0 2.268928) clamped=true
        SpatialTransform: axes_held_at_zero=(rotation2 rotation3 translation1 translation2 translation3)
          TransformAxis rotation1: coordinates=elbow_flexion axis=(0.04940001 0.03660001 0.9981083)
              LinearFunction(coefficients=1 0)
      WrapCylinder PQ2: xyz_body_rotation=(1.39138 0.0689405 1.52245) translation=(-0.00114188 -0.199068 0.0407271)
          quadrant=all radius=0.006660976 length=0.009515681
    Body radius: mass=0.5038933 mass_center=(0 -0.0979351 0) inertia_xx=0.00210642 inertia_yy=0.00044875
        inertia_zz=0.00216247 meshes=radius.vtp
      CustomJoint radioulnar: parent_body=ulna location_in_parent=(0.0003806317 -0.01094588 0.0190304) location=(0 0 0)
        Coordinate pro_sup: motion_type=rotational default_value=-5.582328e-6 range=(-1.570796 1.570796) clamped=true
        SpatialTransform: axes_held_at_zero=(rotation2 rotation3 translation1 translation2 translation3)
          TransformAxis rotation1: coordinates=pro_sup axis=(-0.01716099 0.9926656 -0.119668)
              LinearFunction(coefficients=1 0)
      WrapCylinder SUP: xyz_body_rotation=(1.44775 0.304036 -2.44102) translation=(0.00428206 -0.0415835 0.00561424)
          quadrant=-x radius=0.007612541 length=0.03806271
      WrapTorus ECU: xyz_body_rotation=(-0.986635 -0.148877 0.222704) translation=(-0.0155105 -0.229994 0.0332097)
          quadrant=all inner_radius=0.00570941 outer_radius=0.008564106
      WrapCylinder PQ1: xyz_body_rotation=(-1.60762 -0.0127409 -2.69025) translation=(0.0267391 -0.188982 0.0274052)
          quadrant=all radius=0.009515681 length=0.009515681
    Body lunate: mass=0.02366998 mass_center=(0 0 0) inertia_xx=6.451e-5 inertia_yy=1.29505e-5 inertia_zz=5.861e-5
        meshes=lunate.vtp
      CustomJoint radiocarpal: parent_body=radius location_in_parent=(0.01712822 -0.2302794 0.0237892) location=(0 0 0)
        Coordinate deviation: motion_type=rotational default_value=0.000474671 range=(-0.1745329 0.4363323)
            clamped=true
        Coordinate flexion: motion_type=rotational default_value=2.881613e-6 range=(-1.22173 1.22173) clamped=true
        SpatialTransform: axes_held_at_zero=(rotation3 translation1 translation2 translation3)
          TransformAxis rotation1: coordinates=deviation axis=(-0.819064 -0.135611 -0.557444)
            SimmSpline: x=(-0.174533 0 0.436332) y=(-0.174533 0 0.436332)
          TransformAxis rotation2: coordinates=flexion axis=(0.9564267 -0.2522069 0.147104)
            SimmSpline: x=(-1.5708 1.5708) y=(-0.785398 0.785398)
      WrapEllipsoid Extensor_ellipse: xyz_body_rotation=(-0.250804 0.285536 0.232827)
          translation=(0.000776067 -0.0149669 0.00521071) quadrant=z dimensions=(0.055433 0.0221732 0.0144125)
      WrapTorus ECRL: xyz_body_rotation=(1.53833 0.234398 0.731118) translation=(0.0246123 -0.0106431 0.0230601)
          quadrant=all inner_radius=0.008869291 outer_radius=0.01773857
      WrapTorus ECRB: xyz_body_rotation=(1.31266 -0.11781 -0.116239) translation=(0.0139691 -0.0105322 0.0206212)
          quadrant=all inner_radius=0.008869291 outer_radius=0.01108661
      WrapTorus FCR: xyz_body_rotation=(-1.55596 -0.15324 -0.100007) translation=(0.00354771 -0.00498898 -0.0210646)
          quadrant=all inner_radius=0.001108656 outer_radius=0.002771656
      WrapTorus FCU: xyz_body_rotation=(-1.57376 -0.0797616 0.39235) translation=(-0.0136365 -0.0137473 -0.0189581)
          quadrant=all inner_radius=0.007538891 outer_radius=0.008869291
      WrapEllipsoid PL: xyz_body_rotation=(-0.0315905 0.0996583 0.0633554)
          translation=(0.00631936 -0.0199559 -0.00454551) quadrant=-z dimensions=(0.0277165 0.0155212 0.0133039)
      WrapEllipsoid FDS: xyz_body_rotation=(0.00837758 -0.0816814 -0.0171042)
          translation=(0.00133039 -0.00631936 -0.0003326) quadrant=-z dimensions=(0.0277165 0.0144125 0.0133039)
      WrapEllipsoid FDP: xyz_body_rotation=(-1.46747 -0.194604 0.121824)
          translation=(-0.00243905 -0.00764976 0.00354771) quadrant=y dimensions=(0.0277165 0.0144125 0.0133039)
      WrapTorus EDCL: xyz_body_rotation=(2.36318 0.193033 -0.26913) translation=(-0.0141909 -0.0147452 0.0164082)
          quadrant=all inner_radius=0.008869291 outer_radius=0.01330394
      WrapTorus EDCR: xyz_body_rotation=(1.98392 0.100531 0.523075) translation=(-0.0108649 -0.0151886 0.0184037)
          quadrant=all inner_radius=0.009977948 outer_radius=0.01219527
      WrapTorus EDCM: xyz_body_rotation=(1.99317 0.19792 0.368264) translation=(-0.000776067 -0.0129713 0.0211754)
          quadrant=all inner_radius=0.009977948 outer_radius=0.01330394
      WrapTorus EDCI: xyz_body_rotation=(1.69768 0.0897099 0.00767945) translation=(0.00997791 -0.016519 0.0233927)
          quadrant=all inner_radius=0.009977948 outer_radius=0.01330394
      WrapEllipsoid EDM: xyz_body_rotation=(2.9627 0.159349 0.117984) translation=(-0.0185147 -0.00243905 0.00532157)
          quadrant=-z dimensions=(0.0199559 0.0155212 0.00886929)
      WrapEllipsoid FPL: xyz_body_rotation=(-0.16633 -0.082205 -0.0659735)
          translation=(0.0188473 -0.0277165 -0.00365858) quadrant=-z dimensions=(0.0177386 0.0110867 0.0110867)
    Body scaphoid: mass=0.02366998 mass_center=(0 0 0) inertia_xx=6.451e-5 inertia_yy=1.29505e-5 inertia_zz=5.861e-5
        meshes=scaphoid.vtp
      WeldJoint lun_scaph: parent_body=lunate location_in_parent=(0.01368642 -0.004949064 -0.001390262)
          location=(0 0 0)
    Body pisiform: mass=0.02366998 mass_center=(0 0 0) inertia_xx=6.451e-5 inertia_yy=1.29505e-5 inertia_zz=5.861e-5
        meshes=pisiform.vtp
      WeldJoint lun_pis: parent_body=lunate location_in_parent=(-0.01484275 -0.01096022 -0.01174405) location=(0 0 0)
    Body triquetrum: mass=0.02366998 mass_center=(0 0 0) inertia_xx=6.451e-5 inertia_yy=1.29505e-5 inertia_zz=5.861e-5
        meshes=triquetrum.vtp
      WeldJoint lun_triq: parent_body=lunate location_in_parent=(-0.0119558 -0.008313853 -0.001429063) location=(0 0 0)
    Body capitate: mass=0.02366998 mass_center=(0 0 0) inertia_xx=6.451e-5 inertia_yy=1.29505e-5 inertia_zz=5.861e-5
        meshes=capitate.vtp
      CustomJoint proximal_distal: parent_body=lunate location_in_parent=(0.004425777 -0.01668978 0.002579854)
          location=(0 0 0)
        Coordinate proximal_distal_r1: motion_type=rotational default_value=0.000644116 range=(-99999.9 99999.9)
            clamped=false
        Coordinate proximal_distal_r3: motion_type=rotational default_value=1.438255e-6 range=(-99999.9 99999.9)
            clamped=false
        SpatialTransform: axes_held_at_zero=(rotation3 translation1 translation2 translation3)
          TransformAxis rotation1: coordinates=proximal_distal_r1 axis=(0.8991357 -0.3490529 -0.2640399)
              LinearFunction(coefficients=1 0)
          TransformAxis rotation2: coordinates=proximal_distal_r3 axis=(0.9971185 0.01069999 -0.07510096)
              LinearFunction(coefficients=1 0)
    Body trapezium: mass=0.02366998 mass_center=(0 0 0) inertia_xx=6.451e-5 inertia_yy=1.29505e-5 inertia_zz=5.861e-5
        meshes=trapezium.vtp
      WeldJoint cap_trpzm: parent_body=capitate location_in_parent=(0.01695475 -0.005065475 -0.01142808)
          location=(0 0 0)
    Body trapezoid: mass=0.02366998 mass_center=(0 0 0) inertia_xx=6.451e-5 inertia_yy=1.29505e-5 inertia_zz=5.861e-5
        meshes=trapezoid.vtp
      WeldJoint cap_trpzd: parent_body=capitate location_in_parent=(0.01013648 -0.004503377 -0.002731741)
          location=(0 0 0)
    Body hamate: mass=0.02366998 mass_center=(0 0 0) inertia_xx=6.451e-5 inertia_yy=1.29505e-5 inertia_zz=5.861e-5
        meshes=hamate.vtp
      WeldJoint cap_ham: parent_body=capitate location_in_parent=(-0.0121609 -0.002766112 -0.0008314999)
          location=(0 0 0)
    Body firstmc1: mass=0.02366998 mass_center=(0 0 0) inertia_xx=6.451e-5 inertia_yy=1.29505e-5 inertia_zz=5.861e-5
      CustomJoint CMC1a: parent_body=trapezium location_in_parent=(0 0 0) location=(0 0 0)
        Coordinate cmc_flexion: motion_type=rotational default_value=0 range=(-0.2617994 0.7853982) clamped=true
            locked=true
        SpatialTransform: axes_held_at_zero=(rotation2 rotation3 translation1 translation2 translation3)
          TransformAxis rotation1: coordinates=cmc_flexion axis=(-0.04239899 -0.6652858 0.7453838)
              LinearFunction(coefficients=1 0)
      WrapTorus APL: xyz_body_rotation=(-1.60989 0.247837 -0.0301942) translation=(0.00909103 0.00254992 -0.0111974)
          active=false quadrant=all inner_radius=0.004434646 outer_radius=0.008869291
    Body firstmc: mass=0.02366998 mass_center=(0 0 0) inertia_xx=6.451e-5 inertia_yy=1.29505e-5 inertia_zz=5.861e-5
        meshes=1mc.vtp
      CustomJoint CMC1b: parent_body=firstmc1 location_in_parent=(0.007982358 -0.005986769 -0.002771656)
          location=(0 0 0)
        Coordinate cmc_abduction: motion_type=rotational default_value=0 range=(-0.4363323 0.4363323) clamped=true
            locked=true
        SpatialTransform: axes_held_at_zero=(rotation2 rotation3 translation1 translation2 translation3)
          TransformAxis rotation1: coordinates=cmc_abduction axis=(0.495557 0.731736 0.467959)
              LinearFunction(coefficients=1 0)
      WrapCylinder MPthumb: xyz_body_rotation=(0.321315 0.11013 -0.834791)
          translation=(0.0196234 -0.0338141 -0.0158539) quadrant=all radius=0.009423614 length=0.02217322
    Body secondmc: mass=0.02366998 mass_center=(0 0 0) inertia_xx=6.451e-5 inertia_yy=1.29505e-5 inertia_zz=5.861e-5
        meshes=2mc.vtp
      WeldJoint CMC2: parent_body=capitate location_in_parent=(0.01628068 -0.04170782 0.005578778) location=(0 0 0)
      WrapEllipsoid 2ndmcp: xyz_body_rotation=(1.48667 -1.29661 2.43072) translation=(0.0065411 -0.0337033 -0.0006652)
          quadrant=-x dimensions=(0.0055433 0.0055433 0.0332598)
    Body thirdmc: mass=0.02366998 mass_center=(0 0 0) inertia_xx=6.451e-5 inertia_yy=1.29505e-5 inertia_zz=5.861e-5
        meshes=3mc.vtp
      WeldJoint CMC3: parent_body=capitate location_in_parent=(0.0005288313 -0.04350275 0.008178589) location=(0 0 0)
    Body fourthmc: mass=0.02366998 mass_center=(0 0 0) inertia_xx=6.451e-5 inertia_yy=1.29505e-5 inertia_zz=5.861e-5
        meshes=4mc.vtp
      WeldJoint CMC4: parent_body=capitate location_in_parent=(-0.01335493 -0.04492184 0.003894726) location=(0 0 0)
    Body fifthmc: mass=0.02366998 mass_center=(0 0 0) inertia_xx=6.451e-5 inertia_yy=1.29505e-5 inertia_zz=5.861e-5
        meshes=5mc.vtp
      WeldJoint CMC5: parent_body=capitate location_in_parent=(-0.02427524 -0.03845169 -0.004676337) location=(0 0 0)
    Body proximal_thumb: mass=0.02366998 mass_center=(0 0 0) inertia_xx=6.451e-5 inertia_yy=1.29505e-5
        inertia_zz=5.861e-5 meshes=thumbprox.vtp
      CustomJoint MCP: parent_body=firstmc location_in_parent=(0.01829291 -0.0323729 -0.01407999) location=(0 0 0)
        Coordinate mp_flexion: motion_type=rotational default_value=7.831709e-10 range=(-0.7853982 0.6981317)
            clamped=true locked=true
        SpatialTransform: axes_held_at_zero=(rotation2 rotation3 translation1 translation2 translation3)
          TransformAxis rotation1: coordinates=mp_flexion axis=(-0.084295 -0.203488 0.975442)
              LinearFunction(coefficients=1 0)
      WrapCylinder IPthumb: xyz_body_rotation=(0.304734 0.0129154 0.0879646)
          translation=(0.0134147 -0.0334816 -0.0106431) quadrant=-x radius=0.004988979 length=0.01108661
    Body distal_thumb: mass=0.02366998 mass_center=(0 0 0) inertia_xx=6.451e-5 inertia_yy=1.29505e-5
        inertia_zz=5.861e-5 meshes=thumbdist.vtp
      CustomJoint IP: parent_body=proximal_thumb location_in_parent=(0.01552125 -0.02871432 -0.01119748)
          location=(0 0 0)
        Coordinate ip_flexion: motion_type=rotational default_value=5.692484e-9 range=(-1.308997 0.4363323)
            clamped=true locked=true
        SpatialTransform: axes_held_at_zero=(rotation2 rotation3 translation1 translation2 translation3)
          TransformAxis rotation1: coordinates=ip_flexion axis=(-0.05010201 -0.4796231 0.8760431)
              LinearFunction(coefficients=1 0)
    Body 2proxph: mass=0.02366998 mass_center=(0 0 0) inertia_xx=6.451e-5 inertia_yy=1.29505e-5 inertia_zz=5.861e-5
        meshes=2proxph.vtp
      CustomJoint 2MCP: parent_body=secondmc location_in_parent=(0.003881427 -0.03131191 0.004013356) location=(0 0 0)
        Coordinate 2mcp_flexion: motion_type=rotational default_value=2.955441e-6 range=(-0.8726646 1.570796)
            clamped=true locked=true
        Coordinate 2mcp_abduction: motion_type=rotational default_value=-3.328804e-6 range=(-0.2617994 0.2617994)
            clamped=true locked=true
        SpatialTransform: axes_held_at_zero=(rotation3 translation1 translation2 translation3)
          TransformAxis rotation1: coordinates=2mcp_flexion axis=(0.9975061 -0.03949601 0.05849401)
              LinearFunction(coefficients=1 0)
          TransformAxis rotation2: coordinates=2mcp_abduction axis=(-0.05499898 0.08589897 0.9947846)
              LinearFunction(coefficients=1 0)
      WrapCylinder Secondpm: xyz_body_rotation=(0.741939 -1.47393 0.709651)
          translation=(0.00831496 -0.0451225 0.00676284) quadrant=all radius=0.004434646 length=0.01108661
    Body 2midph: mass=0.02366998 mass_center=(0 0 0) inertia_xx=6.451e-5 inertia_yy=1.29505e-5 inertia_zz=5.861e-5
        meshes=2midph.vtp
      CustomJoint 2prox-midph: parent_body=2proxph location_in_parent=(0.008333801 -0.04575777 0.008122051)
          location=(0 0 0)
        Coordinate 2pm_flexion: motion_type=rotational default_value=0 range=(0 2.094395) clamped=true locked=true
        SpatialTransform: axes_held_at_zero=(rotation2 rotation3 translation1 translation2 translation3)
          TransformAxis rotation1: coordinates=2pm_flexion axis=(0.9603449 0.040998 -0.275784)
              LinearFunction(coefficients=1 0)
      WrapCylinder Secondmd: xyz_body_rotation=(0.501782 -1.41302 0.647343)
          translation=(0.00399117 -0.0269404 0.0003326) quadrant=x radius=0.003325979 length=0.01108661
    Body 2distph: mass=0.02366998 mass_center=(0 0 0) inertia_xx=6.451e-5 inertia_yy=1.29505e-5 inertia_zz=5.861e-5
        meshes=2distph.vtp
      CustomJoint 2mid-distph: parent_body=2midph location_in_parent=(0.00369517 -0.02759235 0.001352567)
          location=(0 0 0)
        Coordinate 2md_flexion: motion_type=rotational default_value=0 range=(0 1.570796) clamped=true locked=true
        SpatialTransform: axes_held_at_zero=(rotation2 rotation3 translation1 translation2 translation3)
          TransformAxis rotation1: coordinates=2md_flexion axis=(0.9789773 0.07690602 -0.1889151)
              LinearFunction(coefficients=1 0)
    Body 3proxph: mass=0.02366998 mass_center=(0 0 0) inertia_xx=6.451e-5 inertia_yy=1.29505e-5 inertia_zz=5.861e-5
        meshes=3proxph.vtp
      WeldJoint 3MCP: parent_body=thirdmc location_in_parent=(0.0002660779 -0.0291467 0.001971203) location=(0 0 0)
    Body 3midph: mass=0.02366998 mass_center=(0 0 0) inertia_xx=6.451e-5 inertia_yy=1.29505e-5 inertia_zz=5.861e-5
        meshes=3midph.vtp
      WeldJoint 3prox-midph: parent_body=3proxph location_in_parent=(0.00182929 -0.04901501 0.006906958)
          location=(0 0 0)
    Body 3distph: mass=0.02366998 mass_center=(0 0 0) inertia_xx=6.451e-5 inertia_yy=1.29505e-5 inertia_zz=5.861e-5
        meshes=3distph.vtp
      WeldJoint 3mid-distph: parent_body=3midph location_in_parent=(0.001513323 -0.03220327 0.002166319)
          location=(0 0 0)
    Body 4proxph: mass=0.02366998 mass_center=(0 0 0) inertia_xx=6.451e-5 inertia_yy=1.29505e-5 inertia_zz=5.861e-5
        meshes=4proxph.vtp
      WeldJoint 4MCP: parent_body=fourthmc location_in_parent=(-0.002028845 -0.02626307 -0.000191802) location=(0 0 0)
    Body 4midph: mass=0.02366998 mass_center=(0 0 0) inertia_xx=6.451e-5 inertia_yy=1.29505e-5 inertia_zz=5.861e-5
        meshes=4midph.vtp
      WeldJoint 4prox-midph: parent_body=4proxph location_in_parent=(-0.003911359 -0.04462915 0.001491145)
          location=(0 0 0)
    Body 4distph: mass=0.02366998 mass_center=(0 0 0) inertia_xx=6.451e-5 inertia_yy=1.29505e-5 inertia_zz=5.861e-5
        meshes=4distph.vtp
      WeldJoint 4mid-distph: parent_body=4midph location_in_parent=(-0.002568765 -0.0274826 0.0006241799)
          location=(0 0 0)
    Body 5proxph: mass=0.02366998 mass_center=(0 0 0) inertia_xx=6.451e-5 inertia_yy=1.29505e-5 inertia_zz=5.861e-5
        meshes=5proxph.vtp
      WeldJoint 5MCP: parent_body=fifthmc location_in_parent=(-0.001770532 -0.02375971 -0.00165856) location=(0 0 0)
    Body 5midph: mass=0.02366998 mass_center=(0 0 0) inertia_xx=6.451e-5 inertia_yy=1.29505e-5 inertia_zz=5.861e-5
        meshes=5midph.vtp
      WeldJoint 5prox-midph: parent_body=5proxph location_in_parent=(-0.00585262 -0.03942731 -0.00319183)
          location=(0 0 0)
    Body 5distph: mass=0.02366998 mass_center=(0 0 0) inertia_xx=6.451e-5 inertia_yy=1.29505e-5 inertia_zz=5.861e-5
        meshes=5distph.vtp
      WeldJoint 5mid-distph: parent_body=5midph location_in_parent=(-0.003182961 -0.02292378 -0.002486725)
          location=(0 0 0)
    Body bicpt: mass=1e-8 mass_center=(0 0 0) inertia_xx=0.0001 inertia_yy=0.0001 inertia_zz=0.0001
      CustomJoint bicpt: parent_body=radius location_in_parent=(0 0 0) location=(0 0 0)
        Coordinate bicpt_tx: motion_type=translational default_value=-9.515677e-5 range=(-99999.9 99999.9)
            clamped=false
        Coordinate bicpt_ty: motion_type=translational default_value=-0.02626327 range=(-99999.9 99999.9) clamped=false
        Coordinate bicpt_tz: motion_type=translational default_value=-0.004091741 range=(-99999.9 99999.9)
            clamped=false
        SpatialTransform: axes_held_at_zero=(rotation1 rotation2 rotation3)
          TransformAxis translation1: coordinates=bicpt_tx axis=(1 0 0) LinearFunction(coefficients=1 0)
          TransformAxis translation2: coordinates=bicpt_ty axis=(0 1 0) LinearFunction(coefficients=1 0)
          TransformAxis translation3: coordinates=bicpt_tz axis=(0 0 1) LinearFunction(coefficients=1 0)
    Body bicpt2: mass=1e-8 mass_center=(0 0 0) inertia_xx=0.0001 inertia_yy=0.0001 inertia_zz=0.0001
      CustomJoint bicpt2: parent_body=radius location_in_parent=(0 0 0) location=(0 0 0)
        Coordinate bicpt2_tx: motion_type=translational default_value=0.01395898 range=(-99999.9 99999.9) clamped=false
        Coordinate bicpt2_ty: motion_type=translational default_value=-0.009705991 range=(-99999.9 99999.9)
            clamped=false
        Coordinate bicpt2_tz: motion_type=translational default_value=-0.01010416 range=(-99999.9 99999.9)
            clamped=false
        SpatialTransform: axes_held_at_zero=(rotation1 rotation2 rotation3)
          TransformAxis translation1: coordinates=bicpt2_tx axis=(1 0 0) LinearFunction(coefficients=1 0)
          TransformAxis translation2: coordinates=bicpt2_ty axis=(0 1 0) LinearFunction(coefficients=1 0)
          TransformAxis translation3: coordinates=bicpt2_tz axis=(0 0 1) LinearFunction(coefficients=1 0)
    Body ptpt: mass=1e-8 mass_center=(0 0 0) inertia_xx=0.0001 inertia_yy=0.0001 inertia_zz=0.0001
      CustomJoint ptpt: parent_body=ulna location_in_parent=(0 0 0) location=(0 0 0)
        Coordinate ptpt_tx: motion_type=translational default_value=0.007184359 range=(-99999.9 99999.9) clamped=false
        Coordinate ptpt_ty: motion_type=translational default_value=-0.06175673 range=(-99999.9 99999.9) clamped=false
        Coordinate ptpt_tz: motion_type=translational default_value=-4.755395e-5 range=(-99999.9 99999.9) clamped=false
        SpatialTransform: axes_held_at_zero=(rotation1 rotation2 rotation3)
          TransformAxis translation1: coordinates=ptpt_tx axis=(1 0 0) LinearFunction(coefficients=1 0)
          TransformAxis translation2: coordinates=ptpt_ty axis=(0 1 0) LinearFunction(coefficients=1 0)
          TransformAxis translation3: coordinates=ptpt_tz axis=(0 0 1) LinearFunction(coefficients=1 0)
    Body FCUpt: mass=1e-8 mass_center=(0 0 0) inertia_xx=0.0001 inertia_yy=0.0001 inertia_zz=0.0001
      CustomJoint FCUpt: parent_body=radius location_in_parent=(0 0 0) location=(0 0 0)
        Coordinate FCUpt_tx: motion_type=translational default_value=0.003806244 range=(-99999.9 99999.9) clamped=false
        Coordinate FCUpt_ty: motion_type=translational default_value=-0.1751836 range=(-99999.9 99999.9) clamped=false
        Coordinate FCUpt_tz: motion_type=translational default_value=0.0004757952 range=(-99999.9 99999.9)
            clamped=false
        SpatialTransform: axes_held_at_zero=(rotation1 rotation2 rotation3)
          TransformAxis translation1: coordinates=FCUpt_tx axis=(1 0 0) LinearFunction(coefficients=1 0)
          TransformAxis translation2: coordinates=FCUpt_ty axis=(0 1 0) LinearFunction(coefficients=1 0)
          TransformAxis translation3: coordinates=FCUpt_tz axis=(0 0 1) LinearFunction(coefficients=1 0)
    Body EDCpt: mass=1e-8 mass_center=(0 0 0) inertia_xx=0.0001 inertia_yy=0.0001 inertia_zz=0.0001
      CustomJoint EDCpt: parent_body=radius location_in_parent=(0 0 0) location=(0 0 0)
        Coordinate EDCpt_tx: motion_type=translational default_value=3.640629e-8 range=(-99999.9 99999.9) clamped=false
        Coordinate EDCpt_ty: motion_type=translational default_value=-8.595915e-9 range=(-99999.9 99999.9)
            clamped=false
        Coordinate EDCpt_tz: motion_type=translational default_value=-4.39912e-9 range=(-99999.9 99999.9) clamped=false
        SpatialTransform: axes_held_at_zero=(rotation1 rotation2 rotation3)
          TransformAxis translation1: coordinates=EDCpt_tx axis=(1 0 0) LinearFunction(coefficients=1 0)
          TransformAxis translation2: coordinates=EDCpt_ty axis=(0 1 0) LinearFunction(coefficients=1 0)
          TransformAxis translation3: coordinates=EDCpt_tz axis=(0 0 1) LinearFunction(coefficients=1 0)
    Body APLpt: mass=1e-8 mass_center=(0 0 0) inertia_xx=0.0001 inertia_yy=0.0001 inertia_zz=0.0001
      CustomJoint APLpt: parent_body=capitate location_in_parent=(0 0 0) location=(0 0 0)
        Coordinate APLpt_tx: motion_type=translational default_value=-3.262875e-9 range=(-99999.9 99999.9)
            clamped=false
        Coordinate APLpt_ty: motion_type=translational default_value=-1.30515e-9 range=(-99999.9 99999.9) clamped=false
        Coordinate APLpt_tz: motion_type=translational default_value=-6.525749e-9 range=(-99999.9 99999.9)
            clamped=false
        SpatialTransform: axes_held_at_zero=(rotation1 rotation2 rotation3)
          TransformAxis translation1: coordinates=APLpt_tx axis=(1 0 0) LinearFunction(coefficients=1 0)
          TransformAxis translation2: coordinates=APLpt_ty axis=(0 1 0) LinearFunction(coefficients=1 0)
          TransformAxis translation3: coordinates=APLpt_tz axis=(0 0 1) LinearFunction(coefficients=1 0)
    Body FPLpt: mass=1e-8 mass_center=(0 0 0) inertia_xx=0.0001 inertia_yy=0.0001 inertia_zz=0.0001
      CustomJoint FPLpt: parent_body=capitate location_in_parent=(0 0 0) location=(0 0 0)
        Coordinate FPLpt_tx: motion_type=translational default_value=-4.17648e-9 range=(-99999.9 99999.9) clamped=false
        Coordinate FPLpt_ty: motion_type=translational default_value=-1.252944e-8 range=(-99999.9 99999.9)
            clamped=false
        Coordinate FPLpt_tz: motion_type=translational default_value=-7.047809e-9 range=(-99999.9 99999.9)
            clamped=false
        SpatialTransform: axes_held_at_zero=(rotation1 rotation2 rotation3)
          TransformAxis translation1: coordinates=FPLpt_tx axis=(1 0 0) LinearFunction(coefficients=1 0)
          TransformAxis translation2: coordinates=FPLpt_ty axis=(0 1 0) LinearFunction(coefficients=1 0)
          TransformAxis translation3: coordinates=FPLpt_tz axis=(0 0 1) LinearFunction(coefficients=1 0)
    Body FPLpt2: mass=1e-8 mass_center=(0 0 0) inertia_xx=0.0001 inertia_yy=0.0001 inertia_zz=0.0001
      CustomJoint FPLpt2: parent_body=capitate location_in_parent=(0 0 0) location=(0 0 0)
        Coordinate FPLpt2_tx: motion_type=translational default_value=0 range=(-99999.9 99999.9) clamped=false
        Coordinate FPLpt2_ty: motion_type=translational default_value=0 range=(-99999.9 99999.9) clamped=false
        Coordinate FPLpt2_tz: motion_type=translational default_value=0 range=(-99999.9 99999.9) clamped=false
        SpatialTransform: axes_held_at_zero=(rotation1 rotation2 rotation3)
          TransformAxis translation1: coordinates=FPLpt2_tx axis=(1 0 0) LinearFunction(coefficients=1 0)
          TransformAxis translation2: coordinates=FPLpt2_ty axis=(0 1 0) LinearFunction(coefficients=1 0)
          TransformAxis translation3: coordinates=FPLpt2_tz axis=(0 0 1) LinearFunction(coefficients=1 0)
    Body PEC1pt2: mass=1e-8 mass_center=(0 0 0) inertia_xx=0.0001 inertia_yy=0.0001 inertia_zz=0.0001
      CustomJoint PEC1pt2: parent_body=humerus location_in_parent=(0 0 0) location=(0 0 0)
        Coordinate PEC1pt2_tx: motion_type=translational default_value=1.666629e-7 range=(-99999.9 99999.9)
            clamped=false
        Coordinate PEC1pt2_ty: motion_type=translational default_value=5.847325e-7 range=(-99999.9 99999.9)
            clamped=false
        Coordinate PEC1pt2_tz: motion_type=translational default_value=4.067704e-7 range=(-99999.9 99999.9)
            clamped=false
        SpatialTransform: axes_held_at_zero=(rotation1 rotation2 rotation3)
          TransformAxis translation1: coordinates=PEC1pt2_tx axis=(1 0 0) LinearFunction(coefficients=1 0)
          TransformAxis translation2: coordinates=PEC1pt2_ty axis=(0 1 0) LinearFunction(coefficients=1 0)
          TransformAxis translation3: coordinates=PEC1pt2_tz axis=(0 0 1) LinearFunction(coefficients=1 0)
    Body PEC1pt3: mass=1e-8 mass_center=(0 0 0) inertia_xx=0.0001 inertia_yy=0.0001 inertia_zz=0.0001
      CustomJoint PEC1pt3: parent_body=thorax location_in_parent=(0 0 0) location=(0 0 0)
        Coordinate PEC1pt3_tx: motion_type=translational default_value=-5.601736e-7 range=(-99999.9 99999.9)
            clamped=false
        Coordinate PEC1pt3_ty: motion_type=translational default_value=1.352544e-6 range=(-99999.9 99999.9)
            clamped=false
        Coordinate PEC1pt3_tz: motion_type=translational default_value=-1.282885e-6 range=(-99999.9 99999.9)
            clamped=false
        SpatialTransform: axes_held_at_zero=(rotation1 rotation2 rotation3)
          TransformAxis translation1: coordinates=PEC1pt3_tx axis=(1 0 0) LinearFunction(coefficients=1 0)
          TransformAxis translation2: coordinates=PEC1pt3_ty axis=(0 1 0) LinearFunction(coefficients=1 0)
          TransformAxis translation3: coordinates=PEC1pt3_tz axis=(0 0 1) LinearFunction(coefficients=1 0)
    Body PEC2pt2: mass=1e-8 mass_center=(0 0 0) inertia_xx=0.0001 inertia_yy=0.0001 inertia_zz=0.0001
      CustomJoint PEC2pt2: parent_body=humerus location_in_parent=(0 0 0) location=(0 0 0)
        Coordinate PEC2pt2_tx: motion_type=translational default_value=1.666629e-7 range=(-99999.9 99999.9)
            clamped=false
        Coordinate PEC2pt2_ty: motion_type=translational default_value=5.847325e-7 range=(-99999.9 99999.9)
            clamped=false
        Coordinate PEC2pt2_tz: motion_type=translational default_value=4.067704e-7 range=(-99999.9 99999.9)
            clamped=false
        SpatialTransform: axes_held_at_zero=(rotation1 rotation2 rotation3)
          TransformAxis translation1: coordinates=PEC2pt2_tx axis=(1 0 0) LinearFunction(coefficients=1 0)
          TransformAxis translation2: coordinates=PEC2pt2_ty axis=(0 1 0) LinearFunction(coefficients=1 0)
          TransformAxis translation3: coordinates=PEC2pt2_tz axis=(0 0 1) LinearFunction(coefficients=1 0)
    Body PEC2pt3: mass=1e-8 mass_center=(0 0 0) inertia_xx=0.0001 inertia_yy=0.0001 inertia_zz=0.0001
      CustomJoint PEC2pt3: parent_body=thorax location_in_parent=(0 0 0) location=(0 0 0)
        Coordinate PEC2pt3_tx: motion_type=translational default_value=3.77319e-8 range=(-99999.9 99999.9)
            clamped=false
        Coordinate PEC2pt3_ty: motion_type=translational default_value=1.25386e-6 range=(-99999.9 99999.9)
            clamped=false
        Coordinate PEC2pt3_tz: motion_type=translational default_value=-6.588571e-7 range=(-99999.9 99999.9)
            clamped=false
        SpatialTransform: axes_held_at_zero=(rotation1 rotation2 rotation3)
          TransformAxis translation1: coordinates=PEC2pt3_tx axis=(1 0 0) LinearFunction(coefficients=1 0)
          TransformAxis translation2: coordinates=PEC2pt3_ty axis=(0 1 0) LinearFunction(coefficients=1 0)
          TransformAxis translation3: coordinates=PEC2pt3_tz axis=(0 0 1) LinearFunction(coefficients=1 0)
    Body PEC3pt2: mass=1e-8 mass_center=(0 0 0) inertia_xx=0.0001 inertia_yy=0.0001 inertia_zz=0.0001
      CustomJoint PEC3pt2: parent_body=humerus location_in_parent=(0 0 0) location=(0 0 0)
        Coordinate PEC3pt2_tx: motion_type=translational default_value=3.346164e-7 range=(-99999.9 99999.9)
            clamped=false
        Coordinate PEC3pt2_ty: motion_type=translational default_value=3.251623e-7 range=(-99999.9 99999.9)
            clamped=false
        Coordinate PEC3pt2_tz: motion_type=translational default_value=1.794056e-6 range=(-99999.9 99999.9)
            clamped=false
        SpatialTransform: axes_held_at_zero=(rotation1 rotation2 rotation3)
          TransformAxis translation1: coordinates=PEC3pt2_tx axis=(1 0 0) LinearFunction(coefficients=1 0)
          TransformAxis translation2: coordinates=PEC3pt2_ty axis=(0 1 0) LinearFunction(coefficients=1 0)
          TransformAxis translation3: coordinates=PEC3pt2_tz axis=(0 0 1) LinearFunction(coefficients=1 0)
    Body PEC3pt3: mass=1e-8 mass_center=(0 0 0) inertia_xx=0.0001 inertia_yy=0.0001 inertia_zz=0.0001
      CustomJoint PEC3pt3: parent_body=thorax location_in_parent=(0 0 0) location=(0 0 0)
        Coordinate PEC3pt3_tx: motion_type=translational default_value=0 range=(-99999.9 99999.9) clamped=false
        Coordinate PEC3pt3_ty: motion_type=translational default_value=0.0002088889 range=(-99999.9 99999.9)
            clamped=false
        Coordinate PEC3pt3_tz: motion_type=translational default_value=0 range=(-99999.9 99999.9) clamped=false
        SpatialTransform: axes_held_at_zero=(rotation1 rotation2 rotation3)
          TransformAxis translation1: coordinates=PEC3pt3_tx axis=(1 0 0) LinearFunction(coefficients=1 0)
          TransformAxis translation2: coordinates=PEC3pt3_ty axis=(0 1 0) LinearFunction(coefficients=1 0)
          TransformAxis translation3: coordinates=PEC3pt3_tz axis=(0 0 1) LinearFunction(coefficients=1 0)
    Body DELT2pt2a: mass=1e-8 mass_center=(0 0 0) inertia_xx=0.0001 inertia_yy=0.0001 inertia_zz=0.0001
      CustomJoint DELT2pt2a: parent_body=humerus location_in_parent=(0 0 0) location=(0 0 0)
        Coordinate DELT2pt2a_tx: motion_type=translational default_value=-4.773903e-7 range=(-99999.9 99999.9)
            clamped=false
        Coordinate DELT2pt2a_ty: motion_type=translational default_value=-2.206164e-6 range=(-99999.9 99999.9)
            clamped=false
        Coordinate DELT2pt2a_tz: motion_type=translational default_value=1.183431e-8 range=(-99999.9 99999.9)
            clamped=false
        SpatialTransform: axes_held_at_zero=(rotation1 rotation2 rotation3)
          TransformAxis translation1: coordinates=DELT2pt2a_tx axis=(1 0 0) LinearFunction(coefficients=1 0)
          TransformAxis translation2: coordinates=DELT2pt2a_ty axis=(0 1 0) LinearFunction(coefficients=1 0)
          TransformAxis translation3: coordinates=DELT2pt2a_tz axis=(0 0 1) LinearFunction(coefficients=1 0)
    Body DELT2pt2: mass=1e-8 mass_center=(0 0 0) inertia_xx=0.0001 inertia_yy=0.0001 inertia_zz=0.0001
      CustomJoint DELT2pt2: parent_body=DELT2pt2a location_in_parent=(0 0 0) location=(0 0 0)
        Coordinate DELT2pt2_tx: motion_type=translational default_value=-0.0004275056 range=(-99999.9 99999.9)
            clamped=false
        Coordinate DELT2pt2_ty: motion_type=translational default_value=-2.097206e-9 range=(-99999.9 99999.9)
            clamped=false
        Coordinate DELT2pt2_tz: motion_type=translational default_value=-1.316029e-8 range=(-99999.9 99999.9)
            clamped=false
        SpatialTransform: axes_held_at_zero=(rotation1 rotation2 rotation3)
          TransformAxis translation1: coordinates=DELT2pt2_tx axis=(1 0 0) LinearFunction(coefficients=1 0)
          TransformAxis translation2: coordinates=DELT2pt2_ty axis=(0 1 0) LinearFunction(coefficients=1 0)
          TransformAxis translation3: coordinates=DELT2pt2_tz axis=(0 0 1) LinearFunction(coefficients=1 0)
    Body LAT1pt2: mass=1e-8 mass_center=(0 0 0) inertia_xx=0.0001 inertia_yy=0.0001 inertia_zz=0.0001
      CustomJoint LAT1pt2: parent_body=scapula location_in_parent=(0 0 0) location=(0 0 0)
        Coordinate LAT1pt2_tx: motion_type=translational default_value=-6.095153e-8 range=(-99999.9 99999.9)
            clamped=false
        Coordinate LAT1pt2_ty: motion_type=translational default_value=1.021664e-6 range=(-99999.9 99999.9)
            clamped=false
        Coordinate LAT1pt2_tz: motion_type=translational default_value=-4.179534e-7 range=(-99999.9 99999.9)
            clamped=false
        SpatialTransform: axes_held_at_zero=(rotation1 rotation2 rotation3)
          TransformAxis translation1: coordinates=LAT1pt2_tx axis=(1 0 0) LinearFunction(coefficients=1 0)
          TransformAxis translation2: coordinates=LAT1pt2_ty axis=(0 1 0) LinearFunction(coefficients=1 0)
          TransformAxis translation3: coordinates=LAT1pt2_tz axis=(0 0 1) LinearFunction(coefficients=1 0)
    Body LAT1pt3: mass=1e-8 mass_center=(0 0 0) inertia_xx=0.0001 inertia_yy=0.0001 inertia_zz=0.0001
      CustomJoint LAT1pt3: parent_body=scapula location_in_parent=(0 0 0) location=(0 0 0)
        Coordinate LAT1pt3_tx: motion_type=translational default_value=1.683423e-7 range=(-99999.9 99999.9)
            clamped=false
        Coordinate LAT1pt3_ty: motion_type=translational default_value=1.474447e-6 range=(-99999.9 99999.9)
            clamped=false
        Coordinate LAT1pt3_tz: motion_type=translational default_value=-1.219031e-6 range=(-99999.9 99999.9)
            clamped=false
        SpatialTransform: axes_held_at_zero=(rotation1 rotation2 rotation3)
          TransformAxis translation1: coordinates=LAT1pt3_tx axis=(1 0 0) LinearFunction(coefficients=1 0)
          TransformAxis translation2: coordinates=LAT1pt3_ty axis=(0 1 0) LinearFunction(coefficients=1 0)
          TransformAxis translation3: coordinates=LAT1pt3_tz axis=(0 0 1) LinearFunction(coefficients=1 0)
    Body LAT2pt2: mass=1e-8 mass_center=(0 0 0) inertia_xx=0.0001 inertia_yy=0.0001 inertia_zz=0.0001
      CustomJoint LAT2pt2: parent_body=scapula location_in_parent=(0 0 0) location=(0 0 0)
        Coordinate LAT2pt2_tx: motion_type=translational default_value=-4.09246e-7 range=(-99999.9 99999.9)
            clamped=false
        Coordinate LAT2pt2_ty: motion_type=translational default_value=8.852485e-7 range=(-99999.9 99999.9)
            clamped=false
        Coordinate LAT2pt2_tz: motion_type=translational default_value=-3.744166e-7 range=(-99999.9 99999.9)
            clamped=false
        SpatialTransform: axes_held_at_zero=(rotation1 rotation2 rotation3)
          TransformAxis translation1: coordinates=LAT2pt2_tx axis=(1 0 0) LinearFunction(coefficients=1 0)
          TransformAxis translation2: coordinates=LAT2pt2_ty axis=(0 1 0) LinearFunction(coefficients=1 0)
          TransformAxis translation3: coordinates=LAT2pt2_tz axis=(0 0 1) LinearFunction(coefficients=1 0)
    Body LAT2pt3: mass=1e-8 mass_center=(0 0 0) inertia_xx=0.0001 inertia_yy=0.0001 inertia_zz=0.0001
      CustomJoint LAT2pt3: parent_body=scapula location_in_parent=(0 0 0) location=(0 0 0)
        Coordinate LAT2pt3_tx: motion_type=translational default_value=-8.533215e-7 range=(-99999.9 99999.9)
            clamped=false
        Coordinate LAT2pt3_ty: motion_type=translational default_value=1.86918e-6 range=(-99999.9 99999.9)
            clamped=false
        Coordinate LAT2pt3_tz: motion_type=translational default_value=-2.092669e-6 range=(-99999.9 99999.9)
            clamped=false
        SpatialTransform: axes_held_at_zero=(rotation1 rotation2 rotation3)
          TransformAxis translation1: coordinates=LAT2pt3_tx axis=(1 0 0) LinearFunction(coefficients=1 0)
          TransformAxis translation2: coordinates=LAT2pt3_ty axis=(0 1 0) LinearFunction(coefficients=1 0)
          TransformAxis translation3: coordinates=LAT2pt3_tz axis=(0 0 1) LinearFunction(coefficients=1 0)
    Body LAT3pt2: mass=1e-8 mass_center=(0 0 0) inertia_xx=0.0001 inertia_yy=0.0001 inertia_zz=0.0001
      CustomJoint LAT3pt2: parent_body=scapula location_in_parent=(0 0 0) location=(0 0 0)
        Coordinate LAT3pt2_tx: motion_type=translational default_value=-1.602155e-6 range=(-99999.9 99999.9)
            clamped=false
        Coordinate LAT3pt2_ty: motion_type=translational default_value=9.897368e-7 range=(-99999.9 99999.9)
            clamped=false
        Coordinate LAT3pt2_tz: motion_type=translational default_value=-5.021245e-7 range=(-99999.9 99999.9)
            clamped=false
        SpatialTransform: axes_held_at_zero=(rotation1 rotation2 rotation3)
          TransformAxis translation1: coordinates=LAT3pt2_tx axis=(1 0 0) LinearFunction(coefficients=1 0)
          TransformAxis translation2: coordinates=LAT3pt2_ty axis=(0 1 0) LinearFunction(coefficients=1 0)
          TransformAxis translation3: coordinates=LAT3pt2_tz axis=(0 0 1) LinearFunction(coefficients=1 0)
    Body LAT3pt3: mass=1e-8 mass_center=(0 0 0) inertia_xx=0.0001 inertia_yy=0.0001 inertia_zz=0.0001
      CustomJoint LAT3pt3: parent_body=scapula location_in_parent=(0 0 0) location=(0 0 0)
        Coordinate LAT3pt3_tx: motion_type=translational default_value=-1.062298e-6 range=(-99999.9 99999.9)
            clamped=false
        Coordinate LAT3pt3_ty: motion_type=translational default_value=2.159426e-6 range=(-99999.9 99999.9)
            clamped=false
        Coordinate LAT3pt3_tz: motion_type=translational default_value=-2.615111e-6 range=(-99999.9 99999.9)
            clamped=false
        SpatialTransform: axes_held_at_zero=(rotation1 rotation2 rotation3)
          TransformAxis translation1: coordinates=LAT3pt3_tx axis=(1 0 0) LinearFunction(coefficients=1 0)
          TransformAxis translation2: coordinates=LAT3pt3_ty axis=(0 1 0) LinearFunction(coefficients=1 0)
          TransformAxis translation3: coordinates=LAT3pt3_tz axis=(0 0 1) LinearFunction(coefficients=1 0)
    Body clavicle_l: mass=0.2959055 mass_center=(0 0 0) inertia_xx=0.007038261 inertia_yy=0.002833829
        inertia_zz=0.006355853 meshes=clavicle_l.vtp
      CustomJoint sternoclavicular_l: parent_body=thorax location_in_parent=(0.00586455 0.006425503 -0.02361118)
          location=(0 0 0)
        Coordinate sternoclavicular_r2_l: motion_type=rotational default_value=-9.185401e-6 range=(-99999.9 99999.9)
            clamped=false
        Coordinate sternoclavicular_r3_l: motion_type=rotational default_value=3.890502e-6 range=(-99999.9 99999.9)
            clamped=false
        SpatialTransform: axes_held_at_zero=(rotation3 translation1 translation2 translation3)
          TransformAxis rotation1: coordinates=sternoclavicular_r2_l axis=(-0.0153 -0.9892987 -0.1451)
              LinearFunction(coefficients=1 0)
          TransformAxis rotation2: coordinates=sternoclavicular_r3_l axis=(0.9944725 0 -0.104997)
              LinearFunction(coefficients=1 0)
    Body clavphant_l: mass=1e-8 mass_center=(0 0 0) inertia_xx=0.0001 inertia_yy=0.0001 inertia_zz=0.0001
      CustomJoint unrotscap_l: parent_body=clavicle_l location_in_parent=(-0.01328679 0.01860893 -0.1256682)
          location=(0 0 0)
        Coordinate unrotscap_r3_l: motion_type=rotational default_value=-3.890502e-6 range=(-99999.9 99999.9)
            clamped=false
        Coordinate unrotscap_r2_l: motion_type=rotational default_value=9.185401e-6 range=(-99999.9 99999.9)
            clamped=false
        SpatialTransform: axes_held_at_zero=(rotation3 translation1 translation2 translation3)
          TransformAxis rotation1: coordinates=unrotscap_r3_l axis=(0.9944725 0 -0.104997)
              LinearFunction(coefficients=1 0)
          TransformAxis rotation2: coordinates=unrotscap_r2_l axis=(-0.0153 -0.9892987 -0.1451)
              LinearFunction(coefficients=1 0)
    Body scapula_l: mass=1.479528 mass_center=(0 0 0) inertia_xx=0.03519131 inertia_yy=0.01416914 inertia_zz=0.03177927
        meshes=scapula_l.vtp
      CustomJoint acromioclavicular_l: parent_body=clavphant_l location_in_parent=(0 0 0) location=(0 0 0)
        Coordinate acromioclavicular_r2_l: motion_type=rotational default_value=-1.859857e-6 range=(-99999.9 99999.9)
            clamped=false
        Coordinate acromioclavicular_r3_l: motion_type=rotational default_value=1.503071e-5 range=(-99999.9 99999.9)
            clamped=false
        Coordinate acromioclavicular_r1_l: motion_type=rotational default_value=6.7562e-6 range=(-99999.9 99999.9)
            clamped=false
        SpatialTransform: axes_held_at_zero=(translation1 translation2 translation3)
          TransformAxis rotation1: coordinates=acromioclavicular_r2_l axis=(-0.1570949 -0.9472686 -0.2792909)
              LinearFunction(coefficients=1 0)
          TransformAxis rotation2: coordinates=acromioclavicular_r3_l axis=(0.754084 -0.297594 0.585487)
              LinearFunction(coefficients=1 0)
          TransformAxis rotation3: coordinates=acromioclavicular_r1_l axis=(-0.6376998 -0.1186 0.7610998)
              LinearFunction(coefficients=1 0)
      WrapEllipsoid Deltoid2_l: xyz_body_rotation=(-3.13042 1.54881 -1.31423)
          translation=(-0.00537777 -0.0350483 -0.00890117) active=false quadrant=-y
          dimensions=(0.0278161 0.037088 0.032452)
      WrapTorus Delt3_l: xyz_body_rotation=(-0.620988 -0.32882 -0.560774) translation=(-0.0902162 -0.0396843 0.0343065)
          active=false quadrant=all inner_radius=0.03708805 outer_radius=0.05563207
      WrapTorus INFSP_l: xyz_body_rotation=(-0.0253073 -0.58835 0.151844) translation=(-0.052016 -0.0184513 0.0103846)
          quadrant=all inner_radius=0.007417609 outer_radius=0.01761682
      WrapEllipsoid TMIN_l: xyz_body_rotation=(2.09754 0.280823 -1.76348) translation=(-0.0387571 -0.0481217 0.0332865)
          quadrant=x dimensions=(0.0278161 0.0278161 0.04636)
      WrapCylinder TRIlongglen_l: xyz_body_rotation=(-1.37532 0.294612 2.43596)
          translation=(-0.0332865 -0.0286505 0.0122391) quadrant=x radius=0.002781604 length=0.02781604
    Body scapphant_l: mass=1e-8 mass_center=(0 0 0) inertia_xx=0.0001 inertia_yy=0.0001 inertia_zz=0.0001
      CustomJoint unrothum_l: parent_body=scapula_l location_in_parent=(-0.008854767 -0.03152484 -0.008344811)
          location=(0 0 0)
        Coordinate unrothum_r1_l: motion_type=rotational default_value=-6.7562e-6 range=(-99999.9 99999.9)
            clamped=false
        Coordinate unrothum_r3_l: motion_type=rotational default_value=-1.503071e-5 range=(-99999.9 99999.9)
            clamped=false
        Coordinate unrothum_r2_l: motion_type=rotational default_value=1.859857e-6 range=(-99999.9 99999.9)
            clamped=false
        SpatialTransform: axes_held_at_zero=(translation1 translation2 translation3)
          TransformAxis rotation1: coordinates=unrothum_r1_l axis=(-0.6376998 -0.1186 0.7610998)
              LinearFunction(coefficients=1 0)
          TransformAxis rotation2: coordinates=unrothum_r3_l axis=(0.754084 -0.297594 0.585487)
              LinearFunction(coefficients=1 0)
          TransformAxis rotation3: coordinates=unrothum_r2_l axis=(-0.1570949 -0.9472686 -0.2792909)
              LinearFunction(coefficients=1 0)
    Body humphant_l: mass=1e-8 mass_center=(0 0 0) inertia_xx=0.0001 inertia_yy=0.0001 inertia_zz=0.0001
      CustomJoint shoulder0_l: parent_body=scapphant_l location_in_parent=(0 0 0) location=(0 0 0)
        Coordinate elv_angle_l: motion_type=rotational default_value=6.060482e-6 range=(-1.570796 2.268928)
            clamped=true
        SpatialTransform: axes_held_at_zero=(rotation2 rotation3 translation1 translation2 translation3)
          TransformAxis rotation1: coordinates=elv_angle_l axis=(-0.0048 -0.9990892 0.04240001)
              LinearFunction(coefficients=1 0)
    Body humphant1_l: mass=1e-8 mass_center=(0 0 0) inertia_xx=0.0001 inertia_yy=0.0001 inertia_zz=0.0001
      CustomJoint shoulder1_l: parent_body=humphant_l location_in_parent=(0 0 0) location=(0 0 0)
        Coordinate shoulder_elv_l: motion_type=rotational default_value=3.792025e-5 range=(0 3.141593) clamped=true
        Coordinate shoulder1_r2_l: motion_type=rotational default_value=-6.060481e-6 range=(-99999.9 99999.9)
            clamped=false
        SpatialTransform: axes_held_at_zero=(rotation3 translation1 translation2 translation3)
          TransformAxis rotation1: coordinates=shoulder_elv_l axis=(0.9982614 -0.0023 0.05889802)
              LinearFunction(coefficients=1 0)
          TransformAxis rotation2: coordinates=shoulder1_r2_l axis=(-0.0048 -0.9990892 0.04240001)
              LinearFunction(coefficients=1 0)
    Body humerus_l: mass=1.706802 mass_center=(0 -0.132296 0) inertia_xx=0.00526139 inertia_yy=0.00245534
        inertia_zz=0.00563393 meshes=humerus_l.vtp
      CustomJoint shoulder2_l: parent_body=humphant1_l location_in_parent=(0 0 0) location=(0 0 0)
        Coordinate shoulder_rot_l: motion_type=rotational default_value=3.709595e-6 range=(-1.570796 1.570796)
            clamped=true
        SpatialTransform: axes_held_at_zero=(rotation2 rotation3 translation1 translation2 translation3)
          TransformAxis rotation1: coordinates=shoulder_rot_l axis=(-0.0048 -0.9990892 0.04240001)
              LinearFunction(coefficients=1 0)
      WrapEllipsoid DELT1hh_l: xyz_body_rotation=(-0.0584685 -1.00461 0.570374)
          translation=(-0.0123533 -0.0112868 0.0232846) quadrant=-z dimensions=(0.0266618 0.0888725 0.0444363)
      WrapCylinder delt2hum_l: xyz_body_rotation=(-1.68093 0.0249582 0.0516617)
          translation=(0.00151084 -0.0851395 -0.000977604) quadrant=all radius=0.00835402 length=0.0444363
      WrapEllipsoid delt3hum_l: xyz_body_rotation=(-1.72735 -0.0759218 -2.74313)
          translation=(0.00168858 -0.0526126 -0.000977604) quadrant=x dimensions=(0.00888725 0.00888725 0.0444363)
      WrapEllipsoid SUPSP_l: xyz_body_rotation=(-0.0380482 -0.00855211 -1.30673)
          translation=(0.000177748 0.00684319 -0.00382152) quadrant=all dimensions=(0.0177745 0.0177745 0.0177745)
      WrapEllipsoid INFSP_and_TMIN_hum_head_l: xyz_body_rotation=(0.286583 0.00907571 -0.0684169)
          translation=(-0.000266615 0.00231069 -0.00337715) quadrant=all dimensions=(0.0177745 0.0222182 0.0177745)
      WrapEllipsoid SUBSCAP_l: xyz_body_rotation=(0.924501 -0.288852 0.381529)
          translation=(-0.00222182 0.000622112 0.00399927) quadrant=all dimensions=(0.0177745 0.0151084 0.0248844)
      WrapCylinder TMINhum_l: xyz_body_rotation=(-1.75353 -0.0692896 2.74628) translation=(-0.00124421 -0.0404371 0)
          quadrant=x radius=0.00622108 length=0.06221082
      WrapSphere TMAJ_LAT_PEC_CORBhh_l: translation=(0.000622112 0 -0.00533235) quadrant=all radius=0.02666178
      WrapCylinder TMAJ_LAThum_l: xyz_body_rotation=(-1.53641 0.0637045 1.41424)
          translation=(0.000622112 -0.0393706 0.00488799) quadrant=-x radius=0.00622108 length=0.03554904
      WrapEllipsoid PEC1hh_l: xyz_body_rotation=(0.620465 0.310494 0.363727)
          translation=(-0.00328829 0.000444363 0.00222182) quadrant=z dimensions=(0.0266618 0.0177745 0.0177745)
      WrapCylinder PEC12hum_l: xyz_body_rotation=(-1.55928 0.0774926 -0.925897)
          translation=(0.00177745 -0.0451473 0.00151084) quadrant=x radius=0.007998532 length=0.06221082
      WrapSphere PEC23hh_l: translation=(-0.00764304 0.00186633 0.000355488) quadrant=all radius=0.01777451
      WrapCylinder PEC3hum_l: xyz_body_rotation=(-1.44094 0.0561996 1.75196)
          translation=(0.000799852 -0.0489688 0.000355488) quadrant=-x radius=0.007109806 length=0.06221082
      WrapCylinder LAT_TMAJhh_l: xyz_body_rotation=(0.305084 0.018326 -0.686613)
          translation=(-0.0199075 0.00906499 -0.00835406) quadrant=-y radius=0.00622108 length=0.03999267
      WrapSphere LAT_TMAJ2hh_l: xyz_body_rotation=(0.127235 -0.276111 0.0197222)
          translation=(-0.00142196 0.00817625 -0.00462138) quadrant=z radius=0.02666178
      WrapCylinder CORBhum_l: xyz_body_rotation=(1.60832 -0.0959931 0.875283)
          translation=(0.00239957 -0.106825 0.00524348) quadrant=x radius=0.007109806 length=0.0444363
      WrapEllipsoid TRIlonghh_l: xyz_body_rotation=(-3.00162 0.853466 2.57419)
          translation=(-0.00693206 -0.00364378 0.00124421) quadrant=-z dimensions=(0.0311054 0.0177745 0.0177745)
      WrapCylinder TRI_l: xyz_body_rotation=(0.14015 0.00628319 0.154985) translation=(0.00248843 -0.259419 0.0105759)
          quadrant=all radius=0.01421961 length=0.03554904
      WrapEllipsoid ANC_l: xyz_body_rotation=(-0.00750492 0.196699 1.04929)
          translation=(0.0119089 -0.254264 0.000710977) quadrant=-x dimensions=(0.0177745 0.0177745 0.0177745)
      WrapEllipsoid BIClong_l: xyz_body_rotation=(2.00434 1.00164 0.975465)
          translation=(0.00293279 0.00648771 -0.000266615) quadrant=-y dimensions=(0.0222182 0.0177745 0.0177745)
      WrapEllipsoid Elbow_BIC_BRD_l: xyz_body_rotation=(0.128631 -0.137532 0.0307178)
          translation=(0.00168858 -0.256841 0.0124421) quadrant=x dimensions=(0.0133309 0.0133309 0.0888725)
      WrapEllipsoid Elbow_PT_ECRL_l: xyz_body_rotation=(0.161094 0.110828 0.61453)
          translation=(0.00266618 -0.255242 0.00613221) quadrant=x dimensions=(0.015997 0.0222182 0.0311054)
    Body ulna_l: mass=0.5038933 mass_center=(0 -0.0979351 0) inertia_xx=0.00210642 inertia_yy=0.00044875
        inertia_zz=0.00216247 meshes=ulna_l.vtp
      CustomJoint elbow_l: parent_body=humerus_l location_in_parent=(0.005421229 -0.258086 0.01093133) location=(0 0 0)
        Coordinate elbow_flexion_l: motion_type=rotational default_value=6.60002e-9 range=(0 2.268928) clamped=true
        SpatialTransform: axes_held_at_zero=(rotation2 rotation3 translation1 translation2 translation3)
          TransformAxis rotation1: coordinates=elbow_flexion_l axis=(-0.04940001 -0.03660001 0.9981083)
              LinearFunction(coefficients=1 0)
      WrapCylinder PQ2_l: xyz_body_rotation=(-1.39138 -0.0689405 1.52245)
          translation=(-0.00114188 -0.199068 -0.0407271) quadrant=all radius=0.006660976 length=0.009515681
    Body radius_l: mass=0.5038933 mass_center=(0 -0.0979351 0) inertia_xx=0.00210642 inertia_yy=0.00044875
        inertia_zz=0.00216247 meshes=radius_l.vtp
      CustomJoint radioulnar_l: parent_body=ulna_l location_in_parent=(0.0003806317 -0.01094588 -0.0190304)
          location=(0 0 0)
        Coordinate pro_sup_l: motion_type=rotational default_value=-5.384718e-6 range=(-1.570796 1.570796) clamped=true
        SpatialTransform: axes_held_at_zero=(rotation2 rotation3 translation1 translation2 translation3)
          TransformAxis rotation1: coordinates=pro_sup_l axis=(0.01716099 -0.9926656 -0.119668)
              LinearFunction(coefficients=1 0)
      WrapCylinder SUP_l: xyz_body_rotation=(-1.44775 -0.304036 -2.44102)
          translation=(0.00428206 -0.0415835 -0.00561424) quadrant=-x radius=0.007612541 length=0.03806271
      WrapTorus ECU_l: xyz_body_rotation=(0.986635 0.148877 0.222704) translation=(-0.0155105 -0.229994 -0.0332097)
          quadrant=all inner_radius=0.00570941 outer_radius=0.008564106
      WrapCylinder PQ1_l: xyz_body_rotation=(1.60762 0.0127409 -2.69025) translation=(0.0267391 -0.188982 -0.0274052)
          quadrant=all radius=0.009515681 length=0.009515681
    Body lunate_l: mass=0.02366998 mass_center=(0 0 0) inertia_xx=6.451e-5 inertia_yy=1.29505e-5 inertia_zz=5.861e-5
        meshes=lunate_l.vtp
      CustomJoint radiocarpal_l: parent_body=radius_l location_in_parent=(0.01712822 -0.2302794 -0.0237892)
          location=(0 0 0)
        Coordinate deviation_l: motion_type=rotational default_value=-2.523199e-6 range=(-0.1745329 0.4363323)
            clamped=true
        Coordinate flexion_l: motion_type=rotational default_value=-3.947813e-7 range=(-1.22173 1.22173) clamped=true
        SpatialTransform: axes_held_at_zero=(rotation3 translation1 translation2 translation3)
          TransformAxis rotation1: coordinates=deviation_l axis=(0.819064 0.135611 -0.557444)
            SimmSpline: x=(-0.174533 0 0.436332) y=(-0.174533 0 0.436332)
          TransformAxis rotation2: coordinates=flexion_l axis=(-0.9564267 0.2522069 0.147104)
            SimmSpline: x=(-1.5708 1.5708) y=(-0.785398 0.785398)
      WrapEllipsoid Extensor_ellipse_l: xyz_body_rotation=(0.250804 -0.285536 0.232827)
          translation=(0.000776067 -0.0149669 -0.00521071) quadrant=-z dimensions=(0.055433 0.0221732 0.0144125)
      WrapTorus ECRL_l: xyz_body_rotation=(-1.53833 -0.234398 0.731118) translation=(0.0246123 -0.0106431 -0.0230601)
          quadrant=all inner_radius=0.008869291 outer_radius=0.01773857
      WrapTorus ECRB_l: xyz_body_rotation=(-1.31266 0.11781 -0.116239) translation=(0.0139691 -0.0105322 -0.0206212)
          quadrant=all inner_radius=0.008869291 outer_radius=0.01108661
      WrapTorus FCR_l: xyz_body_rotation=(1.55596 0.15324 -0.100007) translation=(0.00354771 -0.00498898 0.0210646)
          quadrant=all inner_radius=0.001108656 outer_radius=0.002771656
      WrapTorus FCU_l: xyz_body_rotation=(1.57376 0.0797616 0.39235) translation=(-0.0136365 -0.0137473 0.0189581)
          quadrant=all inner_radius=0.007538891 outer_radius=0.008869291
      WrapEllipsoid PL_l: xyz_body_rotation=(0.0315905 -0.0996583 0.0633554)
          translation=(0.00631936 -0.0199559 0.00454551) quadrant=z dimensions=(0.0277165 0.0155212 0.0133039)
      WrapEllipsoid FDS_l: xyz_body_rotation=(-0.00837758 0.0816814 -0.0171042)
          translation=(0.00133039 -0.00631936 0.0003326) quadrant=z dimensions=(0.0277165 0.0144125 0.0133039)
      WrapEllipsoid FDP_l: xyz_body_rotation=(1.46747 0.194604 0.121824)
          translation=(-0.00243905 -0.00764976 -0.00354771) quadrant=y dimensions=(0.0277165 0.0144125 0.0133039)
      WrapTorus EDCL_l: xyz_body_rotation=(-2.36318 -0.193033 -0.26913) translation=(-0.0141909 -0.0147452 -0.0164082)
          quadrant=all inner_radius=0.008869291 outer_radius=0.01330394
      WrapTorus EDCR_l: xyz_body_rotation=(-1.98392 -0.100531 0.523075) translation=(-0.0108649 -0.0151886 -0.0184037)
          quadrant=all inner_radius=0.009977948 outer_radius=0.01219527
      WrapTorus EDCM_l: xyz_body_rotation=(-1.99317 -0.19792 0.368264) translation=(-0.000776067 -0.0129713 -0.0211754)
          quadrant=all inner_radius=0.009977948 outer_radius=0.01330394
      WrapTorus EDCI_l: xyz_body_rotation=(-1.69768 -0.0897099 0.00767945)
          translation=(0.00997791 -0.016519 -0.0233927) quadrant=all inner_radius=0.009977948 outer_radius=0.01330394
      WrapEllipsoid EDM_l: xyz_body_rotation=(-2.9627 -0.159349 0.117984)
          translation=(-0.0185147 -0.00243905 -0.00532157) quadrant=z dimensions=(0.0199559 0.0155212 0.00886929)
      WrapEllipsoid FPL_l: xyz_body_rotation=(0.16633 0.082205 -0.0659735)
          translation=(0.0188473 -0.0277165 0.00365858) quadrant=z dimensions=(0.0177386 0.0110867 0.0110867)
    Body scaphoid_l: mass=0.02366998 mass_center=(0 0 0) inertia_xx=6.451e-5 inertia_yy=1.29505e-5 inertia_zz=5.861e-5
        meshes=scaphoid_l.vtp
      WeldJoint lun_scaph_l: parent_body=lunate_l location_in_parent=(0.01368642 -0.004949064 0.001390262)
          location=(0 0 0)
    Body pisiform_l: mass=0.02366998 mass_center=(0 0 0) inertia_xx=6.451e-5 inertia_yy=1.29505e-5 inertia_zz=5.861e-5
        meshes=pisiform_l.vtp
      WeldJoint lun_pis_l: parent_body=lunate_l location_in_parent=(-0.01484275 -0.01096022 0.01174405)
          location=(0 0 0)
    Body triquetrum_l: mass=0.02366998 mass_center=(0 0 0) inertia_xx=6.451e-5 inertia_yy=1.29505e-5
        inertia_zz=5.861e-5 meshes=triquetrum_l.vtp
      WeldJoint lun_triq_l: parent_body=lunate_l location_in_parent=(-0.0119558 -0.008313853 0.001429063)
          location=(0 0 0)
    Body capitate_l: mass=0.02366998 mass_center=(0 0 0) inertia_xx=6.451e-5 inertia_yy=1.29505e-5 inertia_zz=5.861e-5
        meshes=capitate_l.vtp
      CustomJoint proximal_distal_l: parent_body=lunate_l location_in_parent=(0.004425777 -0.01668978 -0.002579854)
          location=(0 0 0)
        Coordinate proximal_distal_r1_l: motion_type=rotational default_value=-3.424385e-6 range=(-99999.9 99999.9)
            clamped=false
        Coordinate proximal_distal_r3_l: motion_type=rotational default_value=-1.974022e-7 range=(-99999.9 99999.9)
            clamped=false
        SpatialTransform: axes_held_at_zero=(rotation3 translation1 translation2 translation3)
          TransformAxis rotation1: coordinates=proximal_distal_r1_l axis=(-0.8991357 0.3490529 -0.2640399)
              LinearFunction(coefficients=1 0)
          TransformAxis rotation2: coordinates=proximal_distal_r3_l axis=(-0.9971185 -0.01069999 -0.07510096)
              LinearFunction(coefficients=1 0)
    Body trapezium_l: mass=0.02366998 mass_center=(0 0 0) inertia_xx=6.451e-5 inertia_yy=1.29505e-5 inertia_zz=5.861e-5
        meshes=trapezium_l.vtp
      WeldJoint cap_trpzm_l: parent_body=capitate_l location_in_parent=(0.01695475 -0.005065475 0.01142808)
          location=(0 0 0)
    Body trapezoid_l: mass=0.02366998 mass_center=(0 0 0) inertia_xx=6.451e-5 inertia_yy=1.29505e-5 inertia_zz=5.861e-5
        meshes=trapezoid_l.vtp
      WeldJoint cap_trpzd_l: parent_body=capitate_l location_in_parent=(0.01013648 -0.004503377 0.002731741)
          location=(0 0 0)
    Body hamate_l: mass=0.02366998 mass_center=(0 0 0) inertia_xx=6.451e-5 inertia_yy=1.29505e-5 inertia_zz=5.861e-5
        meshes=hamate_l.vtp
      WeldJoint cap_ham_l: parent_body=capitate_l location_in_parent=(-0.0121609 -0.002766112 0.0008314999)
          location=(0 0 0)
    Body firstmc1_l: mass=0.02366998 mass_center=(0 0 0) inertia_xx=6.451e-5 inertia_yy=1.29505e-5 inertia_zz=5.861e-5
      CustomJoint CMC1a_l: parent_body=trapezium_l location_in_parent=(0 0 0) location=(0 0 0)
        Coordinate cmc_flexion_l: motion_type=rotational default_value=0 range=(-0.2617994 0.7853982) clamped=true
            locked=true
        SpatialTransform: axes_held_at_zero=(rotation2 rotation3 translation1 translation2 translation3)
          TransformAxis rotation1: coordinates=cmc_flexion_l axis=(0.04239899 0.6652858 0.7453838)
              LinearFunction(coefficients=1 0)
      WrapTorus APL_l: xyz_body_rotation=(1.60989 -0.247837 -0.0301942) translation=(0.00909103 0.00254992 0.0111974)
          active=false quadrant=all inner_radius=0.004434646 outer_radius=0.008869291
    Body firstmc_l: mass=0.02366998 mass_center=(0 0 0) inertia_xx=6.451e-5 inertia_yy=1.29505e-5 inertia_zz=5.861e-5
        meshes=1mc_l.vtp
      CustomJoint CMC1b_l: parent_body=firstmc1_l location_in_parent=(0.007982358 -0.005986769 0.002771656)
          location=(0 0 0)
        Coordinate cmc_abduction_l: motion_type=rotational default_value=0 range=(-0.4363323 0.4363323) clamped=true
            locked=true
        SpatialTransform: axes_held_at_zero=(rotation2 rotation3 translation1 translation2 translation3)
          TransformAxis rotation1: coordinates=cmc_abduction_l axis=(-0.495557 -0.731736 0.467959)
              LinearFunction(coefficients=1 0)
      WrapCylinder MPthumb_l: xyz_body_rotation=(-0.321315 -0.11013 -0.834791)
          translation=(0.0196234 -0.0338141 0.0158539) quadrant=all radius=0.009423614 length=0.02217322
    Body secondmc_l: mass=0.02366998 mass_center=(0 0 0) inertia_xx=6.451e-5 inertia_yy=1.29505e-5 inertia_zz=5.861e-5
        meshes=2mc_l.vtp
      WeldJoint CMC2_l: parent_body=capitate_l location_in_parent=(0.01628068 -0.04170782 -0.005578778)
          location=(0 0 0)
      WrapEllipsoid 2ndmcp_l: xyz_body_rotation=(-1.48667 1.29661 2.43072) translation=(0.0065411 -0.0337033 0.0006652)
          quadrant=-x dimensions=(0.0055433 0.0055433 0.0332598)
    Body thirdmc_l: mass=0.02366998 mass_center=(0 0 0) inertia_xx=6.451e-5 inertia_yy=1.29505e-5 inertia_zz=5.861e-5
        meshes=3mc_l.vtp
      WeldJoint CMC3_l: parent_body=capitate_l location_in_parent=(0.0005288313 -0.04350275 -0.008178589)
          location=(0 0 0)
    Body fourthmc_l: mass=0.02366998 mass_center=(0 0 0) inertia_xx=6.451e-5 inertia_yy=1.29505e-5 inertia_zz=5.861e-5
        meshes=4mc_l.vtp
      WeldJoint CMC4_l: parent_body=capitate_l location_in_parent=(-0.01335493 -0.04492184 -0.003894726)
          location=(0 0 0)
    Body fifthmc_l: mass=0.02366998 mass_center=(0 0 0) inertia_xx=6.451e-5 inertia_yy=1.29505e-5 inertia_zz=5.861e-5
        meshes=5mc_l.vtp
      WeldJoint CMC5_l: parent_body=capitate_l location_in_parent=(-0.02427524 -0.03845169 0.004676337)
          location=(0 0 0)
    Body proximal_thumb_l: mass=0.02366998 mass_center=(0 0 0) inertia_xx=6.451e-5 inertia_yy=1.29505e-5
        inertia_zz=5.861e-5 meshes=thumbprox_l.vtp
      CustomJoint MCP_l: parent_body=firstmc_l location_in_parent=(0.01829291 -0.0323729 0.01407999) location=(0 0 0)
        Coordinate mp_flexion_l: motion_type=rotational default_value=7.846843e-10 range=(-0.7853982 0.6981317)
            clamped=true locked=true
        SpatialTransform: axes_held_at_zero=(rotation2 rotation3 translation1 translation2 translation3)
          TransformAxis rotation1: coordinates=mp_flexion_l axis=(0.084295 0.203488 0.975442)
              LinearFunction(coefficients=1 0)
      WrapCylinder IPthumb_l: xyz_body_rotation=(-0.304734 -0.0129154 0.0879646)
          translation=(0.0134147 -0.0334816 0.0106431) quadrant=-x radius=0.004988979 length=0.01108661
    Body distal_thumb_l: mass=0.02366998 mass_center=(0 0 0) inertia_xx=6.451e-5 inertia_yy=1.29505e-5
        inertia_zz=5.861e-5 meshes=thumbdist_l.vtp
      CustomJoint IP_l: parent_body=proximal_thumb_l location_in_parent=(0.01552125 -0.02871432 0.01119748)
          location=(0 0 0)
        Coordinate ip_flexion_l: motion_type=rotational default_value=7.970069e-10 range=(-1.308997 0.4363323)
            clamped=true locked=true
        SpatialTransform: axes_held_at_zero=(rotation2 rotation3 translation1 translation2 translation3)
          TransformAxis rotation1: coordinates=ip_flexion_l axis=(0.05010201 0.4796231 0.8760431)
              LinearFunction(coefficients=1 0)
    Body 2proxph_l: mass=0.02366998 mass_center=(0 0 0) inertia_xx=6.451e-5 inertia_yy=1.29505e-5 inertia_zz=5.861e-5
        meshes=2proxph_l.vtp
      CustomJoint 2MCP_l: parent_body=secondmc_l location_in_parent=(0.003881427 -0.03131191 -0.004013356)
          location=(0 0 0)
        Coordinate 2mcp_flexion_l: motion_type=rotational default_value=-1.205391e-7 range=(-0.8726646 1.570796)
            clamped=true locked=true
        Coordinate 2mcp_abduction_l: motion_type=rotational default_value=2.474291e-9 range=(-0.2617994 0.2617994)
            clamped=true locked=true
        SpatialTransform: axes_held_at_zero=(rotation3 translation1 translation2 translation3)
          TransformAxis rotation1: coordinates=2mcp_flexion_l axis=(-0.9975061 0.03949601 0.05849401)
              LinearFunction(coefficients=1 0)
          TransformAxis rotation2: coordinates=2mcp_abduction_l axis=(0.05499898 -0.08589897 0.9947846)
              LinearFunction(coefficients=1 0)
      WrapCylinder Secondpm_l: xyz_body_rotation=(-0.741939 1.47393 0.709651)
          translation=(0.00831496 -0.0451225 -0.00676284) quadrant=all radius=0.004434646 length=0.01108661
    Body 2midph_l: mass=0.02366998 mass_center=(0 0 0) inertia_xx=6.451e-5 inertia_yy=1.29505e-5 inertia_zz=5.861e-5
        meshes=2midph_l.vtp
      CustomJoint 2prox-midph_l: parent_body=2proxph_l location_in_parent=(0.008333801 -0.04575777 -0.008122051)
          location=(0 0 0)
        Coordinate 2pm_flexion_l: motion_type=rotational default_value=0 range=(0 2.094395) clamped=true locked=true
        SpatialTransform: axes_held_at_zero=(rotation2 rotation3 translation1 translation2 translation3)
          TransformAxis rotation1: coordinates=2pm_flexion_l axis=(-0.9603449 -0.040998 -0.275784)
              LinearFunction(coefficients=1 0)
      WrapCylinder Secondmd_l: xyz_body_rotation=(-0.501782 1.41302 0.647343)
          translation=(0.00399117 -0.0269404 -0.0003326) quadrant=x radius=0.003325979 length=0.01108661
    Body 2distph_l: mass=0.02366998 mass_center=(0 0 0) inertia_xx=6.451e-5 inertia_yy=1.29505e-5 inertia_zz=5.861e-5
        meshes=2distph_l.vtp
      CustomJoint 2mid-distph_l: parent_body=2midph_l location_in_parent=(0.00369517 -0.02759235 -0.001352567)
          location=(0 0 0)
        Coordinate 2md_flexion_l: motion_type=rotational default_value=0 range=(0 1.570796) clamped=true locked=true
        SpatialTransform: axes_held_at_zero=(rotation2 rotation3 translation1 translation2 translation3)
          TransformAxis rotation1: coordinates=2md_flexion_l axis=(-0.9789773 -0.07690602 -0.1889151)
              LinearFunction(coefficients=1 0)
    Body 3proxph_l: mass=0.02366998 mass_center=(0 0 0) inertia_xx=6.451e-5 inertia_yy=1.29505e-5 inertia_zz=5.861e-5
        meshes=3proxph_l.vtp
      WeldJoint 3MCP_l: parent_body=thirdmc_l location_in_parent=(0.0002660779 -0.0291467 -0.001971203)
          location=(0 0 0)
    Body 3midph_l: mass=0.02366998 mass_center=(0 0 0) inertia_xx=6.451e-5 inertia_yy=1.29505e-5 inertia_zz=5.861e-5
        meshes=3midph_l.vtp
      WeldJoint 3prox-midph_l: parent_body=3proxph_l location_in_parent=(0.00182929 -0.04901501 -0.006906958)
          location=(0 0 0)
    Body 3distph_l: mass=0.02366998 mass_center=(0 0 0) inertia_xx=6.451e-5 inertia_yy=1.29505e-5 inertia_zz=5.861e-5
        meshes=3distph_l.vtp
      WeldJoint 3mid-distph_l: parent_body=3midph_l location_in_parent=(0.001513323 -0.03220327 -0.002166319)
          location=(0 0 0)
    Body 4proxph_l: mass=0.02366998 mass_center=(0 0 0) inertia_xx=6.451e-5 inertia_yy=1.29505e-5 inertia_zz=5.861e-5
        meshes=4proxph_l.vtp
      WeldJoint 4MCP_l: parent_body=fourthmc_l location_in_parent=(-0.002028845 -0.02626307 0.000191802)
          location=(0 0 0)
    Body 4midph_l: mass=0.02366998 mass_center=(0 0 0) inertia_xx=6.451e-5 inertia_yy=1.29505e-5 inertia_zz=5.861e-5
        meshes=4midph_l.vtp
      WeldJoint 4prox-midph_l: parent_body=4proxph_l location_in_parent=(-0.003911359 -0.04462915 -0.001491145)
          location=(0 0 0)
    Body 4distph_l: mass=0.02366998 mass_center=(0 0 0) inertia_xx=6.451e-5 inertia_yy=1.29505e-5 inertia_zz=5.861e-5
        meshes=4distph_l.vtp
      WeldJoint 4mid-distph_l: parent_body=4midph_l location_in_parent=(-0.002568765 -0.0274826 -0.0006241799)
          location=(0 0 0)
    Body 5proxph_l: mass=0.02366998 mass_center=(0 0 0) inertia_xx=6.451e-5 inertia_yy=1.29505e-5 inertia_zz=5.861e-5
        meshes=5proxph_l.vtp
      WeldJoint 5MCP_l: parent_body=fifthmc_l location_in_parent=(-0.001770532 -0.02375971 0.00165856) location=(0 0 0)
    Body 5midph_l: mass=0.02366998 mass_center=(0 0 0) inertia_xx=6.451e-5 inertia_yy=1.29505e-5 inertia_zz=5.861e-5
        meshes=5midph_l.vtp
      WeldJoint 5prox-midph_l: parent_body=5proxph_l location_in_parent=(-0.00585262 -0.03942731 0.00319183)
          location=(0 0 0)
    Body 5distph_l: mass=0.02366998 mass_center=(0 0 0) inertia_xx=6.451e-5 inertia_yy=1.29505e-5 inertia_zz=5.861e-5
        meshes=5distph_l.vtp
      WeldJoint 5mid-distph_l: parent_body=5midph_l location_in_parent=(-0.003182961 -0.02292378 0.002486725)
          location=(0 0 0)
    Body bicpt_l: mass=1e-8 mass_center=(0 0 0) inertia_xx=0.0001 inertia_yy=0.0001 inertia_zz=0.0001
      CustomJoint bicpt_l: parent_body=radius_l location_in_parent=(0 0 0) location=(0 0 0)
        Coordinate bicpt_tx_l: motion_type=translational default_value=-9.515676e-5 range=(-99999.9 99999.9)
            clamped=false
        Coordinate bicpt_ty_l: motion_type=translational default_value=-0.02626327 range=(-99999.9 99999.9)
            clamped=false
        Coordinate bicpt_tz_l: motion_type=translational default_value=-0.004091741 range=(-99999.9 99999.9)
            clamped=false
        SpatialTransform: axes_held_at_zero=(rotation1 rotation2 rotation3)
          TransformAxis translation1: coordinates=bicpt_tx_l axis=(1 0 0) LinearFunction(coefficients=1 0)
          TransformAxis translation2: coordinates=bicpt_ty_l axis=(0 1 0) LinearFunction(coefficients=1 0)
          TransformAxis translation3: coordinates=bicpt_tz_l axis=(0 0 -1) LinearFunction(coefficients=1 0)
    Body bicpt2_l: mass=1e-8 mass_center=(0 0 0) inertia_xx=0.0001 inertia_yy=0.0001 inertia_zz=0.0001
      CustomJoint bicpt2_l: parent_body=radius_l location_in_parent=(0 0 0) location=(0 0 0)
        Coordinate bicpt2_tx_l: motion_type=translational default_value=0.01395898 range=(-99999.9 99999.9)
            clamped=false
        Coordinate bicpt2_ty_l: motion_type=translational default_value=-0.009705991 range=(-99999.9 99999.9)
            clamped=false
        Coordinate bicpt2_tz_l: motion_type=translational default_value=-0.01010416 range=(-99999.9 99999.9)
            clamped=false
        SpatialTransform: axes_held_at_zero=(rotation1 rotation2 rotation3)
          TransformAxis translation1: coordinates=bicpt2_tx_l axis=(1 0 0) LinearFunction(coefficients=1 0)
          TransformAxis translation2: coordinates=bicpt2_ty_l axis=(0 1 0) LinearFunction(coefficients=1 0)
          TransformAxis translation3: coordinates=bicpt2_tz_l axis=(0 0 -1) LinearFunction(coefficients=1 0)
    Body ptpt_l: mass=1e-8 mass_center=(0 0 0) inertia_xx=0.0001 inertia_yy=0.0001 inertia_zz=0.0001
      CustomJoint ptpt_l: parent_body=ulna_l location_in_parent=(0 0 0) location=(0 0 0)
        Coordinate ptpt_tx_l: motion_type=translational default_value=0.007184358 range=(-99999.9 99999.9)
            clamped=false
        Coordinate ptpt_ty_l: motion_type=translational default_value=-0.06175673 range=(-99999.9 99999.9)
            clamped=false
        Coordinate ptpt_tz_l: motion_type=translational default_value=-4.755482e-5 range=(-99999.9 99999.9)
            clamped=false
        SpatialTransform: axes_held_at_zero=(rotation1 rotation2 rotation3)
          TransformAxis translation1: coordinates=ptpt_tx_l axis=(1 0 0) LinearFunction(coefficients=1 0)
          TransformAxis translation2: coordinates=ptpt_ty_l axis=(0 1 0) LinearFunction(coefficients=1 0)
          TransformAxis translation3: coordinates=ptpt_tz_l axis=(0 0 -1) LinearFunction(coefficients=1 0)
    Body FCUpt_l: mass=1e-8 mass_center=(0 0 0) inertia_xx=0.0001 inertia_yy=0.0001 inertia_zz=0.0001
      CustomJoint FCUpt_l: parent_body=radius_l location_in_parent=(0 0 0) location=(0 0 0)
        Coordinate FCUpt_tx_l: motion_type=translational default_value=0.003806245 range=(-99999.9 99999.9)
            clamped=false
        Coordinate FCUpt_ty_l: motion_type=translational default_value=-0.1751836 range=(-99999.9 99999.9)
            clamped=false
        Coordinate FCUpt_tz_l: motion_type=translational default_value=0.0004757948 range=(-99999.9 99999.9)
            clamped=false
        SpatialTransform: axes_held_at_zero=(rotation1 rotation2 rotation3)
          TransformAxis translation1: coordinates=FCUpt_tx_l axis=(1 0 0) LinearFunction(coefficients=1 0)
          TransformAxis translation2: coordinates=FCUpt_ty_l axis=(0 1 0) LinearFunction(coefficients=1 0)
          TransformAxis translation3: coordinates=FCUpt_tz_l axis=(0 0 -1) LinearFunction(coefficients=1 0)
    Body EDCpt_l: mass=1e-8 mass_center=(0 0 0) inertia_xx=0.0001 inertia_yy=0.0001 inertia_zz=0.0001
      CustomJoint EDCpt_l: parent_body=radius_l location_in_parent=(0 0 0) location=(0 0 0)
        Coordinate EDCpt_tx_l: motion_type=translational default_value=3.511347e-8 range=(-99999.9 99999.9)
            clamped=false
        Coordinate EDCpt_ty_l: motion_type=translational default_value=-8.290666e-9 range=(-99999.9 99999.9)
            clamped=false
        Coordinate EDCpt_tz_l: motion_type=translational default_value=-4.242902e-9 range=(-99999.9 99999.9)
            clamped=false
        SpatialTransform: axes_held_at_zero=(rotation1 rotation2 rotation3)
          TransformAxis translation1: coordinates=EDCpt_tx_l axis=(1 0 0) LinearFunction(coefficients=1 0)
          TransformAxis translation2: coordinates=EDCpt_ty_l axis=(0 1 0) LinearFunction(coefficients=1 0)
          TransformAxis translation3: coordinates=EDCpt_tz_l axis=(0 0 -1) LinearFunction(coefficients=1 0)
    Body APLpt_l: mass=1e-8 mass_center=(0 0 0) inertia_xx=0.0001 inertia_yy=0.0001 inertia_zz=0.0001
      CustomJoint APLpt_l: parent_body=capitate_l location_in_parent=(0 0 0) location=(0 0 0)
        Coordinate APLpt_tx_l: motion_type=translational default_value=4.478324e-10 range=(-99999.9 99999.9)
            clamped=false
        Coordinate APLpt_ty_l: motion_type=translational default_value=1.79133e-10 range=(-99999.9 99999.9)
            clamped=false
        Coordinate APLpt_tz_l: motion_type=translational default_value=8.956648e-10 range=(-99999.9 99999.9)
            clamped=false
        SpatialTransform: axes_held_at_zero=(rotation1 rotation2 rotation3)
          TransformAxis translation1: coordinates=APLpt_tx_l axis=(1 0 0) LinearFunction(coefficients=1 0)
          TransformAxis translation2: coordinates=APLpt_ty_l axis=(0 1 0) LinearFunction(coefficients=1 0)
          TransformAxis translation3: coordinates=APLpt_tz_l axis=(0 0 -1) LinearFunction(coefficients=1 0)
    Body FPLpt_l: mass=1e-8 mass_center=(0 0 0) inertia_xx=0.0001 inertia_yy=0.0001 inertia_zz=0.0001
      CustomJoint FPLpt_l: parent_body=capitate_l location_in_parent=(0 0 0) location=(0 0 0)
        Coordinate FPLpt_tx_l: motion_type=translational default_value=5.732254e-10 range=(-99999.9 99999.9)
            clamped=false
        Coordinate FPLpt_ty_l: motion_type=translational default_value=1.719676e-9 range=(-99999.9 99999.9)
            clamped=false
        Coordinate FPLpt_tz_l: motion_type=translational default_value=9.673179e-10 range=(-99999.9 99999.9)
            clamped=false
        SpatialTransform: axes_held_at_zero=(rotation1 rotation2 rotation3)
          TransformAxis translation1: coordinates=FPLpt_tx_l axis=(1 0 0) LinearFunction(coefficients=1 0)
          TransformAxis translation2: coordinates=FPLpt_ty_l axis=(0 1 0) LinearFunction(coefficients=1 0)
          TransformAxis translation3: coordinates=FPLpt_tz_l axis=(0 0 -1) LinearFunction(coefficients=1 0)
    Body FPLpt2_l: mass=1e-8 mass_center=(0 0 0) inertia_xx=0.0001 inertia_yy=0.0001 inertia_zz=0.0001
      CustomJoint FPLpt2_l: parent_body=capitate_l location_in_parent=(0 0 0) location=(0 0 0)
        Coordinate FPLpt2_tx_l: motion_type=translational default_value=0 range=(-99999.9 99999.9) clamped=false
        Coordinate FPLpt2_ty_l: motion_type=translational default_value=0 range=(-99999.9 99999.9) clamped=false
        Coordinate FPLpt2_tz_l: motion_type=translational default_value=0 range=(-99999.9 99999.9) clamped=false
        SpatialTransform: axes_held_at_zero=(rotation1 rotation2 rotation3)
          TransformAxis translation1: coordinates=FPLpt2_tx_l axis=(1 0 0) LinearFunction(coefficients=1 0)
          TransformAxis translation2: coordinates=FPLpt2_ty_l axis=(0 1 0) LinearFunction(coefficients=1 0)
          TransformAxis translation3: coordinates=FPLpt2_tz_l axis=(0 0 -1) LinearFunction(coefficients=1 0)
    Body PEC1pt2_l: mass=1e-8 mass_center=(0 0 0) inertia_xx=0.0001 inertia_yy=0.0001 inertia_zz=0.0001
      CustomJoint PEC1pt2_l: parent_body=humerus_l location_in_parent=(0 0 0) location=(0 0 0)
        Coordinate PEC1pt2_tx_l: motion_type=translational default_value=6.432497e-8 range=(-99999.9 99999.9)
            clamped=false
        Coordinate PEC1pt2_ty_l: motion_type=translational default_value=2.256825e-7 range=(-99999.9 99999.9)
            clamped=false
        Coordinate PEC1pt2_tz_l: motion_type=translational default_value=1.569965e-7 range=(-99999.9 99999.9)
            clamped=false
        SpatialTransform: axes_held_at_zero=(rotation1 rotation2 rotation3)
          TransformAxis translation1: coordinates=PEC1pt2_tx_l axis=(1 0 0) LinearFunction(coefficients=1 0)
          TransformAxis translation2: coordinates=PEC1pt2_ty_l axis=(0 1 0) LinearFunction(coefficients=1 0)
          TransformAxis translation3: coordinates=PEC1pt2_tz_l axis=(0 0 -1) LinearFunction(coefficients=1 0)
    Body PEC1pt3_l: mass=1e-8 mass_center=(0 0 0) inertia_xx=0.0001 inertia_yy=0.0001 inertia_zz=0.0001
      CustomJoint PEC1pt3_l: parent_body=thorax location_in_parent=(0 0 0) location=(0 0 0)
        Coordinate PEC1pt3_tx_l: motion_type=translational default_value=-2.162038e-7 range=(-99999.9 99999.9)
            clamped=false
        Coordinate PEC1pt3_ty_l: motion_type=translational default_value=5.220258e-7 range=(-99999.9 99999.9)
            clamped=false
        Coordinate PEC1pt3_tz_l: motion_type=translational default_value=-4.951403e-7 range=(-99999.9 99999.9)
            clamped=false
        SpatialTransform: axes_held_at_zero=(rotation1 rotation2 rotation3)
          TransformAxis translation1: coordinates=PEC1pt3_tx_l axis=(1 0 0) LinearFunction(coefficients=1 0)
          TransformAxis translation2: coordinates=PEC1pt3_ty_l axis=(0 1 0) LinearFunction(coefficients=1 0)
          TransformAxis translation3: coordinates=PEC1pt3_tz_l axis=(0 0 -1) LinearFunction(coefficients=1 0)
    Body PEC2pt2_l: mass=1e-8 mass_center=(0 0 0) inertia_xx=0.0001 inertia_yy=0.0001 inertia_zz=0.0001
      CustomJoint PEC2pt2_l: parent_body=humerus_l location_in_parent=(0 0 0) location=(0 0 0)
        Coordinate PEC2pt2_tx_l: motion_type=translational default_value=6.432497e-8 range=(-99999.9 99999.9)
            clamped=false
        Coordinate PEC2pt2_ty_l: motion_type=translational default_value=2.256825e-7 range=(-99999.9 99999.9)
            clamped=false
        Coordinate PEC2pt2_tz_l: motion_type=translational default_value=1.569965e-7 range=(-99999.9 99999.9)
            clamped=false
        SpatialTransform: axes_held_at_zero=(rotation1 rotation2 rotation3)
          TransformAxis translation1: coordinates=PEC2pt2_tx_l axis=(1 0 0) LinearFunction(coefficients=1 0)
          TransformAxis translation2: coordinates=PEC2pt2_ty_l axis=(0 1 0) LinearFunction(coefficients=1 0)
          TransformAxis translation3: coordinates=PEC2pt2_tz_l axis=(0 0 -1) LinearFunction(coefficients=1 0)
    Body PEC2pt3_l: mass=1e-8 mass_center=(0 0 0) inertia_xx=0.0001 inertia_yy=0.0001 inertia_zz=0.0001
      CustomJoint PEC2pt3_l: parent_body=thorax location_in_parent=(0 0 0) location=(0 0 0)
        Coordinate PEC2pt3_tx_l: motion_type=translational default_value=1.456295e-8 range=(-99999.9 99999.9)
            clamped=false
        Coordinate PEC2pt3_ty_l: motion_type=translational default_value=4.839381e-7 range=(-99999.9 99999.9)
            clamped=false
        Coordinate PEC2pt3_tz_l: motion_type=translational default_value=-2.542915e-7 range=(-99999.9 99999.9)
            clamped=false
        SpatialTransform: axes_held_at_zero=(rotation1 rotation2 rotation3)
          TransformAxis translation1: coordinates=PEC2pt3_tx_l axis=(1 0 0) LinearFunction(coefficients=1 0)
          TransformAxis translation2: coordinates=PEC2pt3_ty_l axis=(0 1 0) LinearFunction(coefficients=1 0)
          TransformAxis translation3: coordinates=PEC2pt3_tz_l axis=(0 0 -1) LinearFunction(coefficients=1 0)
    Body PEC3pt2_l: mass=1e-8 mass_center=(0 0 0) inertia_xx=0.0001 inertia_yy=0.0001 inertia_zz=0.0001
      CustomJoint PEC3pt2_l: parent_body=humerus_l location_in_parent=(0 0 0) location=(0 0 0)
        Coordinate PEC3pt2_tx_l: motion_type=translational default_value=1.291493e-7 range=(-99999.9 99999.9)
            clamped=false
        Coordinate PEC3pt2_ty_l: motion_type=translational default_value=1.254992e-7 range=(-99999.9 99999.9)
            clamped=false
        Coordinate PEC3pt2_tz_l: motion_type=translational default_value=6.924464e-7 range=(-99999.9 99999.9)
            clamped=false
        SpatialTransform: axes_held_at_zero=(rotation1 rotation2 rotation3)
          TransformAxis translation1: coordinates=PEC3pt2_tx_l axis=(1 0 0) LinearFunction(coefficients=1 0)
          TransformAxis translation2: coordinates=PEC3pt2_ty_l axis=(0 1 0) LinearFunction(coefficients=1 0)
          TransformAxis translation3: coordinates=PEC3pt2_tz_l axis=(0 0 -1) LinearFunction(coefficients=1 0)
    Body PEC3pt3_l: mass=1e-8 mass_center=(0 0 0) inertia_xx=0.0001 inertia_yy=0.0001 inertia_zz=0.0001
      CustomJoint PEC3pt3_l: parent_body=thorax location_in_parent=(0 0 0) location=(0 0 0)
        Coordinate PEC3pt3_tx_l: motion_type=translational default_value=0 range=(-99999.9 99999.9) clamped=false
        Coordinate PEC3pt3_ty_l: motion_type=translational default_value=0.0002089073 range=(-99999.9 99999.9)
            clamped=false
        Coordinate PEC3pt3_tz_l: motion_type=translational default_value=0 range=(-99999.9 99999.9) clamped=false
        SpatialTransform: axes_held_at_zero=(rotation1 rotation2 rotation3)
          TransformAxis translation1: coordinates=PEC3pt3_tx_l axis=(1 0 0) LinearFunction(coefficients=1 0)
          TransformAxis translation2: coordinates=PEC3pt3_ty_l axis=(0 1 0) LinearFunction(coefficients=1 0)
          TransformAxis translation3: coordinates=PEC3pt3_tz_l axis=(0 0 -1) LinearFunction(coefficients=1 0)
    Body DELT2pt2a_l: mass=1e-8 mass_center=(0 0 0) inertia_xx=0.0001 inertia_yy=0.0001 inertia_zz=0.0001
      CustomJoint DELT2pt2a_l: parent_body=humerus_l location_in_parent=(0 0 0) location=(0 0 0)
        Coordinate DELT2pt2a_tx_l: motion_type=translational default_value=-1.842529e-7 range=(-99999.9 99999.9)
            clamped=false
        Coordinate DELT2pt2a_ty_l: motion_type=translational default_value=-8.514881e-7 range=(-99999.9 99999.9)
            clamped=false
        Coordinate DELT2pt2a_tz_l: motion_type=translational default_value=4.575245e-9 range=(-99999.9 99999.9)
            clamped=false
        SpatialTransform: axes_held_at_zero=(rotation1 rotation2 rotation3)
          TransformAxis translation1: coordinates=DELT2pt2a_tx_l axis=(1 0 0) LinearFunction(coefficients=1 0)
          TransformAxis translation2: coordinates=DELT2pt2a_ty_l axis=(0 1 0) LinearFunction(coefficients=1 0)
          TransformAxis translation3: coordinates=DELT2pt2a_tz_l axis=(0 0 -1) LinearFunction(coefficients=1 0)
    Body DELT2pt2_l: mass=1e-8 mass_center=(0 0 0) inertia_xx=0.0001 inertia_yy=0.0001 inertia_zz=0.0001
      CustomJoint DELT2pt2_l: parent_body=DELT2pt2a_l location_in_parent=(0 0 0) location=(0 0 0)
        Coordinate DELT2pt2_tx_l: motion_type=translational default_value=-0.0004274143 range=(-99999.9 99999.9)
            clamped=false
        Coordinate DELT2pt2_ty_l: motion_type=translational default_value=-1.381005e-9 range=(-99999.9 99999.9)
            clamped=false
        Coordinate DELT2pt2_tz_l: motion_type=translational default_value=-8.666204e-9 range=(-99999.9 99999.9)
            clamped=false
        SpatialTransform: axes_held_at_zero=(rotation1 rotation2 rotation3)
          TransformAxis translation1: coordinates=DELT2pt2_tx_l axis=(1 0 0) LinearFunction(coefficients=1 0)
          TransformAxis translation2: coordinates=DELT2pt2_ty_l axis=(0 1 0) LinearFunction(coefficients=1 0)
          TransformAxis translation3: coordinates=DELT2pt2_tz_l axis=(0 0 -1) LinearFunction(coefficients=1 0)
    Body LAT1pt2_l: mass=1e-8 mass_center=(0 0 0) inertia_xx=0.0001 inertia_yy=0.0001 inertia_zz=0.0001
      CustomJoint LAT1pt2_l: parent_body=scapula_l location_in_parent=(0 0 0) location=(0 0 0)
        Coordinate LAT1pt2_tx_l: motion_type=translational default_value=-2.352477e-8 range=(-99999.9 99999.9)
            clamped=false
        Coordinate LAT1pt2_ty_l: motion_type=translational default_value=3.943199e-7 range=(-99999.9 99999.9)
            clamped=false
        Coordinate LAT1pt2_tz_l: motion_type=translational default_value=-1.613127e-7 range=(-99999.9 99999.9)
            clamped=false
        SpatialTransform: axes_held_at_zero=(rotation1 rotation2 rotation3)
          TransformAxis translation1: coordinates=LAT1pt2_tx_l axis=(1 0 0) LinearFunction(coefficients=1 0)
          TransformAxis translation2: coordinates=LAT1pt2_ty_l axis=(0 1 0) LinearFunction(coefficients=1 0)
          TransformAxis translation3: coordinates=LAT1pt2_tz_l axis=(0 0 -1) LinearFunction(coefficients=1 0)
    Body LAT1pt3_l: mass=1e-8 mass_center=(0 0 0) inertia_xx=0.0001 inertia_yy=0.0001 inertia_zz=0.0001
      CustomJoint LAT1pt3_l: parent_body=scapula_l location_in_parent=(0 0 0) location=(0 0 0)
        Coordinate LAT1pt3_tx_l: motion_type=translational default_value=6.497317e-8 range=(-99999.9 99999.9)
            clamped=false
        Coordinate LAT1pt3_ty_l: motion_type=translational default_value=5.690753e-7 range=(-99999.9 99999.9)
            clamped=false
        Coordinate LAT1pt3_tz_l: motion_type=translational default_value=-4.704953e-7 range=(-99999.9 99999.9)
            clamped=false
        SpatialTransform: axes_held_at_zero=(rotation1 rotation2 rotation3)
          TransformAxis translation1: coordinates=LAT1pt3_tx_l axis=(1 0 0) LinearFunction(coefficients=1 0)
          TransformAxis translation2: coordinates=LAT1pt3_ty_l axis=(0 1 0) LinearFunction(coefficients=1 0)
          TransformAxis translation3: coordinates=LAT1pt3_tz_l axis=(0 0 -1) LinearFunction(coefficients=1 0)
    Body LAT2pt2_l: mass=1e-8 mass_center=(0 0 0) inertia_xx=0.0001 inertia_yy=0.0001 inertia_zz=0.0001
      CustomJoint LAT2pt2_l: parent_body=scapula_l location_in_parent=(0 0 0) location=(0 0 0)
        Coordinate LAT2pt2_tx_l: motion_type=translational default_value=-1.57952e-7 range=(-99999.9 99999.9)
            clamped=false
        Coordinate LAT2pt2_ty_l: motion_type=translational default_value=3.416692e-7 range=(-99999.9 99999.9)
            clamped=false
        Coordinate LAT2pt2_tz_l: motion_type=translational default_value=-1.445093e-7 range=(-99999.9 99999.9)
            clamped=false
        SpatialTransform: axes_held_at_zero=(rotation1 rotation2 rotation3)
          TransformAxis translation1: coordinates=LAT2pt2_tx_l axis=(1 0 0) LinearFunction(coefficients=1 0)
          TransformAxis translation2: coordinates=LAT2pt2_ty_l axis=(0 1 0) LinearFunction(coefficients=1 0)
          TransformAxis translation3: coordinates=LAT2pt2_tz_l axis=(0 0 -1) LinearFunction(coefficients=1 0)
    Body LAT2pt3_l: mass=1e-8 mass_center=(0 0 0) inertia_xx=0.0001 inertia_yy=0.0001 inertia_zz=0.0001
      CustomJoint LAT2pt3_l: parent_body=scapula_l location_in_parent=(0 0 0) location=(0 0 0)
        Coordinate LAT2pt3_tx_l: motion_type=translational default_value=-3.293467e-7 range=(-99999.9 99999.9)
            clamped=false
        Coordinate LAT2pt3_ty_l: motion_type=translational default_value=7.214262e-7 range=(-99999.9 99999.9)
            clamped=false
        Coordinate LAT2pt3_tz_l: motion_type=translational default_value=-8.076837e-7 range=(-99999.9 99999.9)
            clamped=false
        SpatialTransform: axes_held_at_zero=(rotation1 rotation2 rotation3)
          TransformAxis translation1: coordinates=LAT2pt3_tx_l axis=(1 0 0) LinearFunction(coefficients=1 0)
          TransformAxis translation2: coordinates=LAT2pt3_ty_l axis=(0 1 0) LinearFunction(coefficients=1 0)
          TransformAxis translation3: coordinates=LAT2pt3_tz_l axis=(0 0 -1) LinearFunction(coefficients=1 0)
    Body LAT3pt2_l: mass=1e-8 mass_center=(0 0 0) inertia_xx=0.0001 inertia_yy=0.0001 inertia_zz=0.0001
      CustomJoint LAT3pt2_l: parent_body=scapula_l location_in_parent=(0 0 0) location=(0 0 0)
        Coordinate LAT3pt2_tx_l: motion_type=translational default_value=-6.183653e-7 range=(-99999.9 99999.9)
            clamped=false
        Coordinate LAT3pt2_ty_l: motion_type=translational default_value=3.819974e-7 range=(-99999.9 99999.9)
            clamped=false
        Coordinate LAT3pt2_tz_l: motion_type=translational default_value=-1.937993e-7 range=(-99999.9 99999.9)
            clamped=false
        SpatialTransform: axes_held_at_zero=(rotation1 rotation2 rotation3)
          TransformAxis translation1: coordinates=LAT3pt2_tx_l axis=(1 0 0) LinearFunction(coefficients=1 0)
          TransformAxis translation2: coordinates=LAT3pt2_ty_l axis=(0 1 0) LinearFunction(coefficients=1 0)
          TransformAxis translation3: coordinates=LAT3pt2_tz_l axis=(0 0 -1) LinearFunction(coefficients=1 0)
    Body LAT3pt3_l: mass=1e-8 mass_center=(0 0 0) inertia_xx=0.0001 inertia_yy=0.0001 inertia_zz=0.0001
      CustomJoint LAT3pt3_l: parent_body=scapula_l location_in_parent=(0 0 0) location=(0 0 0)
        Coordinate LAT3pt3_tx_l: motion_type=translational default_value=-4.100031e-7 range=(-99999.9 99999.9)
            clamped=false
        Coordinate LAT3pt3_ty_l: motion_type=translational default_value=8.334489e-7 range=(-99999.9 99999.9)
            clamped=false
        Coordinate LAT3pt3_tz_l: motion_type=translational default_value=-1.009325e-6 range=(-99999.9 99999.9)
            clamped=false
        SpatialTransform: axes_held_at_zero=(rotation1 rotation2 rotation3)
          TransformAxis translation1: coordinates=LAT3pt3_tx_l axis=(1 0 0) LinearFunction(coefficients=1 0)
          TransformAxis translation2: coordinates=LAT3pt3_ty_l axis=(0 1 0) LinearFunction(coefficients=1 0)
          TransformAxis translation3: coordinates=LAT3pt3_tz_l axis=(0 0 -1) LinearFunction(coefficients=1 0)
  ConstraintSet:
    CoordinateCouplerConstraint sternoclavicular_r2_con: independent_coordinate_names=shoulder_elv
        dependent_coordinate_name=sternoclavicular_r2 scale_factor=1
      coupled_coordinates_function: SimmSpline f0: x=(0 2.61799) y=(0 -0.633555)
    CoordinateCouplerConstraint sternoclavicular_r3_con: independent_coordinate_names=shoulder_elv
        dependent_coordinate_name=sternoclavicular_r3 scale_factor=1
      coupled_coordinates_function: SimmSpline f1: x=(0 3.14159) y=(0 0.322013)
    CoordinateCouplerConstraint unrotscap_r2_con: independent_coordinate_names=shoulder_elv
        dependent_coordinate_name=unrotscap_r2 scale_factor=1
      coupled_coordinates_function: SimmSpline f2: x=(0 2.61799) y=(0 0.633555)
    CoordinateCouplerConstraint unrotscap_r3_con: independent_coordinate_names=shoulder_elv
        dependent_coordinate_name=unrotscap_r3 scale_factor=1
      coupled_coordinates_function: SimmSpline f3: x=(0 3.14159) y=(0 -0.322013)
    CoordinateCouplerConstraint acromioclavicular_r1_con: independent_coordinate_names=shoulder_elv
        dependent_coordinate_name=acromioclavicular_r1 scale_factor=1
      coupled_coordinates_function: SimmSpline f4: x=(0 2.61799) y=(0 0.466003)
    CoordinateCouplerConstraint acromioclavicular_r2_con: independent_coordinate_names=shoulder_elv
        dependent_coordinate_name=acromioclavicular_r2 scale_factor=1
      coupled_coordinates_function: SimmSpline f5: x=(0 2.61799) y=(0 -0.128282)
    CoordinateCouplerConstraint acromioclavicular_r3_con: independent_coordinate_names=shoulder_elv
        dependent_coordinate_name=acromioclavicular_r3 scale_factor=1
      coupled_coordinates_function: SimmSpline f6: x=(0 2.61799) y=(0 1.03673)
    CoordinateCouplerConstraint unrothum_r1_con: independent_coordinate_names=shoulder_elv
        dependent_coordinate_name=unrothum_r1 scale_factor=1
      coupled_coordinates_function: SimmSpline f7: x=(0 2.61799) y=(0 -0.466003)
    CoordinateCouplerConstraint unrothum_r2_con: independent_coordinate_names=shoulder_elv
        dependent_coordinate_name=unrothum_r2 scale_factor=1
      coupled_coordinates_function: SimmSpline f8: x=(0 2.61799) y=(0 0.128282)
    CoordinateCouplerConstraint unrothum_r3_con: independent_coordinate_names=shoulder_elv
        dependent_coordinate_name=unrothum_r3 scale_factor=1
      coupled_coordinates_function: SimmSpline f9: x=(0 2.61799) y=(0 -1.03673)
    CoordinateCouplerConstraint shoulder1_r2_con: independent_coordinate_names=elv_angle
        dependent_coordinate_name=shoulder1_r2 scale_factor=1
      coupled_coordinates_function: SimmSpline f11: x=(-1.5708 3.14159) y=(1.5708 -3.14159)
    CoordinateCouplerConstraint proximal_distal_r1_con: independent_coordinate_names=deviation
        dependent_coordinate_name=proximal_distal_r1 scale_factor=1
      coupled_coordinates_function: SimmSpline f18: x=(-0.174533 0 0.436332) y=(-0.261799 0 0.436332)
    CoordinateCouplerConstraint proximal_distal_r3_con: independent_coordinate_names=flexion
        dependent_coordinate_name=proximal_distal_r3 scale_factor=1
      coupled_coordinates_function: SimmSpline f19: x=(-1.22173 1.22173) y=(-0.610865 0.610865)
    CoordinateCouplerConstraint bicpt_tx_con: independent_coordinate_names=elbow_flexion
        dependent_coordinate_name=bicpt_tx scale_factor=0.9515678
      coupled_coordinates_function: SimmSpline f70: x=(0 2.26893) y=(-0.0001 0.0042)
    CoordinateCouplerConstraint bicpt_ty_con: independent_coordinate_names=elbow_flexion
        dependent_coordinate_name=bicpt_ty scale_factor=0.9515678
      coupled_coordinates_function: SimmSpline f71: x=(0 2.26893) y=(-0.0276 -0.0425)
    CoordinateCouplerConstraint bicpt_tz_con: independent_coordinate_names=elbow_flexion
        dependent_coordinate_name=bicpt_tz scale_factor=0.9515678
      coupled_coordinates_function: SimmSpline f72: x=(0 2.26893) y=(-0.0043 -0.0067)
    CoordinateCouplerConstraint bicpt2_tx_con: independent_coordinate_names=pro_sup dependent_coordinate_name=bicpt2_tx
        scale_factor=0.9515678
      coupled_coordinates_function: SimmSpline f80: x=(-1.5708 -0.610865 1.57823) y=(-0.003 0.01 0.01376)
    CoordinateCouplerConstraint bicpt2_ty_con: independent_coordinate_names=elbow_flexion
        dependent_coordinate_name=bicpt2_ty scale_factor=0.9515678
      coupled_coordinates_function: SimmSpline f81: x=(0 2.27483) y=(-0.0102 -0.045607)
    CoordinateCouplerConstraint bicpt2_tz_con: independent_coordinate_names=pro_sup dependent_coordinate_name=bicpt2_tz
        scale_factor=0.9515678
      coupled_coordinates_function: SimmSpline f82: x=(-1.5708 -0.610865 1.57561) y=(-0.0095 -0.011533 -0.000331)
    CoordinateCouplerConstraint ptpt_tx_con: independent_coordinate_names=pro_sup dependent_coordinate_name=ptpt_tx
        scale_factor=0.9515678
      coupled_coordinates_function: SimmSpline f90: x=(-1.5708 1.5708) y=(0.0142 0.0009)
    CoordinateCouplerConstraint ptpt_ty_con: independent_coordinate_names=pro_sup dependent_coordinate_name=ptpt_ty
        scale_factor=0.9515678
      coupled_coordinates_function: SimmSpline f91: x=(-1.5708 1.5708) y=(-0.0606 -0.0692)
    CoordinateCouplerConstraint ptpt_tz_con: independent_coordinate_names=pro_sup dependent_coordinate_name=ptpt_tz
        scale_factor=0.9515678
      coupled_coordinates_function: SimmSpline f92: x=(-1.5708 1.5708) y=(0.0072 -0.0073)
    CoordinateCouplerConstraint FCUpt_tx_con: independent_coordinate_names=pro_sup dependent_coordinate_name=FCUpt_tx
        scale_factor=0.9515678
      coupled_coordinates_function: SimmSpline f100: x=(-1.5708 0 1.5708) y=(-0.0027 0.004 0.0132)
    CoordinateCouplerConstraint FCUpt_ty_con: independent_coordinate_names=pro_sup dependent_coordinate_name=FCUpt_ty
        scale_factor=0.9515678
      coupled_coordinates_function: SimmSpline f101: x=(-1.5708 0 1.5708) y=(-0.1838 -0.1841 -0.1821)
    CoordinateCouplerConstraint FCUpt_tz_con: independent_coordinate_names=pro_sup dependent_coordinate_name=FCUpt_tz
        scale_factor=0.9515678
      coupled_coordinates_function: SimmSpline f102: x=(-1.5708 0 1.5708) y=(0.0069 0.0005 0.0002)
    CoordinateCouplerConstraint EDCpt_tx_con: independent_coordinate_names=pro_sup dependent_coordinate_name=EDCpt_tx
        scale_factor=0.9515678
      coupled_coordinates_function: SimmSpline f110: x=(-1.5708 0 1.5708) y=(0.0108 0 -0.0108)
    CoordinateCouplerConstraint EDCpt_ty_con: independent_coordinate_names=pro_sup dependent_coordinate_name=EDCpt_ty
        scale_factor=0.9515678
      coupled_coordinates_function: SimmSpline f111: x=(-1.5708 0 1.5708) y=(-0.0013 0 0.0038)
    CoordinateCouplerConstraint EDCpt_tz_con: independent_coordinate_names=pro_sup dependent_coordinate_name=EDCpt_tz
        scale_factor=0.9515678
      coupled_coordinates_function: SimmSpline f112: x=(-1.5708 0 1.5708) y=(-0.0035 0 -0.00089)
    CoordinateCouplerConstraint APLpt_tx_con: independent_coordinate_names=flexion dependent_coordinate_name=APLpt_tx
        scale_factor=1.108661
      coupled_coordinates_function: SimmSpline f120: x=(-1.22173 0 1.22173) y=(0 0 -0.0025)
    CoordinateCouplerConstraint APLpt_ty_con: independent_coordinate_names=flexion dependent_coordinate_name=APLpt_ty
        scale_factor=1.108661
      coupled_coordinates_function: SimmSpline f121: x=(-1.22173 0 1.22173) y=(0 0 -0.001)
    CoordinateCouplerConstraint APLpt_tz_con: independent_coordinate_names=flexion dependent_coordinate_name=APLpt_tz
        scale_factor=1.108661
      coupled_coordinates_function: SimmSpline f122: x=(-1.22173 0 1.22173) y=(0 0 -0.005)
    CoordinateCouplerConstraint FPLpt_tx_con: independent_coordinate_names=flexion dependent_coordinate_name=FPLpt_tx
        scale_factor=1.108661
      coupled_coordinates_function: SimmSpline f130: x=(-1.22173 0 1.22173) y=(0 0 -0.0032)
    CoordinateCouplerConstraint FPLpt_ty_con: independent_coordinate_names=flexion dependent_coordinate_name=FPLpt_ty
        scale_factor=1.108661
      coupled_coordinates_function: SimmSpline f131: x=(-1.22173 0 1.22173) y=(0 0 -0.0096)
    CoordinateCouplerConstraint FPLpt_tz_con: independent_coordinate_names=flexion dependent_coordinate_name=FPLpt_tz
        scale_factor=1.108661
      coupled_coordinates_function: SimmSpline f132: x=(-1.22173 0 1.22173) y=(0 0 -0.0054)
    CoordinateCouplerConstraint FPLpt2_tx_con: independent_coordinate_names=cmc_flexion
        dependent_coordinate_name=FPLpt2_tx scale_factor=1.108661
      coupled_coordinates_function: SimmSpline f140: x=(-0.261799 0 0.0872665 0.183675 0.376492 0.785303)
          y=(-0.0032 0 4e-5 3.2e-5 8e-6 0)
    CoordinateCouplerConstraint FPLpt2_ty_con: independent_coordinate_names=cmc_flexion
        dependent_coordinate_name=FPLpt2_ty scale_factor=1.108661
      coupled_coordinates_function: SimmSpline f141: x=(-0.261799 0 0.785398) y=(0.0005 0 0)
    CoordinateCouplerConstraint FPLpt2_tz_con: independent_coordinate_names=cmc_flexion
        dependent_coordinate_name=FPLpt2_tz scale_factor=1.108661
      coupled_coordinates_function: SimmSpline f142: x=(-0.261799 0 0.785398) y=(0.0006 0 0)
    CoordinateCouplerConstraint PEC1pt2_tx_con: independent_coordinate_names=shoulder_elv
        dependent_coordinate_name=PEC1pt2_tx scale_factor=0.8887259
      coupled_coordinates_function: SimmSpline f150: x=(0 3.14159) y=(0 0.0059)
    CoordinateCouplerConstraint PEC1pt2_ty_con: independent_coordinate_names=shoulder_elv
        dependent_coordinate_name=PEC1pt2_ty scale_factor=0.8887259
      coupled_coordinates_function: SimmSpline f151: x=(0 3.14159) y=(0 0.0207)
    CoordinateCouplerConstraint PEC1pt2_tz_con: independent_coordinate_names=shoulder_elv
        dependent_coordinate_name=PEC1pt2_tz scale_factor=0.8887259
      coupled_coordinates_function: SimmSpline f152: x=(0 3.14159) y=(0 0.0144)
    CoordinateCouplerConstraint PEC1pt3_tx_con: independent_coordinate_names=shoulder_elv
        dependent_coordinate_name=PEC1pt3_tx scale_factor=0.9272012
      coupled_coordinates_function: SimmSpline f160: x=(0 3.14159) y=(0 -0.0193)
    CoordinateCouplerConstraint PEC1pt3_ty_con: independent_coordinate_names=shoulder_elv
        dependent_coordinate_name=PEC1pt3_ty scale_factor=0.9272012
      coupled_coordinates_function: SimmSpline f161: x=(0 3.14159) y=(0 0.0466)
    CoordinateCouplerConstraint PEC1pt3_tz_con: independent_coordinate_names=shoulder_elv
        dependent_coordinate_name=PEC1pt3_tz scale_factor=0.9272012
      coupled_coordinates_function: SimmSpline f162: x=(0 3.14159) y=(0 -0.0442)
    CoordinateCouplerConstraint PEC2pt2_tx_con: independent_coordinate_names=shoulder_elv
        dependent_coordinate_name=PEC2pt2_tx scale_factor=0.8887259
      coupled_coordinates_function: SimmSpline f170: x=(0 3.14159) y=(0 0.0059)
    CoordinateCouplerConstraint PEC2pt2_ty_con: independent_coordinate_names=shoulder_elv
        dependent_coordinate_name=PEC2pt2_ty scale_factor=0.8887259
      coupled_coordinates_function: SimmSpline f171: x=(0 3.14159) y=(0 0.0207)
    CoordinateCouplerConstraint PEC2pt2_tz_con: independent_coordinate_names=shoulder_elv
        dependent_coordinate_name=PEC2pt2_tz scale_factor=0.8887259
      coupled_coordinates_function: SimmSpline f172: x=(0 3.14159) y=(0 0.0144)
    CoordinateCouplerConstraint PEC2pt3_tx_con: independent_coordinate_names=shoulder_elv
        dependent_coordinate_name=PEC2pt3_tx scale_factor=0.9272012
      coupled_coordinates_function: SimmSpline f180: x=(0 3.14159) y=(0 0.0013)
    CoordinateCouplerConstraint PEC2pt3_ty_con: independent_coordinate_names=shoulder_elv
        dependent_coordinate_name=PEC2pt3_ty scale_factor=0.9272012
      coupled_coordinates_function: SimmSpline f181: x=(0 3.14159) y=(0 0.0432)
    CoordinateCouplerConstraint PEC2pt3_tz_con: independent_coordinate_names=shoulder_elv
        dependent_coordinate_name=PEC2pt3_tz scale_factor=0.9272012
      coupled_coordinates_function: SimmSpline f182: x=(0 3.14159) y=(0 -0.0227)
    CoordinateCouplerConstraint PEC3pt2_tx_con: independent_coordinate_names=shoulder_elv
        dependent_coordinate_name=PEC3pt2_tx scale_factor=0.8887259
      coupled_coordinates_function: SimmSpline f190: x=(0 0.747517 3.14159) y=(0 0.002482 0.0059)
    CoordinateCouplerConstraint PEC3pt2_ty_con: independent_coordinate_names=shoulder_elv
        dependent_coordinate_name=PEC3pt2_ty scale_factor=0.8887259
      coupled_coordinates_function: SimmSpline f191: x=(0 3.13149) y=(0 0.011474)
    CoordinateCouplerConstraint PEC3pt2_tz_con: independent_coordinate_names=shoulder_elv
        dependent_coordinate_name=PEC3pt2_tz scale_factor=0.8887259
      coupled_coordinates_function: SimmSpline f192: x=(0 0.623056 2.29124 3.12533) y=(0 0.009968 0.018193 0.017746)
    CoordinateCouplerConstraint PEC3pt3_tx_con: independent_coordinate_names=shoulder_elv
        dependent_coordinate_name=PEC3pt3_tx scale_factor=0.9272012
      coupled_coordinates_function: SimmSpline f200: x=(0 3.14159) y=(0 0)
    CoordinateCouplerConstraint PEC3pt3_ty_con: independent_coordinate_names=shoulder_elv
        dependent_coordinate_name=PEC3pt3_ty scale_factor=0.9272012
      coupled_coordinates_function: SimmSpline f201: x=(0.0101016 1.59605 3.14159) y=(0.000222 0.011219 0.0441)
    CoordinateCouplerConstraint PEC3pt3_tz_con: independent_coordinate_names=shoulder_elv
        dependent_coordinate_name=PEC3pt3_tz scale_factor=0.9272012
      coupled_coordinates_function: SimmSpline f202: x=(0 3.14159) y=(0 0)
    CoordinateCouplerConstraint DELT2pt2a_tx_con: independent_coordinate_names=shoulder_elv
        dependent_coordinate_name=DELT2pt2a_tx scale_factor=0.8887259
      coupled_coordinates_function: SimmSpline f210: x=(0 3.14159) y=(0 -0.0169)
    CoordinateCouplerConstraint DELT2pt2a_ty_con: independent_coordinate_names=shoulder_elv
        dependent_coordinate_name=DELT2pt2a_ty scale_factor=0.8887259
      coupled_coordinates_function: SimmSpline f211: x=(0 3.14159) y=(0 -0.0781)
    CoordinateCouplerConstraint DELT2pt2a_tz_con: independent_coordinate_names=shoulder_elv
        dependent_coordinate_name=DELT2pt2a_tz scale_factor=0.8887259
      coupled_coordinates_function: SimmSpline f212: x=(0 1.22229 3.14159) y=(0 -0.005395 -0.0363)
    CoordinateCouplerConstraint DELT2pt2_tx_con: independent_coordinate_names=shoulder_rot
        dependent_coordinate_name=DELT2pt2_tx scale_factor=0.9711952
      coupled_coordinates_function: SimmSpline f220: x=(-1.5708 -0.0101503 0.349046) y=(0.0214 4.9e-5 -0.020005)
    CoordinateCouplerConstraint DELT2pt2_ty_con: independent_coordinate_names=shoulder_rot
        dependent_coordinate_name=DELT2pt2_ty scale_factor=0.9711952
      coupled_coordinates_function: SimmSpline f221: x=(-1.5708 -1.18189 -0.169482 0 0.349066)
          y=(-0.0029 -0.002148 -0.000139 0 -0.001644)
    CoordinateCouplerConstraint DELT2pt2_tz_con: independent_coordinate_names=shoulder_rot
        dependent_coordinate_name=DELT2pt2_tz scale_factor=0.9711952
      coupled_coordinates_function: SimmSpline f222: x=(-1.5708 -0.496661 0 0.342893) y=(-0.0455 -0.006762 0 -0.00573)
    CoordinateCouplerConstraint LAT1pt2_tx_con: independent_coordinate_names=shoulder_elv
        dependent_coordinate_name=LAT1pt2_tx scale_factor=0.9272012
      coupled_coordinates_function: SimmSpline f230: x=(0 3.14159) y=(0 -0.0021)
    CoordinateCouplerConstraint LAT1pt2_ty_con: independent_coordinate_names=shoulder_elv
        dependent_coordinate_name=LAT1pt2_ty scale_factor=0.9272012
      coupled_coordinates_function: SimmSpline f231: x=(0 3.14159) y=(0 0.0352)
    CoordinateCouplerConstraint LAT1pt2_tz_con: independent_coordinate_names=shoulder_elv
        dependent_coordinate_name=LAT1pt2_tz scale_factor=0.9272012
      coupled_coordinates_function: SimmSpline f232: x=(0 3.14159) y=(0 -0.0144)
    CoordinateCouplerConstraint LAT1pt3_tx_con: independent_coordinate_names=shoulder_elv
        dependent_coordinate_name=LAT1pt3_tx scale_factor=0.9272012
      coupled_coordinates_function: SimmSpline f240: x=(0 3.14159) y=(0 0.0058)
    CoordinateCouplerConstraint LAT1pt3_ty_con: independent_coordinate_names=shoulder_elv
        dependent_coordinate_name=LAT1pt3_ty scale_factor=0.9272012
      coupled_coordinates_function: SimmSpline f241: x=(0 3.14159) y=(0 0.0508)
    CoordinateCouplerConstraint LAT1pt3_tz_con: independent_coordinate_names=shoulder_elv
        dependent_coordinate_name=LAT1pt3_tz scale_factor=0.9272012
      coupled_coordinates_function: SimmSpline f242: x=(0 3.14159) y=(0 -0.042)
    CoordinateCouplerConstraint LAT2pt2_tx_con: independent_coordinate_names=shoulder_elv
        dependent_coordinate_name=LAT2pt2_tx scale_factor=0.9272012
      coupled_coordinates_function: SimmSpline f250: x=(0 3.14159) y=(0 -0.0141)
    CoordinateCouplerConstraint LAT2pt2_ty_con: independent_coordinate_names=shoulder_elv
        dependent_coordinate_name=LAT2pt2_ty scale_factor=0.9272012
      coupled_coordinates_function: SimmSpline f251: x=(0 3.14159) y=(0 0.0305)
    CoordinateCouplerConstraint LAT2pt2_tz_con: independent_coordinate_names=shoulder_elv
        dependent_coordinate_name=LAT2pt2_tz scale_factor=0.9272012
      coupled_coordinates_function: SimmSpline f252: x=(0 3.14159) y=(0 -0.0129)
    CoordinateCouplerConstraint LAT2pt3_tx_con: independent_coordinate_names=shoulder_elv
        dependent_coordinate_name=LAT2pt3_tx scale_factor=0.9272012
      coupled_coordinates_function: SimmSpline f260: x=(0 3.14159) y=(0 -0.0294)
    CoordinateCouplerConstraint LAT2pt3_ty_con: independent_coordinate_names=shoulder_elv
        dependent_coordinate_name=LAT2pt3_ty scale_factor=0.9272012
      coupled_coordinates_function: SimmSpline f261: x=(0 3.14159) y=(0 0.0644)
    CoordinateCouplerConstraint LAT2pt3_tz_con: independent_coordinate_names=shoulder_elv
        dependent_coordinate_name=LAT2pt3_tz scale_factor=0.9272012
      coupled_coordinates_function: SimmSpline f262: x=(0 3.14159) y=(0 -0.0721)
    CoordinateCouplerConstraint LAT3pt2_tx_con: independent_coordinate_names=shoulder_elv
        dependent_coordinate_name=LAT3pt2_tx scale_factor=0.9272012
      coupled_coordinates_function: SimmSpline f270: x=(0 3.14159) y=(0 -0.0552)
    CoordinateCouplerConstraint LAT3pt2_ty_con: independent_coordinate_names=shoulder_elv
        dependent_coordinate_name=LAT3pt2_ty scale_factor=0.9272012
      coupled_coordinates_function: SimmSpline f271: x=(0 3.14159) y=(0 0.0341)
    CoordinateCouplerConstraint LAT3pt2_tz_con: independent_coordinate_names=shoulder_elv
        dependent_coordinate_name=LAT3pt2_tz scale_factor=0.9272012
      coupled_coordinates_function: SimmSpline f272: x=(0 3.14159) y=(0 -0.0173)
    CoordinateCouplerConstraint LAT3pt3_tx_con: independent_coordinate_names=shoulder_elv
        dependent_coordinate_name=LAT3pt3_tx scale_factor=0.9272012
      coupled_coordinates_function: SimmSpline f280: x=(0 3.14159) y=(0 -0.0366)
    CoordinateCouplerConstraint LAT3pt3_ty_con: independent_coordinate_names=shoulder_elv
        dependent_coordinate_name=LAT3pt3_ty scale_factor=0.9272012
      coupled_coordinates_function: SimmSpline f281: x=(0 3.14159) y=(0 0.0744)
    CoordinateCouplerConstraint LAT3pt3_tz_con: independent_coordinate_names=shoulder_elv
        dependent_coordinate_name=LAT3pt3_tz scale_factor=0.9272012
      coupled_coordinates_function: SimmSpline f282: x=(0 3.14159) y=(0 -0.0901)
    CoordinateCouplerConstraint sternoclavicular_r2_con_l: independent_coordinate_names=shoulder_elv_l
        dependent_coordinate_name=sternoclavicular_r2_l scale_factor=1
      coupled_coordinates_function: SimmSpline f0_l: x=(0 2.61799) y=(0 -0.633555)
    CoordinateCouplerConstraint sternoclavicular_r3_con_l: independent_coordinate_names=shoulder_elv_l
        dependent_coordinate_name=sternoclavicular_r3_l scale_factor=1
      coupled_coordinates_function: SimmSpline f1_l: x=(0 3.14159) y=(0 0.322013)
    CoordinateCouplerConstraint unrotscap_r2_con_l: independent_coordinate_names=shoulder_elv_l
        dependent_coordinate_name=unrotscap_r2_l scale_factor=1
      coupled_coordinates_function: SimmSpline f2_l: x=(0 2.61799) y=(0 0.633555)
    CoordinateCouplerConstraint unrotscap_r3_con_l: independent_coordinate_names=shoulder_elv_l
        dependent_coordinate_name=unrotscap_r3_l scale_factor=1
      coupled_coordinates_function: SimmSpline f3_l: x=(0 3.14159) y=(0 -0.322013)
    CoordinateCouplerConstraint acromioclavicular_r1_con_l: independent_coordinate_names=shoulder_elv_l
        dependent_coordinate_name=acromioclavicular_r1_l scale_factor=1
      coupled_coordinates_function: SimmSpline f4_l: x=(0 2.61799) y=(0 0.466003)
    CoordinateCouplerConstraint acromioclavicular_r2_con_l: independent_coordinate_names=shoulder_elv_l
        dependent_coordinate_name=acromioclavicular_r2_l scale_factor=1
      coupled_coordinates_function: SimmSpline f5_l: x=(0 2.61799) y=(0 -0.128282)
    CoordinateCouplerConstraint acromioclavicular_r3_con_l: independent_coordinate_names=shoulder_elv_l
        dependent_coordinate_name=acromioclavicular_r3_l scale_factor=1
      coupled_coordinates_function: SimmSpline f6_l: x=(0 2.61799) y=(0 1.03673)
    CoordinateCouplerConstraint unrothum_r1_con_l: independent_coordinate_names=shoulder_elv_l
        dependent_coordinate_name=unrothum_r1_l scale_factor=1
      coupled_coordinates_function: SimmSpline f7_l: x=(0 2.61799) y=(0 -0.466003)
    CoordinateCouplerConstraint unrothum_r2_con_l: independent_coordinate_names=shoulder_elv_l
        dependent_coordinate_name=unrothum_r2_l scale_factor=1
      coupled_coordinates_function: SimmSpline f8_l: x=(0 2.61799) y=(0 0.128282)
    CoordinateCouplerConstraint unrothum_r3_con_l: independent_coordinate_names=shoulder_elv_l
        dependent_coordinate_name=unrothum_r3_l scale_factor=1
      coupled_coordinates_function: SimmSpline f9_l: x=(0 2.61799) y=(0 -1.03673)
    CoordinateCouplerConstraint shoulder1_r2_con_l: independent_coordinate_names=elv_angle_l
        dependent_coordinate_name=shoulder1_r2_l scale_factor=1
      coupled_coordinates_function: SimmSpline f11_l: x=(-1.5708 3.14159) y=(1.5708 -3.14159)
    CoordinateCouplerConstraint proximal_distal_r1_con_l: independent_coordinate_names=deviation_l
        dependent_coordinate_name=proximal_distal_r1_l scale_factor=1
      coupled_coordinates_function: SimmSpline f18_l: x=(-0.174533 0 0.436332) y=(-0.261799 0 0.436332)
    CoordinateCouplerConstraint proximal_distal_r3_con_l: independent_coordinate_names=flexion_l
        dependent_coordinate_name=proximal_distal_r3_l scale_factor=1
      coupled_coordinates_function: SimmSpline f19_l: x=(-1.22173 1.22173) y=(-0.610865 0.610865)
    CoordinateCouplerConstraint bicpt_tx_con_l: independent_coordinate_names=elbow_flexion_l
        dependent_coordinate_name=bicpt_tx_l scale_factor=0.9515678
      coupled_coordinates_function: SimmSpline f70_l: x=(0 2.26893) y=(-0.0001 0.0042)
    CoordinateCouplerConstraint bicpt_ty_con_l: independent_coordinate_names=elbow_flexion_l
        dependent_coordinate_name=bicpt_ty_l scale_factor=0.9515678
      coupled_coordinates_function: SimmSpline f71_l: x=(0 2.26893) y=(-0.0276 -0.0425)
    CoordinateCouplerConstraint bicpt_tz_con_l: independent_coordinate_names=elbow_flexion_l
        dependent_coordinate_name=bicpt_tz_l scale_factor=0.9515678
      coupled_coordinates_function: SimmSpline f72_l: x=(0 2.26893) y=(-0.0043 -0.0067)
    CoordinateCouplerConstraint bicpt2_tx_con_l: independent_coordinate_names=pro_sup_l
        dependent_coordinate_name=bicpt2_tx_l scale_factor=0.9515678
      coupled_coordinates_function: SimmSpline f80_l: x=(-1.5708 -0.610865 1.57823) y=(-0.003 0.01 0.01376)
    CoordinateCouplerConstraint bicpt2_ty_con_l: independent_coordinate_names=elbow_flexion_l
        dependent_coordinate_name=bicpt2_ty_l scale_factor=0.9515678
      coupled_coordinates_function: SimmSpline f81_l: x=(0 2.27483) y=(-0.0102 -0.045607)
    CoordinateCouplerConstraint bicpt2_tz_con_l: independent_coordinate_names=pro_sup_l
        dependent_coordinate_name=bicpt2_tz_l scale_factor=0.9515678
      coupled_coordinates_function: SimmSpline f82_l: x=(-1.5708 -0.610865 1.57561) y=(-0.0095 -0.011533 -0.000331)
    CoordinateCouplerConstraint ptpt_tx_con_l: independent_coordinate_names=pro_sup_l
        dependent_coordinate_name=ptpt_tx_l scale_factor=0.9515678
      coupled_coordinates_function: SimmSpline f90_l: x=(-1.5708 1.5708) y=(0.0142 0.0009)
    CoordinateCouplerConstraint ptpt_ty_con_l: independent_coordinate_names=pro_sup_l
        dependent_coordinate_name=ptpt_ty_l scale_factor=0.9515678
      coupled_coordinates_function: SimmSpline f91_l: x=(-1.5708 1.5708) y=(-0.0606 -0.0692)
    CoordinateCouplerConstraint ptpt_tz_con_l: independent_coordinate_names=pro_sup_l
        dependent_coordinate_name=ptpt_tz_l scale_factor=0.9515678
      coupled_coordinates_function: SimmSpline f92_l: x=(-1.5708 1.5708) y=(0.0072 -0.0073)
    CoordinateCouplerConstraint FCUpt_tx_con_l: independent_coordinate_names=pro_sup_l
        dependent_coordinate_name=FCUpt_tx_l scale_factor=0.9515678
      coupled_coordinates_function: SimmSpline f100_l: x=(-1.5708 0 1.5708) y=(-0.0027 0.004 0.0132)
    CoordinateCouplerConstraint FCUpt_ty_con_l: independent_coordinate_names=pro_sup_l
        dependent_coordinate_name=FCUpt_ty_l scale_factor=0.9515678
      coupled_coordinates_function: SimmSpline f101_l: x=(-1.5708 0 1.5708) y=(-0.1838 -0.1841 -0.1821)
    CoordinateCouplerConstraint FCUpt_tz_con_l: independent_coordinate_names=pro_sup_l
        dependent_coordinate_name=FCUpt_tz_l scale_factor=0.9515678
      coupled_coordinates_function: SimmSpline f102_l: x=(-1.5708 0 1.5708) y=(0.0069 0.0005 0.0002)
    CoordinateCouplerConstraint EDCpt_tx_con_l: independent_coordinate_names=pro_sup_l
        dependent_coordinate_name=EDCpt_tx_l scale_factor=0.9515678
      coupled_coordinates_function: SimmSpline f110_l: x=(-1.5708 0 1.5708) y=(0.0108 0 -0.0108)
    CoordinateCouplerConstraint EDCpt_ty_con_l: independent_coordinate_names=pro_sup_l
        dependent_coordinate_name=EDCpt_ty_l scale_factor=0.9515678
      coupled_coordinates_function: SimmSpline f111_l: x=(-1.5708 0 1.5708) y=(-0.0013 0 0.0038)
    CoordinateCouplerConstraint EDCpt_tz_con_l: independent_coordinate_names=pro_sup_l
        dependent_coordinate_name=EDCpt_tz_l scale_factor=0.9515678
      coupled_coordinates_function: SimmSpline f112_l: x=(-1.5708 0 1.5708) y=(-0.0035 0 -0.00089)
    CoordinateCouplerConstraint APLpt_tx_con_l: independent_coordinate_names=flexion_l
        dependent_coordinate_name=APLpt_tx_l scale_factor=1.108661
      coupled_coordinates_function: SimmSpline f120_l: x=(-1.22173 0 1.22173) y=(0 0 -0.0025)
    CoordinateCouplerConstraint APLpt_ty_con_l: independent_coordinate_names=flexion_l
        dependent_coordinate_name=APLpt_ty_l scale_factor=1.108661
      coupled_coordinates_function: SimmSpline f121_l: x=(-1.22173 0 1.22173) y=(0 0 -0.001)
    CoordinateCouplerConstraint APLpt_tz_con_l: independent_coordinate_names=flexion_l
        dependent_coordinate_name=APLpt_tz_l scale_factor=1.108661
      coupled_coordinates_function: SimmSpline f122_l: x=(-1.22173 0 1.22173) y=(0 0 -0.005)
    CoordinateCouplerConstraint FPLpt_tx_con_l: independent_coordinate_names=flexion_l
        dependent_coordinate_name=FPLpt_tx_l scale_factor=1.108661
      coupled_coordinates_function: SimmSpline f130_l: x=(-1.22173 0 1.22173) y=(0 0 -0.0032)
    CoordinateCouplerConstraint FPLpt_ty_con_l: independent_coordinate_names=flexion_l
        dependent_coordinate_name=FPLpt_ty_l scale_factor=1.108661
      coupled_coordinates_function: SimmSpline f131_l: x=(-1.22173 0 1.22173) y=(0 0 -0.0096)
    CoordinateCouplerConstraint FPLpt_tz_con_l: independent_coordinate_names=flexion_l
        dependent_coordinate_name=FPLpt_tz_l scale_factor=1.108661
      coupled_coordinates_function: SimmSpline f132_l: x=(-1.22173 0 1.22173) y=(0 0 -0.0054)
    CoordinateCouplerConstraint FPLpt2_tx_con_l: independent_coordinate_names=cmc_flexion_l
        dependent_coordinate_name=FPLpt2_tx_l scale_factor=1.108661
      coupled_coordinates_function: SimmSpline f140_l: x=(-0.261799 0 0.0872665 0.183675 0.376492 0.785303)
          y=(-0.0032 0 4e-5 3.2e-5 8e-6 0)
    CoordinateCouplerConstraint FPLpt2_ty_con_l: independent_coordinate_names=cmc_flexion_l
        dependent_coordinate_name=FPLpt2_ty_l scale_factor=1.108661
      coupled_coordinates_function: SimmSpline f141_l: x=(-0.261799 0 0.785398) y=(0.0005 0 0)
    CoordinateCouplerConstraint FPLpt2_tz_con_l: independent_coordinate_names=cmc_flexion_l
        dependent_coordinate_name=FPLpt2_tz_l scale_factor=1.108661
      coupled_coordinates_function: SimmSpline f142_l: x=(-0.261799 0 0.785398) y=(0.0006 0 0)
    CoordinateCouplerConstraint PEC1pt2_tx_con_l: independent_coordinate_names=shoulder_elv_l
        dependent_coordinate_name=PEC1pt2_tx_l scale_factor=0.8887259
      coupled_coordinates_function: SimmSpline f150_l: x=(0 3.14159) y=(0 0.0059)
    CoordinateCouplerConstraint PEC1pt2_ty_con_l: independent_coordinate_names=shoulder_elv_l
        dependent_coordinate_name=PEC1pt2_ty_l scale_factor=0.8887259
      coupled_coordinates_function: SimmSpline f151_l: x=(0 3.14159) y=(0 0.0207)
    CoordinateCouplerConstraint PEC1pt2_tz_con_l: independent_coordinate_names=shoulder_elv_l
        dependent_coordinate_name=PEC1pt2_tz_l scale_factor=0.8887259
      coupled_coordinates_function: SimmSpline f152_l: x=(0 3.14159) y=(0 0.0144)
    CoordinateCouplerConstraint PEC1pt3_tx_con_l: independent_coordinate_names=shoulder_elv_l
        dependent_coordinate_name=PEC1pt3_tx_l scale_factor=0.9272012
      coupled_coordinates_function: SimmSpline f160_l: x=(0 3.14159) y=(0 -0.0193)
    CoordinateCouplerConstraint PEC1pt3_ty_con_l: independent_coordinate_names=shoulder_elv_l
        dependent_coordinate_name=PEC1pt3_ty_l scale_factor=0.9272012
      coupled_coordinates_function: SimmSpline f161_l: x=(0 3.14159) y=(0 0.0466)
    CoordinateCouplerConstraint PEC1pt3_tz_con_l: independent_coordinate_names=shoulder_elv_l
        dependent_coordinate_name=PEC1pt3_tz_l scale_factor=0.9272012
      coupled_coordinates_function: SimmSpline f162_l: x=(0 3.14159) y=(0 -0.0442)
    CoordinateCouplerConstraint PEC2pt2_tx_con_l: independent_coordinate_names=shoulder_elv_l
        dependent_coordinate_name=PEC2pt2_tx_l scale_factor=0.8887259
      coupled_coordinates_function: SimmSpline f170_l: x=(0 3.14159) y=(0 0.0059)
    CoordinateCouplerConstraint PEC2pt2_ty_con_l: independent_coordinate_names=shoulder_elv_l
        dependent_coordinate_name=PEC2pt2_ty_l scale_factor=0.8887259
      coupled_coordinates_function: SimmSpline f171_l: x=(0 3.14159) y=(0 0.0207)
    CoordinateCouplerConstraint PEC2pt2_tz_con_l: independent_coordinate_names=shoulder_elv_l
        dependent_coordinate_name=PEC2pt2_tz_l scale_factor=0.8887259
      coupled_coordinates_function: SimmSpline f172_l: x=(0 3.14159) y=(0 0.0144)
    CoordinateCouplerConstraint PEC2pt3_tx_con_l: independent_coordinate_names=shoulder_elv_l
        dependent_coordinate_name=PEC2pt3_tx_l scale_factor=0.9272012
      coupled_coordinates_function: SimmSpline f180_l: x=(0 3.14159) y=(0 0.0013)
    CoordinateCouplerConstraint PEC2pt3_ty_con_l: independent_coordinate_names=shoulder_elv_l
        dependent_coordinate_name=PEC2pt3_ty_l scale_factor=0.9272012
      coupled_coordinates_function: SimmSpline f181_l: x=(0 3.14159) y=(0 0.0432)
    CoordinateCouplerConstraint PEC2pt3_tz_con_l: independent_coordinate_names=shoulder_elv_l
        dependent_coordinate_name=PEC2pt3_tz_l scale_factor=0.9272012
      coupled_coordinates_function: SimmSpline f182_l: x=(0 3.14159) y=(0 -0.0227)
    CoordinateCouplerConstraint PEC3pt2_tx_con_l: independent_coordinate_names=shoulder_elv_l
        dependent_coordinate_name=PEC3pt2_tx_l scale_factor=0.8887259
      coupled_coordinates_function: SimmSpline f190_l: x=(0 0.747517 3.14159) y=(0 0.002482 0.0059)
    CoordinateCouplerConstraint PEC3pt2_ty_con_l: independent_coordinate_names=shoulder_elv_l
        dependent_coordinate_name=PEC3pt2_ty_l scale_factor=0.8887259
      coupled_coordinates_function: SimmSpline f191_l: x=(0 3.13149) y=(0 0.011474)
    CoordinateCouplerConstraint PEC3pt2_tz_con_l: independent_coordinate_names=shoulder_elv_l
        dependent_coordinate_name=PEC3pt2_tz_l scale_factor=0.8887259
      coupled_coordinates_function: SimmSpline f192_l: x=(0 0.623056 2.29124 3.12533) y=(0 0.009968 0.018193 0.017746)
    CoordinateCouplerConstraint PEC3pt3_tx_con_l: independent_coordinate_names=shoulder_elv_l
        dependent_coordinate_name=PEC3pt3_tx_l scale_factor=0.9272012
      coupled_coordinates_function: SimmSpline f200_l: x=(0 3.14159) y=(0 0)
    CoordinateCouplerConstraint PEC3pt3_ty_con_l: independent_coordinate_names=shoulder_elv_l
        dependent_coordinate_name=PEC3pt3_ty_l scale_factor=0.9272012
      coupled_coordinates_function: SimmSpline f201_l: x=(0.0101016 1.59605 3.14159) y=(0.000222 0.011219 0.0441)
    CoordinateCouplerConstraint PEC3pt3_tz_con_l: independent_coordinate_names=shoulder_elv_l
        dependent_coordinate_name=PEC3pt3_tz_l scale_factor=0.9272012
      coupled_coordinates_function: SimmSpline f202_l: x=(0 3.14159) y=(0 0)
    CoordinateCouplerConstraint DELT2pt2a_tx_con_l: independent_coordinate_names=shoulder_elv_l
        dependent_coordinate_name=DELT2pt2a_tx_l scale_factor=0.8887259
      coupled_coordinates_function: SimmSpline f210_l: x=(0 3.14159) y=(0 -0.0169)
    CoordinateCouplerConstraint DELT2pt2a_ty_con_l: independent_coordinate_names=shoulder_elv_l
        dependent_coordinate_name=DELT2pt2a_ty_l scale_factor=0.8887259
      coupled_coordinates_function: SimmSpline f211_l: x=(0 3.14159) y=(0 -0.0781)
    CoordinateCouplerConstraint DELT2pt2a_tz_con_l: independent_coordinate_names=shoulder_elv_l
        dependent_coordinate_name=DELT2pt2a_tz_l scale_factor=0.8887259
      coupled_coordinates_function: SimmSpline f212_l: x=(0 1.22229 3.14159) y=(0 -0.005395 -0.0363)
    CoordinateCouplerConstraint DELT2pt2_tx_con_l: independent_coordinate_names=shoulder_rot_l
        dependent_coordinate_name=DELT2pt2_tx_l scale_factor=0.9711952
      coupled_coordinates_function: SimmSpline f220_l: x=(-1.5708 -0.0101503 0.349046) y=(0.0214 4.9e-5 -0.020005)
    CoordinateCouplerConstraint DELT2pt2_ty_con_l: independent_coordinate_names=shoulder_rot_l
        dependent_coordinate_name=DELT2pt2_ty_l scale_factor=0.9711952
      coupled_coordinates_function: SimmSpline f221_l: x=(-1.5708 -1.18189 -0.169482 0 0.349066)
          y=(-0.0029 -0.002148 -0.000139 0 -0.001644)
    CoordinateCouplerConstraint DELT2pt2_tz_con_l: independent_coordinate_names=shoulder_rot_l
        dependent_coordinate_name=DELT2pt2_tz_l scale_factor=0.9711952
      coupled_coordinates_function: SimmSpline f222_l: x=(-1.5708 -0.496661 0 0.342893)
          y=(-0.0455 -0.006762 0 -0.00573)
    CoordinateCouplerConstraint LAT1pt2_tx_con_l: independent_coordinate_names=shoulder_elv_l
        dependent_coordinate_name=LAT1pt2_tx_l scale_factor=0.9272012
      coupled_coordinates_function: SimmSpline f230_l: x=(0 3.14159) y=(0 -0.0021)
    CoordinateCouplerConstraint LAT1pt2_ty_con_l: independent_coordinate_names=shoulder_elv_l
        dependent_coordinate_name=LAT1pt2_ty_l scale_factor=0.9272012
      coupled_coordinates_function: SimmSpline f231_l: x=(0 3.14159) y=(0 0.0352)
    CoordinateCouplerConstraint LAT1pt2_tz_con_l: independent_coordinate_names=shoulder_elv_l
        dependent_coordinate_name=LAT1pt2_tz_l scale_factor=0.9272012
      coupled_coordinates_function: SimmSpline f232_l: x=(0 3.14159) y=(0 -0.0144)
    CoordinateCouplerConstraint LAT1pt3_tx_con_l: independent_coordinate_names=shoulder_elv_l
        dependent_coordinate_name=LAT1pt3_tx_l scale_factor=0.9272012
      coupled_coordinates_function: SimmSpline f240_l: x=(0 3.14159) y=(0 0.0058)
    CoordinateCouplerConstraint LAT1pt3_ty_con_l: independent_coordinate_names=shoulder_elv_l
        dependent_coordinate_name=LAT1pt3_ty_l scale_factor=0.9272012
      coupled_coordinates_function: SimmSpline f241_l: x=(0 3.14159) y=(0 0.0508)
    CoordinateCouplerConstraint LAT1pt3_tz_con_l: independent_coordinate_names=shoulder_elv_l
        dependent_coordinate_name=LAT1pt3_tz_l scale_factor=0.9272012
      coupled_coordinates_function: SimmSpline f242_l: x=(0 3.14159) y=(0 -0.042)
    CoordinateCouplerConstraint LAT2pt2_tx_con_l: independent_coordinate_names=shoulder_elv_l
        dependent_coordinate_name=LAT2pt2_tx_l scale_factor=0.9272012
      coupled_coordinates_function: SimmSpline f250_l: x=(0 3.14159) y=(0 -0.0141)
    CoordinateCouplerConstraint LAT2pt2_ty_con_l: independent_coordinate_names=shoulder_elv_l
        dependent_coordinate_name=LAT2pt2_ty_l scale_factor=0.9272012
      coupled_coordinates_function: SimmSpline f251_l: x=(0 3.14159) y=(0 0.0305)
    CoordinateCouplerConstraint LAT2pt2_tz_con_l: independent_coordinate_names=shoulder_elv_l
        dependent_coordinate_name=LAT2pt2_tz_l scale_factor=0.9272012
      coupled_coordinates_function: SimmSpline f252_l: x=(0 3.14159) y=(0 -0.0129)
    CoordinateCouplerConstraint LAT2pt3_tx_con_l: independent_coordinate_names=shoulder_elv_l
        dependent_coordinate_name=LAT2pt3_tx_l scale_factor=0.9272012
      coupled_coordinates_function: SimmSpline f260_l: x=(0 3.14159) y=(0 -0.0294)
    CoordinateCouplerConstraint LAT2pt3_ty_con_l: independent_coordinate_names=shoulder_elv_l
        dependent_coordinate_name=LAT2pt3_ty_l scale_factor=0.9272012
      coupled_coordinates_function: SimmSpline f261_l: x=(0 3.14159) y=(0 0.0644)
    CoordinateCouplerConstraint LAT2pt3_tz_con_l: independent_coordinate_names=shoulder_elv_l
        dependent_coordinate_name=LAT2pt3_tz_l scale_factor=0.9272012
      coupled_coordinates_function: SimmSpline f262_l: x=(0 3.14159) y=(0 -0.0721)
    CoordinateCouplerConstraint LAT3pt2_tx_con_l: independent_coordinate_names=shoulder_elv_l
        dependent_coordinate_name=LAT3pt2_tx_l scale_factor=0.9272012
      coupled_coordinates_function: SimmSpline f270_l: x=(0 3.14159) y=(0 -0.0552)
    CoordinateCouplerConstraint LAT3pt2_ty_con_l: independent_coordinate_names=shoulder_elv_l
        dependent_coordinate_name=LAT3pt2_ty_l scale_factor=0.9272012
      coupled_coordinates_function: SimmSpline f271_l: x=(0 3.14159) y=(0 0.0341)
    CoordinateCouplerConstraint LAT3pt2_tz_con_l: independent_coordinate_names=shoulder_elv_l
        dependent_coordinate_name=LAT3pt2_tz_l scale_factor=0.9272012
      coupled_coordinates_function: SimmSpline f272_l: x=(0 3.14159) y=(0 -0.0173)
    CoordinateCouplerConstraint LAT3pt3_tx_con_l: independent_coordinate_names=shoulder_elv_l
        dependent_coordinate_name=LAT3pt3_tx_l scale_factor=0.9272012
      coupled_coordinates_function: SimmSpline f280_l: x=(0 3.14159) y=(0 -0.0366)
    CoordinateCouplerConstraint LAT3pt3_ty_con_l: independent_coordinate_names=shoulder_elv_l
        dependent_coordinate_name=LAT3pt3_ty_l scale_factor=0.9272012
      coupled_coordinates_function: SimmSpline f281_l: x=(0 3.14159) y=(0 0.0744)
    CoordinateCouplerConstraint LAT3pt3_tz_con_l: independent_coordinate_names=shoulder_elv_l
        dependent_coordinate_name=LAT3pt3_tz_l scale_factor=0.9272012
      coupled_coordinates_function: SimmSpline f282_l: x=(0 3.14159) y=(0 -0.0901)
  ForceSet:
    Thelen2003Muscle [values shared by the 154 below unless stated]: min_control=0 max_control=1 optimal_force=1
        max_contraction_velocity=10 activation_time_constant=0.01 deactivation_time_constant=0.04
        FmaxTendonStrain=0.033 FmaxMuscleStrain=0.6 KshapeActive=0.5 KshapePassive=4 Af=0.3 Flen=1.8
    Thelen2003Muscle glut_med1_r: max_isometric_force=1119 optimal_fiber_length=0.0549338
        tendon_slack_length=0.08009041 pennation_angle_at_optimal=0.1396263 [radians]
      PathPoint P1: pelvis (-0.0422158 0.0314549 0.125095)
      PathPoint P2: femur_r (-0.0218 -0.0117 0.0555)
    Thelen2003Muscle glut_med2_r: max_isometric_force=873 optimal_fiber_length=0.08674133 tendon_slack_length=0.0544058
        pennation_angle_at_optimal=0
      PathPoint P1: pelvis (-0.0884669 0.0460441 0.079258)
      PathPoint P2: femur_r (-0.0258 -0.0058 0.0527)
    Thelen2003Muscle glut_med3_r: max_isometric_force=1000 optimal_fiber_length=0.06621652
        tendon_slack_length=0.05432625 pennation_angle_at_optimal=0.3316126
      PathPoint P1: pelvis (-0.126544 0.0108644 0.0670486)
      PathPoint P2: femur_r (-0.0309 -0.0047 0.0518)
    Thelen2003Muscle bifemlh_r: max_isometric_force=2700 optimal_fiber_length=0.1087152 tendon_slack_length=0.3251481
        pennation_angle_at_optimal=0
      PathPoint P1: pelvis (-0.130331 -0.106129 0.0718496)
      PathPoint P2: tibia_r (-0.0301 -0.036 0.02943)
      PathPoint P3: tibia_r (-0.0234 -0.0563 0.0343)
    Thelen2003Muscle bifemsh_r: max_isometric_force=804 optimal_fiber_length=0.173 tendon_slack_length=0.089
        pennation_angle_at_optimal=0.4014257
      PathPoint P1: femur_r (0.005 -0.2111 0.0234)
      PathPoint P2: tibia_r (-0.0301 -0.036 0.02943)
      PathPoint P3: tibia_r (-0.0234 -0.0563 0.0343)
    Thelen2003Muscle sar_r: max_isometric_force=156 optimal_fiber_length=0.5224837 tendon_slack_length=0.1004776
        pennation_angle_at_optimal=0
      PathPoint P1: pelvis (-0.0158309 -0.00134511 0.12851)
      PathPoint P2: femur_r (-0.003 -0.3568 -0.0421)
      PathPoint P3: tibia_r (-0.0056 -0.0419 -0.0399)
      PathPoint P4: tibia_r (0.006 -0.0589 -0.0383)
      PathPoint P5: tibia_r (0.0243 -0.084 -0.0252)
    Thelen2003Muscle add_mag2_r: max_isometric_force=2343 optimal_fiber_length=0.1204254 tendon_slack_length=0.1194301
        pennation_angle_at_optimal=0.05235988
      PathPoint P1: pelvis (-0.0859836 -0.123336 0.0318688)
      PathPoint P2: femur_r (0.0054 -0.2285 0.0227)
    Thelen2003Muscle tfl_r: max_isometric_force=233 optimal_fiber_length=0.09552468 tendon_slack_length=0.4273472
        pennation_angle_at_optimal=0.05235988
      PathPoint P1: pelvis (-0.0321792 0.0221426 0.128406)
      PathPoint P2: femur_r (0.0294 -0.0995 0.0597)
      PathPoint P3: femur_r (0.0054 -0.4049 0.0357)
      PathPoint P4: tibia_r (0.006 -0.0487 0.0297)
    Thelen2003Muscle pect_r: max_isometric_force=266 optimal_fiber_length=0.1009059 tendon_slack_length=0.03329896
        pennation_angle_at_optimal=0
      PathPoint P1: pelvis (-0.0445956 -0.079465 0.046665)
      PathPoint P2: femur_r (-0.0122 -0.0822 0.0253)
    Thelen2003Muscle grac_r: max_isometric_force=162 optimal_fiber_length=0.3506175 tendon_slack_length=0.1255051
        pennation_angle_at_optimal=0.05235988
      PathPoint P1: pelvis (-0.0765781 -0.122819 0.0289095)
      ConditionalPathPoint P2: tibia_r (-0.02657 -0.0319 -0.03774) range=(-0.436332 0.174533) coordinate=knee_angle_r
      PathPoint P3: tibia_r (-0.01943 -0.05153 -0.0358)
      PathPoint P4: tibia_r (0.006 -0.0836 -0.0228)
    Thelen2003Muscle glut_max1_r: max_isometric_force=573 optimal_fiber_length=0.1452638 tendon_slack_length=0.1278731
        pennation_angle_at_optimal=0.08726646
      PathPoint P1: pelvis (-0.123647 0.0633236 0.072429)
      PathPoint P2: pelvis (-0.13358 0.00124164 0.0916744)
      PathPoint P3: femur_r (-0.0457 -0.0248 0.0392)
      PathPoint P4: femur_r (-0.0277 -0.0566 0.047)
    Thelen2003Muscle glut_max2_r: max_isometric_force=819 optimal_fiber_length=0.1497048 tendon_slack_length=0.1293368
        pennation_angle_at_optimal=0
      PathPoint P1: pelvis (-0.139581 0.0182107 0.0582536)
      PathPoint P2: pelvis (-0.142375 -0.0538044 0.0945716)
      PathPoint P3: femur_r (-0.0426 -0.053 0.0293)
      PathPoint P4: femur_r (-0.0156 -0.1016 0.0419)
    Thelen2003Muscle glut_max3_r: max_isometric_force=552 optimal_fiber_length=0.146651 tendon_slack_length=0.1476694
        pennation_angle_at_optimal=0.08726646
      PathPoint P1: pelvis (-0.160999 -0.0324896 0.00600126)
      PathPoint P2: pelvis (-0.158206 -0.10885 0.0416984)
      PathPoint P3: femur_r (-0.0299 -0.1041 0.0135)
      PathPoint P4: femur_r (-0.006 -0.1419 0.0411)
    Thelen2003Muscle iliacus_r: max_isometric_force=1073 optimal_fiber_length=0.1024551 tendon_slack_length=0.1024551
        pennation_angle_at_optimal=0.1221731
      PathPoint P1: pelvis (-0.0697388 0.0377666 0.0883634)
      PathPoint P2: pelvis (-0.0266953 -0.0569085 0.0839142)
      ConditionalPathPoint P3: pelvis (-0.0297994 -0.0832934 0.0844315) range=(-1.5708 0.785398)
          coordinate=hip_flexion_r
      PathPoint P4: femur_r (0.0017 -0.0543 0.0057)
      PathPoint P5: femur_r (-0.0193 -0.0621 0.0129)
    Thelen2003Muscle psoas_r: max_isometric_force=1113 optimal_fiber_length=0.1027287 tendon_slack_length=0.164366
        pennation_angle_at_optimal=0.1396263
      PathPoint P1: pelvis (-0.0669451 0.0917779 0.0299028)
      PathPoint P2: pelvis (-0.0246259 -0.0589779 0.0785337)
      ConditionalPathPoint P3: pelvis (-0.0297994 -0.0832934 0.0844315) range=(-1.5708 0.785398)
          coordinate=hip_flexion_r
      PathPoint P4: femur_r (0.0016 -0.0507 0.0038)
      PathPoint P5: femur_r (-0.0188 -0.0597 0.0104)
    Thelen2003Muscle quad_fem_r: max_isometric_force=381 optimal_fiber_length=0.05519433 tendon_slack_length=0.02453081
        pennation_angle_at_optimal=0
      PathPoint P1: pelvis (-0.118266 -0.119094 0.0538044)
      PathPoint P2: femur_r (-0.0381 -0.0359 0.0366)
    Thelen2003Muscle gem_r: max_isometric_force=164 optimal_fiber_length=0.02442428 tendon_slack_length=0.03968945
        pennation_angle_at_optimal=0
      PathPoint P1: pelvis (-0.117232 -0.0848454 0.0738776)
      PathPoint P2: femur_r (-0.0142 -0.0033 0.0443)
    Thelen2003Muscle peri_r: max_isometric_force=444 optimal_fiber_length=0.0267149 tendon_slack_length=0.1181621
        pennation_angle_at_optimal=0.1745329
      PathPoint P1: pelvis (-0.144444 0.00031041 0.0243154)
      PathPoint P2: pelvis (-0.12344 -0.0285577 0.0679798)
      PathPoint P3: femur_r (-0.0148 -0.0036 0.0437)
    Thelen2003Muscle rect_fem_r: max_isometric_force=1169 optimal_fiber_length=0.114326 tendon_slack_length=0.3108865
        pennation_angle_at_optimal=0.08726646
      PathPoint P1: pelvis (-0.0305236 -0.0321792 0.100159)
      ConditionalPathPoint P2: femur_r (0.0334 -0.403 0.0019) range=(-2.61799 -1.45997) coordinate=knee_angle_r
      MovingPathPoint P3: tibia_r (0.0393665 0.0245931 0.0014) x_coordinate=knee_angle_r y_coordinate=knee_angle_r
          z_coordinate=knee_angle_r
        x_location: MultiplierFunction: scale=1
          SimmSpline: x=(-2.0944 -1.99997 -1.5708 -1.45752 -1.39626 -1.0472 -0.698132 -0.526391 -0.349066 -0.174533 0 0.00017453 0.00034907 0.0279253 0.0872665 0.174533 2.0944)
              y=(0.0155805 0.0179938 0.0275081 0.0296564 0.0307615 0.0365695 0.0422074 0.0450902 0.048391 0.0534299 0.0617576 0.0617669 0.0617762 0.0633083 0.066994 0.0733035 0.0573481)
        y_location: MultiplierFunction: scale=1
          SimmSpline: x=(-2.0944 -1.99997 -1.5708 -1.45752 -1.39626 -1.0472 -0.698132 -0.526391 -0.349066 -0.174533 0 0.00017453 0.00034907 0.0279253 0.0872665 0.174533 2.0944)
              y=(0.0234116 0.0237613 0.0251141 0.0252795 0.0253146 0.0249184 0.0242373 0.0238447 0.0234197 0.0227644 0.020984 0.0209814 0.0209788 0.0205225 0.0191754 0.0159554 -0.0673774)
        z_location: MultiplierFunction: scale=1
          SimmSpline: x=(-2.0944 0.1745) y=(0.0014 0.0014)
    Thelen2003Muscle vas_int_r: max_isometric_force=5000 optimal_fiber_length=0.107 tendon_slack_length=0.116
        pennation_angle_at_optimal=0.05235988
      PathPoint P1: femur_r (0.029 -0.1924 0.031)
      PathPoint P2: femur_r (0.0335 -0.2084 0.0285)
      ConditionalPathPoint P3: femur_r (0.0343 -0.403 0.0055) range=(-2.61799 -1.42) coordinate=knee_angle_r
      MovingPathPoint P4: tibia_r (0.0320805 0.0268511 0.0018) x_coordinate=knee_angle_r y_coordinate=knee_angle_r
          z_coordinate=knee_angle_r
        x_location: MultiplierFunction: scale=1
          SimmSpline: x=(-2.0944 -1.99997 -1.5708 -1.45752 -1.39626 -1.0472 -0.698132 -0.526391 -0.349066 -0.174533 0 0.00017453 0.00034907 0.0279253 0.0872665 0.174533 2.0944)
              y=(0.0082733 0.0106866 0.0202042 0.022353 0.0234583 0.0292715 0.0349465 0.037871 0.0412569 0.0465287 0.0554632 0.0554735 0.0554837 0.0571717 0.061272 0.0684368 0.0648818)
        y_location: MultiplierFunction: scale=1
          SimmSpline: x=(-2.0944 -1.99997 -1.5708 -1.45752 -1.39626 -1.0472 -0.698132 -0.526391 -0.349066 -0.174533 0 0.00017453 0.00034907 0.0279253 0.0872665 0.174533 2.0944)
              y=(0.025599 0.0259487 0.0273124 0.0274796 0.0275151 0.0271363 0.0265737 0.0263073 0.0261187 0.0260129 0.0252923 0.0252911 0.0252898 0.0250526 0.0242191 0.0218288 -0.0685706)
        z_location: MultiplierFunction: scale=1
          SimmSpline: x=(-2.0944 2.0944) y=(0.0018 0.0018)
    Thelen2003Muscle med_gas_r: max_isometric_force=2500 optimal_fiber_length=0.09 tendon_slack_length=0.36
        pennation_angle_at_optimal=0.296706
      PathPoint P1: femur_r (-0.019 -0.3929 -0.0235)
      ConditionalPathPoint P2: femur_r (-0.03 -0.4022 -0.0258) range=(-0.785398 0.174533) coordinate=knee_angle_r
      PathPoint P3: calcn_r (0 0.031 -0.0053)
    Thelen2003Muscle soleus_r: max_isometric_force=4000 optimal_fiber_length=0.08 tendon_slack_length=0.22
        pennation_angle_at_optimal=0.4363323
      PathPoint P1: tibia_r (-0.0024 -0.1533 0.0071)
      PathPoint P2: calcn_r (0 0.031 -0.0053)
    Thelen2003Muscle tib_post_r: max_isometric_force=3600 optimal_fiber_length=0.031 tendon_slack_length=0.31
        pennation_angle_at_optimal=0.2094395
      PathPoint P1: tibia_r (-0.0094 -0.1348 0.0019)
      PathPoint P2: tibia_r (-0.0144 -0.4051 -0.0229)
      PathPoint P3: calcn_r (0.0417 0.0334 -0.0286)
      PathPoint P4: calcn_r (0.0772 0.0159 -0.0281)
    Thelen2003Muscle tib_ant_r: max_isometric_force=3000 optimal_fiber_length=0.098 tendon_slack_length=0.223
        pennation_angle_at_optimal=0.08726646
      PathPoint P1: tibia_r (0.0179 -0.1624 0.0115)
      PathPoint P2: tibia_r (0.0329 -0.3951 -0.0177)
      PathPoint P3: calcn_r (0.1166 0.0178 -0.0305)
    Thelen2003Muscle glut_med1_l: max_isometric_force=1119 optimal_fiber_length=0.0549338
        tendon_slack_length=0.08009041 pennation_angle_at_optimal=0.1396263
      PathPoint P1: pelvis (-0.0422158 0.0314549 -0.125095)
      PathPoint P2: femur_l (-0.0218 -0.0117 -0.0555)
    Thelen2003Muscle glut_med2_l: max_isometric_force=873 optimal_fiber_length=0.08674133 tendon_slack_length=0.0544058
        pennation_angle_at_optimal=0
      PathPoint P1: pelvis (-0.0884669 0.0460441 -0.079258)
      PathPoint P2: femur_l (-0.0258 -0.0058 -0.0527)
    Thelen2003Muscle glut_med3_l: max_isometric_force=1000 optimal_fiber_length=0.06621652
        tendon_slack_length=0.05432625 pennation_angle_at_optimal=0.3316126
      PathPoint P1: pelvis (-0.126544 0.0108644 -0.0670486)
      PathPoint P2: femur_l (-0.0309 -0.0047 -0.0518)
    Thelen2003Muscle bifemlh_l: max_isometric_force=2700 optimal_fiber_length=0.1087152 tendon_slack_length=0.3251481
        pennation_angle_at_optimal=0
      PathPoint P1: pelvis (-0.130331 -0.106129 -0.0718496)
      PathPoint P2: tibia_l (-0.0301 -0.036 -0.02943)
      PathPoint P3: tibia_l (-0.0234 -0.0563 -0.0343)
    Thelen2003Muscle bifemsh_l: max_isometric_force=804 optimal_fiber_length=0.173 tendon_slack_length=0.089
        pennation_angle_at_optimal=0.4014257
      PathPoint P1: femur_l (0.005 -0.2111 -0.0234)
      PathPoint P2: tibia_l (-0.0301 -0.036 -0.02943)
      PathPoint P3: tibia_l (-0.0234 -0.0563 -0.0343)
    Thelen2003Muscle sar_l: max_isometric_force=156 optimal_fiber_length=0.5224837 tendon_slack_length=0.1004776
        pennation_angle_at_optimal=0
      PathPoint P1: pelvis (-0.0158309 -0.00134511 -0.12851)
      PathPoint P2: femur_l (-0.003 -0.3568 0.0421)
      PathPoint P3: tibia_l (-0.0056 -0.0419 0.0399)
      PathPoint P4: tibia_l (0.006 -0.0589 0.0383)
      PathPoint P5: tibia_l (0.0243 -0.084 0.0252)
    Thelen2003Muscle add_mag2_l: max_isometric_force=2343 optimal_fiber_length=0.1204254 tendon_slack_length=0.1194301
        pennation_angle_at_optimal=0.05235988
      PathPoint P1: pelvis (-0.0859836 -0.123336 -0.0318688)
      PathPoint P2: femur_l (0.0054 -0.2285 -0.0227)
    Thelen2003Muscle tfl_l: max_isometric_force=233 optimal_fiber_length=0.09552468 tendon_slack_length=0.4273472
        pennation_angle_at_optimal=0.05235988
      PathPoint P1: pelvis (-0.0321792 0.0221426 -0.128406)
      PathPoint P2: femur_l (0.0294 -0.0995 -0.0597)
      PathPoint P3: femur_l (0.0054 -0.4049 -0.0357)
      PathPoint P4: tibia_l (0.006 -0.0487 -0.0297)
    Thelen2003Muscle pect_l: max_isometric_force=266 optimal_fiber_length=0.1009059 tendon_slack_length=0.03329896
        pennation_angle_at_optimal=0
      PathPoint P1: pelvis (-0.0445956 -0.079465 -0.046665)
      PathPoint P2: femur_l (-0.0122 -0.0822 -0.0253)
    Thelen2003Muscle grac_l: max_isometric_force=162 optimal_fiber_length=0.3506175 tendon_slack_length=0.1255051
        pennation_angle_at_optimal=0.05235988
      PathPoint P1: pelvis (-0.0765781 -0.122819 -0.0289095)
      ConditionalPathPoint P2: tibia_l (-0.02657 -0.0319 0.03774) range=(-0.436332 0.174533) coordinate=knee_angle_l
      PathPoint P3: tibia_l (-0.01943 -0.05153 0.0358)
      PathPoint P4: tibia_l (0.006 -0.0836 0.0228)
    Thelen2003Muscle glut_max1_l: max_isometric_force=573 optimal_fiber_length=0.1452638 tendon_slack_length=0.1278731
        pennation_angle_at_optimal=0.08726646
      PathPoint P1: pelvis (-0.123647 0.0633236 -0.072429)
      PathPoint P2: pelvis (-0.13358 0.00124164 -0.0916744)
      PathPoint P3: femur_l (-0.0457 -0.0248 -0.0392)
      PathPoint P4: femur_l (-0.0277 -0.0566 -0.047)
    Thelen2003Muscle glut_max2_l: max_isometric_force=819 optimal_fiber_length=0.1497048 tendon_slack_length=0.1293368
        pennation_angle_at_optimal=0
      PathPoint P1: pelvis (-0.139581 0.0182107 -0.0582536)
      PathPoint P2: pelvis (-0.142375 -0.0538044 -0.0945716)
      PathPoint P3: femur_l (-0.0426 -0.053 -0.0293)
      PathPoint P4: femur_l (-0.0156 -0.1016 -0.0419)
    Thelen2003Muscle glut_max3_l: max_isometric_force=552 optimal_fiber_length=0.146651 tendon_slack_length=0.1476694
        pennation_angle_at_optimal=0.08726646
      PathPoint P1: pelvis (-0.160999 -0.0324896 -0.00600126)
      PathPoint P2: pelvis (-0.158206 -0.10885 -0.0416984)
      PathPoint P3: femur_l (-0.0299 -0.1041 -0.0135)
      PathPoint P4: femur_l (-0.006 -0.1419 -0.0411)
    Thelen2003Muscle iliacus_l: max_isometric_force=1073 optimal_fiber_length=0.1024551 tendon_slack_length=0.1024551
        pennation_angle_at_optimal=0.1221731
      PathPoint P1: pelvis (-0.0697388 0.0377666 -0.0883634)
      PathPoint P2: pelvis (-0.0266953 -0.0569085 -0.0839142)
      ConditionalPathPoint P3: pelvis (-0.0297994 -0.0832934 -0.0844315) range=(-1.5708 0.785398)
          coordinate=hip_flexion_l
      PathPoint P4: femur_l (0.0017 -0.0543 -0.0057)
      PathPoint P5: femur_l (-0.0193 -0.0621 -0.0129)
    Thelen2003Muscle psoas_l: max_isometric_force=1113 optimal_fiber_length=0.1027287 tendon_slack_length=0.164366
        pennation_angle_at_optimal=0.1396263
      PathPoint P1: pelvis (-0.0669451 0.0917779 -0.0299028)
      PathPoint P2: pelvis (-0.0246259 -0.0589779 -0.0785337)
      ConditionalPathPoint P3: pelvis (-0.0297994 -0.0832934 -0.0844315) range=(-1.5708 0.785398)
          coordinate=hip_flexion_l
      PathPoint P4: femur_l (0.0016 -0.0507 -0.0038)
      PathPoint P5: femur_l (-0.0188 -0.0597 -0.0104)
    Thelen2003Muscle quad_fem_l: max_isometric_force=381 optimal_fiber_length=0.05519433 tendon_slack_length=0.02453081
        pennation_angle_at_optimal=0
      PathPoint P1: pelvis (-0.118266 -0.119094 -0.0538044)
      PathPoint P2: femur_l (-0.0381 -0.0359 -0.0366)
    Thelen2003Muscle gem_l: max_isometric_force=164 optimal_fiber_length=0.02442428 tendon_slack_length=0.03968945
        pennation_angle_at_optimal=0
      PathPoint P1: pelvis (-0.117232 -0.0848454 -0.0738776)
      PathPoint P2: femur_l (-0.0142 -0.0033 -0.0443)
    Thelen2003Muscle peri_l: max_isometric_force=444 optimal_fiber_length=0.0267149 tendon_slack_length=0.1181621
        pennation_angle_at_optimal=0.1745329
      PathPoint P1: pelvis (-0.144444 0.00031041 -0.0243154)
      PathPoint P2: pelvis (-0.12344 -0.0285577 -0.0679798)
      PathPoint P3: femur_l (-0.0148 -0.0036 -0.0437)
    Thelen2003Muscle rect_fem_l: max_isometric_force=1169 optimal_fiber_length=0.114326 tendon_slack_length=0.3108865
        pennation_angle_at_optimal=0.08726646
      PathPoint P1: pelvis (-0.0305236 -0.0321792 -0.100159)
      ConditionalPathPoint P2: femur_l (0.0334 -0.403 -0.0019) range=(-2.61799 -1.45997) coordinate=knee_angle_l
      MovingPathPoint P3: tibia_l (0.0393665 0.0245931 -0.0014) x_coordinate=knee_angle_l y_coordinate=knee_angle_l
          z_coordinate=knee_angle_l
        x_location: MultiplierFunction: scale=1
          SimmSpline: x=(-2.0944 -1.99997 -1.5708 -1.45752 -1.39626 -1.0472 -0.698132 -0.526391 -0.349066 -0.174533 0 0.00017453 0.00034907 0.0279253 0.0872665 0.174533 2.0944)
              y=(0.0155805 0.0179938 0.0275081 0.0296564 0.0307615 0.0365695 0.0422074 0.0450902 0.048391 0.0534299 0.0617576 0.0617669 0.0617762 0.0633083 0.066994 0.0733035 0.0573481)
        y_location: MultiplierFunction: scale=1
          SimmSpline: x=(-2.0944 -1.99997 -1.5708 -1.45752 -1.39626 -1.0472 -0.698132 -0.526391 -0.349066 -0.174533 0 0.00017453 0.00034907 0.0279253 0.0872665 0.174533 2.0944)
              y=(0.0234116 0.0237613 0.0251141 0.0252795 0.0253146 0.0249184 0.0242373 0.0238447 0.0234197 0.0227644 0.020984 0.0209814 0.0209788 0.0205225 0.0191754 0.0159554 -0.0673774)
        z_location: MultiplierFunction: scale=1
          SimmSpline: x=(-2.0944 0.1745) y=(-0.0014 -0.0014)
    Thelen2003Muscle vas_int_l: max_isometric_force=5000 optimal_fiber_length=0.107 tendon_slack_length=0.116
        pennation_angle_at_optimal=0.05235988
      PathPoint P1: femur_l (0.029 -0.1924 -0.031)
      PathPoint P2: femur_l (0.0335 -0.2084 -0.0285)
      ConditionalPathPoint P3: femur_l (0.0343 -0.403 -0.0055) range=(-2.61799 -1.42) coordinate=knee_angle_l
      MovingPathPoint P4: tibia_l (0.0320805 0.0268511 -0.0018) x_coordinate=knee_angle_l y_coordinate=knee_angle_l
          z_coordinate=knee_angle_l
        x_location: MultiplierFunction: scale=1
          SimmSpline: x=(-2.0944 -1.99997 -1.5708 -1.45752 -1.39626 -1.0472 -0.698132 -0.526391 -0.349066 -0.174533 0 0.00017453 0.00034907 0.0279253 0.0872665 0.174533 2.0944)
              y=(0.0082733 0.0106866 0.0202042 0.022353 0.0234583 0.0292715 0.0349465 0.037871 0.0412569 0.0465287 0.0554632 0.0554735 0.0554837 0.0571717 0.061272 0.0684368 0.0648818)
        y_location: MultiplierFunction: scale=1
          SimmSpline: x=(-2.0944 -1.99997 -1.5708 -1.45752 -1.39626 -1.0472 -0.698132 -0.526391 -0.349066 -0.174533 0 0.00017453 0.00034907 0.0279253 0.0872665 0.174533 2.0944)
              y=(0.025599 0.0259487 0.0273124 0.0274796 0.0275151 0.0271363 0.0265737 0.0263073 0.0261187 0.0260129 0.0252923 0.0252911 0.0252898 0.0250526 0.0242191 0.0218288 -0.0685706)
        z_location: MultiplierFunction: scale=1
          SimmSpline: x=(-2.0944 2.0944) y=(-0.0018 -0.0018)
    Thelen2003Muscle med_gas_l: max_isometric_force=2500 optimal_fiber_length=0.09 tendon_slack_length=0.36
        pennation_angle_at_optimal=0.296706
      PathPoint P1: femur_l (-0.019 -0.3929 0.0235)
      ConditionalPathPoint P2: femur_l (-0.03 -0.4022 0.0258) range=(-0.785398 0.174533) coordinate=knee_angle_l
      PathPoint P3: calcn_l (0 0.031 0.0053)
    Thelen2003Muscle soleus_l: max_isometric_force=4000 optimal_fiber_length=0.08 tendon_slack_length=0.22
        pennation_angle_at_optimal=0.4363323
      PathPoint P1: tibia_l (-0.0024 -0.1533 -0.0071)
      PathPoint P2: calcn_l (0 0.031 0.0053)
    Thelen2003Muscle tib_post_l: max_isometric_force=3600 optimal_fiber_length=0.031 tendon_slack_length=0.31
        pennation_angle_at_optimal=0.2094395
      PathPoint P1: tibia_l (-0.0094 -0.1348 -0.0019)
      PathPoint P2: tibia_l (-0.0144 -0.4051 0.0229)
      PathPoint P3: calcn_l (0.0417 0.0334 0.0286)
      PathPoint P4: calcn_l (0.0772 0.0159 0.0281)
    Thelen2003Muscle tib_ant_l: max_isometric_force=3000 optimal_fiber_length=0.098 tendon_slack_length=0.223
        pennation_angle_at_optimal=0.08726646
      PathPoint P1: tibia_l (0.0179 -0.1624 -0.0115)
      PathPoint P2: tibia_l (0.0329 -0.3951 0.0177)
      PathPoint P3: calcn_l (0.1166 0.0178 0.0305)
    Thelen2003Muscle ercspn_r: max_isometric_force=2500 optimal_fiber_length=0.1147016 tendon_slack_length=0.02867541
        pennation_angle_at_optimal=0
      PathPoint P1: pelvis (-0.144858 0.0454233 0.0451129)
      PathPoint P2: thorax (-0.0700037 -0.248954 0.0223456)
    Thelen2003Muscle ercspn_l: max_isometric_force=2500 optimal_fiber_length=0.1147016 tendon_slack_length=0.02867541
        pennation_angle_at_optimal=0
      PathPoint P1: pelvis (-0.144858 0.0454233 -0.0451129)
      PathPoint P2: thorax (-0.0700037 -0.248954 -0.0223456)
    Thelen2003Muscle intobl_r: max_isometric_force=900 optimal_fiber_length=0.09645673 tendon_slack_length=0.09645673
        pennation_angle_at_optimal=0
      PathPoint P1: pelvis (-0.041388 0.072429 0.119715)
      PathPoint P2: thorax (0.0458965 -0.202594 0.013908)
    Thelen2003Muscle intobl_l: max_isometric_force=900 optimal_fiber_length=0.09645673 tendon_slack_length=0.09645673
        pennation_angle_at_optimal=0
      PathPoint P1: pelvis (-0.041388 0.072429 -0.119715)
      PathPoint P2: thorax (0.0458965 -0.202594 -0.013908)
    Thelen2003Muscle extobl_r: max_isometric_force=900 optimal_fiber_length=0.117599 tendon_slack_length=0.1371988
        pennation_angle_at_optimal=0
      PathPoint P1: pelvis (-0.031041 -0.0658069 0.010347)
      PathPoint P2: thorax (0.0412604 -0.248954 0.101992)
    Thelen2003Muscle extobl_l: max_isometric_force=900 optimal_fiber_length=0.117599 tendon_slack_length=0.1371988
        pennation_angle_at_optimal=0
      PathPoint P1: pelvis (-0.031041 -0.0658069 -0.010347)
      PathPoint P2: thorax (0.0412604 -0.248954 -0.101992)
    Thelen2003Muscle DELT1: max_isometric_force=1142.6 optimal_fiber_length=0.08846487 tendon_slack_length=0.08429542
        pennation_angle_at_optimal=0.3839724
      PathPoint P1: humerus (0.007963 -0.105607 0.00519904)
      PathPoint P2: humerus (0.014424 -0.0980537 0.00366155)
      PathPoint P3: scapula (0.0403054 -0.0301526 0.000917924)
      PathPoint P4: clavicle (-0.0129809 0.0102549 0.0743708)
      PathWrap: wrap_object=delt2hum method=hybrid
      PathWrap: wrap_object=DELT1hh method=hybrid range=(2 3)
    Thelen2003Muscle DELT2: max_isometric_force=1142.6 optimal_fiber_length=0.09894139 tendon_slack_length=0.1005017
        pennation_angle_at_optimal=0.2617994
      PathPoint P1: humerus (0.00409703 -0.120964 0.00497686)
      PathPoint P2: DELT2pt2 (0.0264165 0.00519589 0.0466853)
      PathPoint P3: scapula (4.63555e-5 0.00272597 0.0207044)
      PathPoint P4: scapula (-0.00999523 -0.00031525 0.00574865)
      PathWrap: wrap_object=Deltoid2 method=hybrid
      PathWrap: wrap_object=delt2hum method=hybrid
      PathWrap: wrap_object=TMAJ_LAT_PEC_CORBhh method=hybrid
    Thelen2003Muscle DELT3: max_isometric_force=259.88 optimal_fiber_length=0.1247194 tendon_slack_length=0.03466963
        pennation_angle_at_optimal=0.3141593
      PathPoint P1: scapula (-0.0516729 0.00113118 -0.0232913)
      PathPoint P2: scapula (-0.0671942 -0.0304586 0.0114323)
      PathPoint P3: humerus (0.00183078 -0.0675609 0.00928719)
      PathWrap: wrap_object=Delt3 method=hybrid
      PathWrap: wrap_object=delt3hum method=hybrid
      PathWrap: wrap_object=TMAJ_LAT_PEC_CORBhh method=hybrid
    Thelen2003Muscle SUPSP: max_isometric_force=487.82 optimal_fiber_length=0.06263978 tendon_slack_length=0.03627964
        pennation_angle_at_optimal=0.1221731
      PathPoint P1: humerus (0.00227514 0.00944717 0.0230447)
      PathPoint P2: scapula (-0.0177837 0.00117755 -0.0117847)
      PathPoint P3: scapula (-0.0407968 -0.0140193 -0.0542877)
      PathWrap: wrap_object=SUPSP method=hybrid
    Thelen2003Muscle INFSP: max_isometric_force=1210.84 optimal_fiber_length=0.0696115 tendon_slack_length=0.0283978
        pennation_angle_at_optimal=0.3228859
      PathPoint P1: humerus (-0.00788299 0.00430144 0.021756)
      PathPoint P2: scapula (-0.068446 -0.0507736 -0.0443294)
      PathWrap: wrap_object=INFSP method=hybrid
      PathWrap: wrap_object=INFSP_and_TMIN_hum_head method=hybrid
    Thelen2003Muscle SUBSC: max_isometric_force=1377.81 optimal_fiber_length=0.08068264 tendon_slack_length=0.03049859
        pennation_angle_at_optimal=0.3490659
      PathPoint P1: humerus (0.0124688 0.00746529 -0.0118289)
      PathPoint P2: scapula (-0.0169771 -0.0484277 -0.0227814)
      PathPoint P3: scapula (-0.067185 -0.0365595 -0.0600363)
      PathWrap: wrap_object=SUBSCAP method=hybrid
    Thelen2003Muscle TMIN: max_isometric_force=354.25 optimal_fiber_length=0.06849363 tendon_slack_length=0.06590548
        pennation_angle_at_optimal=0.418879
      PathPoint P1: humerus (-0.000977604 -0.0112335 0.0191609)
      PathPoint P2: scapula (-0.0878337 -0.0740927 -0.0439215)
      PathPoint P3: scapula (-0.0894099 -0.075298 -0.0491231)
      PathWrap: wrap_object=TMIN method=hybrid range=(1 2)
      PathWrap: wrap_object=INFSP_and_TMIN_hum_head method=hybrid range=(1 2)
      PathWrap: wrap_object=TMINhum method=hybrid range=(1 2)
    Thelen2003Muscle TMAJ: max_isometric_force=425.39 optimal_fiber_length=0.1506385 tendon_slack_length=0.01855154
        pennation_angle_at_optimal=0.2792527
      PathPoint P1: humerus (0.0088695 -0.0481601 -0.00504797)
      PathPoint P2: scapula (-0.095168 -0.0956781 -0.0540466)
      PathPoint P3: scapula (-0.0972544 -0.101019 -0.0659889)
      PathWrap: wrap_object=TMAJ_LAThum method=hybrid
      PathWrap: wrap_object=LAT_TMAJhh method=hybrid range=(1 2)
      PathWrap: wrap_object=LAT_TMAJ2hh method=hybrid
    Thelen2003Muscle PECM1: max_isometric_force=364.41 optimal_fiber_length=0.1366296 tendon_slack_length=0.002652998
        pennation_angle_at_optimal=0.296706
      PathPoint P1: humerus (0.0103892 -0.0372465 0.00693206)
      PathPoint P2: PEC1pt2 (0.0156848 -0.0392849 -0.0056038)
      PathPoint P3: PEC1pt3 (0.0093041 -0.0146554 0.122992)
      PathPoint P4: clavicle (0.00297632 -0.000120535 0.0474078)
      PathWrap: wrap_object=Thorax method=hybrid
      PathWrap: wrap_object=PEC12hum method=hybrid range=(2 3)
      PathWrap: wrap_object=PEC1hh method=hybrid
    Thelen2003Muscle PECM2: max_isometric_force=515.41 optimal_fiber_length=0.1301269 tendon_slack_length=0.08361942
        pennation_angle_at_optimal=0.4363323
      PathPoint P1: humerus (0.0113224 -0.0381174 0.0069765)
      PathPoint P2: PEC2pt2 (0.0141114 -0.0443642 -0.00667211)
      PathPoint P3: PEC2pt3 (0.0195987 -0.0404503 0.123245)
      PathPoint P4: thorax (0.0286598 -0.0363648 0.0899853)
      PathPoint P5: thorax (0.0256742 -0.0417055 0.0210567)
      PathWrap: wrap_object=Thorax method=hybrid
      PathWrap: wrap_object=PEC12hum method=hybrid range=(2 3)
      PathWrap: wrap_object=TMAJ_LAT_PEC_CORBhh method=hybrid
      PathWrap: wrap_object=PEC23hh method=hybrid
    Thelen2003Muscle PECM3: max_isometric_force=390.55 optimal_fiber_length=0.129062 tendon_slack_length=0.123005
        pennation_angle_at_optimal=0.4363323
      PathPoint P1: humerus (0.0112779 -0.0388818 0.00666545)
      PathPoint P2: PEC3pt2 (0.012072 -0.0500845 -0.0175495)
      PathPoint P3: PEC3pt3 (0.0289805 -0.0689549 0.111785)
      PathPoint P4: thorax (0.0486781 -0.0780426 0.0828454)
      PathPoint P5: thorax (0.053073 -0.108056 0.0351131)
      PathWrap: wrap_object=Thorax method=hybrid
      PathWrap: wrap_object=PEC3hum method=hybrid range=(2 3)
      PathWrap: wrap_object=PEC23hh method=hybrid
    Thelen2003Muscle LAT1: max_isometric_force=389.1 optimal_fiber_length=0.2385013 tendon_slack_length=0.1126778
        pennation_angle_at_optimal=0.4363323
      PathPoint P1: humerus (0.00933159 -0.03035 -0.00580338)
      PathPoint P2: LAT1pt2 (-0.0771809 -0.0833383 -0.0212497)
      PathPoint P3: LAT1pt3 (-0.10892 -0.0949732 -0.0516871)
      PathPoint P4: thorax (-0.109669 -0.0938146 0.0307459)
      PathPoint P5: thorax (-0.0888073 -0.108705 0.00817791)
      PathWrap: wrap_object=TMAJ_LAThum method=hybrid
      PathWrap: wrap_object=LAT_TMAJhh method=hybrid range=(1 2)
      PathWrap: wrap_object=LAT_TMAJ2hh method=hybrid
    Thelen2003Muscle LAT2: max_isometric_force=389.1 optimal_fiber_length=0.2172423 tendon_slack_length=0.1649882
        pennation_angle_at_optimal=0.3316126
      PathPoint P1: humerus (0.0086029 -0.0361801 -0.00543011)
      PathPoint P2: LAT2pt2 (-0.0741993 -0.0992563 -0.0175592)
      PathPoint P3: LAT2pt3 (-0.0976438 -0.135666 -0.0510654)
      PathPoint P4: thorax (-0.101918 -0.156771 0.0266849)
      PathPoint P5: thorax (-0.0666287 -0.17448 0.00755668)
      PathWrap: wrap_object=TMAJ_LAThum method=hybrid
      PathWrap: wrap_object=LAT_TMAJhh method=hybrid range=(1 2)
      PathWrap: wrap_object=LAT_TMAJ2hh method=hybrid
    Thelen2003Muscle LAT3: max_isometric_force=281.66 optimal_fiber_length=0.2612878 tendon_slack_length=0.1314402
        pennation_angle_at_optimal=0.3665191
      PathPoint P1: humerus (0.0107359 -0.0348558 -0.00369709)
      PathPoint P2: LAT3pt2 (-0.0551445 -0.129198 -0.0206865)
      PathPoint P3: LAT3pt3 (-0.0917687 -0.170473 -0.0447333)
      PathPoint P4: thorax (-0.103448 -0.179756 0.0512928)
      PathPoint P5: thorax (-0.0659889 -0.230484 0.00840972)
      PathWrap: wrap_object=TMAJ_LAThum method=hybrid
      PathWrap: wrap_object=LAT_TMAJhh method=hybrid range=(1 2)
      PathWrap: wrap_object=LAT_TMAJ2hh method=hybrid
    Thelen2003Muscle CORB: max_isometric_force=242.46 optimal_fiber_length=0.08284827 tendon_slack_length=0.0862262
        pennation_angle_at_optimal=0
      PathPoint P1: scapula (0.01159 -0.0382656 -0.0245893)
      PathPoint P2: scapula (0.00447838 -0.0645146 -0.0144922)
      PathPoint P3: humerus (0.00660324 -0.133735 -0.00694984)
      PathWrap: wrap_object=CORBhum method=hybrid
      PathWrap: wrap_object=TMAJ_LAT_PEC_CORBhh method=hybrid
    Thelen2003Muscle TRIlong: max_isometric_force=798.52 optimal_fiber_length=0.1187309 tendon_slack_length=0.1267053
        pennation_angle_at_optimal=0.2094395
      PathPoint P1: scapula (-0.0423268 -0.0377649 -0.0127675)
      PathPoint P2: humerus (-0.02412 -0.101679 -0.00590114)
      PathPoint P3: humerus (-0.028297 -0.201181 -0.0108159)
      PathPoint P4: humerus (-0.0154905 -0.237796 -0.0107359)
      PathPoint P5: ulna (-0.0208393 0.00995342 -0.000742221)
      PathWrap: wrap_object=TRI method=hybrid
      PathWrap: wrap_object=TRIlonghh method=hybrid
      PathWrap: wrap_object=TRIlongglen method=hybrid
    Thelen2003Muscle TRIlat: max_isometric_force=624.3 optimal_fiber_length=0.1006283 tendon_slack_length=0.08665706
        pennation_angle_at_optimal=0.1570796
      PathPoint P1: humerus (-0.00532347 -0.112388 0.00380375)
      PathPoint P2: humerus (-0.0208317 -0.129114 0.00824735)
      PathPoint P3: humerus (-0.028297 -0.201181 -0.0108159)
      PathPoint P4: humerus (-0.0154905 -0.237796 -0.0107359)
      PathPoint P5: ulna (-0.0208393 0.00995342 -0.000742221)
      PathWrap: wrap_object=TRI method=hybrid
    Thelen2003Muscle TRImed: max_isometric_force=624.3 optimal_fiber_length=0.1005875 tendon_slack_length=0.08025786
        pennation_angle_at_optimal=0.1570796
      PathPoint P1: humerus (-0.00744752 -0.121711 -0.00805187)
      PathPoint P2: humerus (-0.0231158 -0.134544 -0.00959831)
      PathPoint P3: humerus (-0.028297 -0.201181 -0.0108159)
      PathPoint P4: humerus (-0.0154905 -0.237796 -0.0107359)
      PathPoint P5: ulna (-0.0208393 0.00995342 -0.000742221)
      PathWrap: wrap_object=TRI method=hybrid
    Thelen2003Muscle ANC: max_isometric_force=350 optimal_fiber_length=0.02484556 tendon_slack_length=0.01656371
        pennation_angle_at_optimal=0
      PathPoint P1: humerus (-0.00661212 -0.252034 0.00870065)
      PathPoint P2: ulna (-0.0240938 -0.00117994 0.00570941)
      PathWrap: wrap_object=ANC method=hybrid
    Thelen2003Muscle SUP: max_isometric_force=476 optimal_fiber_length=0.03140175 tendon_slack_length=0.02664391
        pennation_angle_at_optimal=0
      PathPoint P1: radius (0.00947765 -0.0580076 0.000713676)
      PathPoint P2: radius (0.0114284 -0.049196 -0.00101818)
      PathPoint P3: ulna (-0.0129413 -0.0322011 0.0191551)
      PathWrap: wrap_object=SUP method=hybrid
    Thelen2003Muscle BIClong: max_isometric_force=624.3 optimal_fiber_length=0.1040345 tendon_slack_length=0.2448451
        pennation_angle_at_optimal=0
      PathPoint P1: scapula (-0.0289565 -0.0218171 -0.0120999)
      PathPoint P2: scapula (-0.0194155 -0.012137 -0.0042744)
      PathPoint P3: humerus (0.0189387 0.0159349 0.0091361)
      PathPoint P4: humerus (0.0211339 -0.00454139 0.0106736)
      PathPoint P5: humerus (0.0119534 -0.0251242 0.00120867)
      PathPoint P6: humerus (0.00949153 -0.0687519 -0.00146639)
      PathPoint P7: humerus (0.015135 -0.107758 0.000213295)
      PathPoint P8: humerus (0.020263 -0.155882 -0.00559898)
      PathPoint P9: bicpt2 (0 0 0)
      ConditionalPathPoint P10: bicpt (0 0 0) range=(-0.638791 1.5708) coordinate=pro_sup
      PathPoint P11: radius (-0.00190314 -0.0356838 -0.00190314)
      PathWrap: wrap_object=Elbow_BIC_BRD method=hybrid
      PathWrap: wrap_object=BIClong method=hybrid range=(2 3)
    Thelen2003Muscle BICshort: max_isometric_force=435.56 optimal_fiber_length=0.1188584 tendon_slack_length=0.173024
        pennation_angle_at_optimal=0
      PathPoint P1: scapula (0.0117569 -0.0364483 -0.0243391)
      PathPoint P2: scapula (0.000862296 -0.0621595 -0.0147704)
      PathPoint P3: humerus (0.00992709 -0.0673299 -0.00978488)
      PathPoint P4: humerus (0.015135 -0.107758 -0.00958938)
      PathPoint P5: humerus (0.020263 -0.155882 -0.00559898)
      PathPoint P6: bicpt2 (0 0 0)
      ConditionalPathPoint P7: bicpt (0 0 0) range=(-0.638791 1.5708) coordinate=pro_sup
      PathPoint P8: radius (-0.00190314 -0.0356838 -0.00190314)
      PathWrap: wrap_object=Elbow_BIC_BRD method=hybrid
    Thelen2003Muscle BRA: max_isometric_force=987.26 optimal_fiber_length=0.077148 tendon_slack_length=0.0481051
        pennation_angle_at_optimal=0
      PathPoint P1: humerus (0.00604334 -0.15455 -0.00319941)
      ConditionalPathPoint P2: humerus (0.0168325 -0.253811 -0.00982041) range=(0 0.813149) coordinate=elbow_flexion
      ConditionalPathPoint P3: ulna (0.00473881 -0.0139214 0.00121801) range=(0 0.813149) coordinate=elbow_flexion
      PathPoint P4: ulna (-0.00304501 -0.0227425 0.00085641)
    Thelen2003Muscle BRD: max_isometric_force=261.33 optimal_fiber_length=0.161269 tendon_slack_length=0.1242687
        pennation_angle_at_optimal=0
      PathPoint P1: humerus (-0.00870952 -0.177416 0.00198186)
      PathPoint P2: radius (0.0340376 -0.121249 0.0220288)
      PathPoint P3: radius (0.0398707 -0.210296 0.0213151)
      PathWrap: wrap_object=Elbow_BIC_BRD method=hybrid
    Thelen2003Muscle ECRL: max_isometric_force=304.89 optimal_fiber_length=0.07797749 tendon_slack_length=0.2156415
        pennation_angle_at_optimal=0
      PathPoint P1: humerus (-0.00648771 -0.231869 0.00808738)
      PathPoint P2: radius (0.0304026 -0.128109 0.0264441)
      PathPoint P3: radius (0.0403749 -0.225369 0.0344467)
      PathPoint P4: secondmc (0.00276057 0.018182 0.000886933)
      PathWrap: wrap_object=Elbow_PT_ECRL method=hybrid
      PathWrap: wrap_object=ECRL method=hybrid
    Thelen2003Muscle ECRB: max_isometric_force=100.52 optimal_fiber_length=0.05663323 tendon_slack_length=0.2152063
        pennation_angle_at_optimal=0.1553343
      PathPoint P1: humerus (0.0119889 -0.258156 0.0150906)
      PathPoint P2: radius (0.0276431 -0.124522 0.0226949)
      PathPoint P3: radius (0.0337711 -0.217005 0.0374632)
      PathPoint P4: thirdmc (0.00501115 0.0309095 0.0012417)
      PathWrap: wrap_object=ECRB method=hybrid
    Thelen2003Muscle ECU: max_isometric_force=93.17 optimal_fiber_length=0.05987408 tendon_slack_length=0.2199554
        pennation_angle_at_optimal=0.06108652
      PathPoint P1: humerus (0.000737645 -0.257331 0.0167081)
      PathPoint P2: ulna (-0.0132364 -0.0304597 0.0280426)
      PathPoint P3: ulna (-0.0162242 -0.0516511 0.027291)
      PathPoint P4: ulna (-0.0170616 -0.0910936 0.0311923)
      PathPoint P5: radius (-0.0135218 -0.215967 0.0331241)
      PathPoint P6: fifthmc (-0.000676279 0.022916 0.00325947)
      PathWrap: wrap_object=ECU method=hybrid
    Thelen2003Muscle FCR: max_isometric_force=73.96 optimal_fiber_length=0.06068734 tendon_slack_length=0.2357916
        pennation_angle_at_optimal=0.05410521
      PathPoint P1: humerus (0.00673654 -0.24712 -0.0329273)
      PathPoint P2: radius (0.0200781 -0.208802 0.00120849)
      PathPoint P3: secondmc (-0.00382488 0.0212642 -0.0102107)
      PathWrap: wrap_object=Elbow_PT_ECRL method=hybrid
      PathWrap: wrap_object=FCR method=hybrid
    Thelen2003Muscle FCU: max_isometric_force=128.93 optimal_fiber_length=0.04919226 tendon_slack_length=0.256109
        pennation_angle_at_optimal=0.2111848
      PathPoint P1: humerus (0.00194632 -0.246532 -0.0344826)
      PathPoint P2: FCUpt (0.00559797 0 0)
      PathPoint P3: radius (0.010296 -0.212457 0.00922069)
      PathPoint P4: fifthmc (0.00170734 0.0188805 -0.00365858)
      PathWrap: wrap_object=FCU method=hybrid
      PathWrap: wrap_object=Elbow_PT_ECRL method=hybrid
    Thelen2003Muscle PL: max_isometric_force=26.72 optimal_fiber_length=0.06214691 tendon_slack_length=0.2624197
        pennation_angle_at_optimal=0.06981317
      PathPoint P1: humerus (0.00406148 -0.244569 -0.0343493)
      PathPoint P2: radius (0.0240841 -0.227567 -0.00262633)
      PathPoint P3: capitate (0.0101664 -0.0210423 -0.019446)
      PathPoint P4: thirdmc (0.0019845 0.00917971 -0.00271622)
      PathWrap: wrap_object=PL method=hybrid
      PathWrap: wrap_object=Elbow_PT_ECRL method=hybrid
    Thelen2003Muscle PT: max_isometric_force=566.22 optimal_fiber_length=0.04629378 tendon_slack_length=0.0922112
        pennation_angle_at_optimal=0.1745329
      PathPoint P1: humerus (0.00319941 -0.2452 -0.0324384)
      PathPoint P2: ulna (0.00805026 -0.0320963 -0.0136264)
      PathPoint P3: ptpt (0.00473125 -0.000265117 -0.00218209)
      ConditionalPathPoint P4: radius (0.0224569 -0.0888764 0.00894474) range=(-1.5708 0.509636) coordinate=pro_sup
      PathPoint P5: radius (0.0241698 -0.10353 0.018841)
      PathWrap: wrap_object=Elbow_PT_ECRL method=hybrid
    Thelen2003Muscle PQ: max_isometric_force=75.48 optimal_fiber_length=0.02683418 tendon_slack_length=0.004757829
        pennation_angle_at_optimal=0.1745329
      PathPoint P1: radius (0.0308783 -0.190295 0.0186698)
      PathPoint P2: ulna (0.00183653 -0.199563 0.0345609)
      PathWrap: wrap_object=PQ2 method=hybrid
      PathWrap: wrap_object=PQ1 method=hybrid
    Thelen2003Muscle FDSL: max_isometric_force=16.55 optimal_fiber_length=0.05143322 tendon_slack_length=0.3378613
        pennation_angle_at_optimal=0.08726646
      PathPoint P1: humerus (0.00374154 -0.245271 -0.0343404)
      PathPoint P2: radius (0.0131031 -0.178114 0.00195072)
      PathPoint P3: capitate (-0.00260536 -0.0154437 -0.0152551)
      PathPoint P4: fourthmc (-0.00325947 0.00937927 -0.013448)
      PathPoint P5: fifthmc (-0.000354767 -0.0218184 -0.00839256)
      PathPoint P6: 5proxph (-0.00358098 -0.039557 -0.00462311)
      PathPoint P7: 5midph (-0.00288253 -0.0219848 -0.00388031)
      PathWrap: wrap_object=FDS method=hybrid
      PathWrap: wrap_object=Elbow_PT_ECRL method=hybrid
    Thelen2003Muscle FDSR: max_isometric_force=57.9 optimal_fiber_length=0.07386119 tendon_slack_length=0.329164
        pennation_angle_at_optimal=0.06981317
      PathPoint P1: humerus (0.004257 -0.247777 -0.0331583)
      PathPoint P2: radius (0.0149491 -0.17762 0.00254068)
      PathPoint P3: capitate (-0.000909101 -0.0149004 -0.0150668)
      PathPoint P4: thirdmc (-0.0101331 0.00603111 -0.012029)
      PathPoint P5: fourthmc (-0.00321511 -0.0258761 -0.00850342)
      PathPoint P6: 4proxph (-0.0019069 -0.0437588 -0.00113084)
      PathPoint P7: 4midph (-2.21775e-5 -0.0277276 0.000321511)
      PathWrap: wrap_object=FDS method=hybrid
      PathWrap: wrap_object=Elbow_PT_ECRL method=hybrid
    Thelen2003Muscle FDSM: max_isometric_force=91.03 optimal_fiber_length=0.07604788 tendon_slack_length=0.299521
        pennation_angle_at_optimal=0.1221731
      PathPoint P1: ulna (-0.00636599 -0.025816 -0.0018175)
      PathPoint P2: radius (0.0180702 -0.178 0.00403465)
      PathPoint P3: capitate (0.0075389 -0.0152663 -0.0155102)
      PathPoint P4: thirdmc (0.00141909 0.00708435 -0.0105544)
      PathPoint P5: thirdmc (0.00291577 -0.0274726 -0.00202885)
      PathPoint P6: 3proxph (0.00279382 -0.04775 0.00462311)
      PathPoint P7: 3midph (0.00171842 -0.0307432 0.0007428)
      PathWrap: wrap_object=FDS method=hybrid
    Thelen2003Muscle FDSI: max_isometric_force=61.24 optimal_fiber_length=0.08467506 tendon_slack_length=0.27887
        pennation_angle_at_optimal=0.1047198
      PathPoint P1: ulna (-0.0064326 -0.0268247 -0.00130366)
      PathPoint P2: radius (0.0204112 -0.17721 0.00525265)
      PathPoint P3: capitate (0.00985604 -0.0151443 -0.0153771)
      PathPoint P4: secondmc (-0.00451225 -0.000277166 -0.00531049)
      PathPoint P5: secondmc (0.00337033 -0.024457 -0.00641914)
      PathPoint P6: 2proxph (0.00473398 -0.0373286 0.00492245)
      PathPoint P7: 2midph (0.00252775 -0.0231488 -0.000321511)
      PathWrap: wrap_object=FDS method=hybrid
      PathWrap: wrap_object=2ndmcp method=hybrid
    Thelen2003Muscle FDPL: max_isometric_force=79.65 optimal_fiber_length=0.07581255 tendon_slack_length=0.2853346
        pennation_angle_at_optimal=0.1396263
      PathPoint P1: ulna (-0.00597584 -0.0305834 0.00241698)
      PathPoint P2: radius (0.0134076 -0.176192 0.008193)
      PathPoint P3: capitate (-0.000975623 -0.011386 -0.0131709)
      PathPoint P4: fourthmc (-0.00760541 0.00986706 -0.00686262)
      PathPoint P5: fifthmc (-0.00205102 -0.0208207 -0.00782715)
      PathPoint P6: 5proxph (-0.00543244 -0.0384151 -0.00662979)
      PathPoint P7: 5distph (-0.000354767 -0.0048005 -0.00182929)
      PathWrap: wrap_object=FDP method=hybrid
    Thelen2003Muscle FDPR: max_isometric_force=64.08 optimal_fiber_length=0.08108566 tendon_slack_length=0.2865433
        pennation_angle_at_optimal=0.1221731
      PathPoint P1: ulna (-0.00477686 -0.0321059 0.00259778)
      PathPoint P2: radius (0.0150347 -0.177267 0.00764109)
      PathPoint P3: capitate (0.00117518 -0.013049 -0.0131265)
      PathPoint P4: thirdmc (-0.0115301 0.00524396 -0.00891364)
      PathPoint P5: fourthmc (-0.00320404 -0.025466 -0.00675175)
      PathPoint P6: 4proxph (-0.00337033 -0.0443687 -0.0008315)
      PathPoint P7: 4distph (0.000110867 -0.00731715 -0.000731712)
      PathWrap: wrap_object=FDP method=hybrid
    Thelen2003Muscle FDPM: max_isometric_force=81.65 optimal_fiber_length=0.08496171 tendon_slack_length=0.2981291
        pennation_angle_at_optimal=0.1047198
      PathPoint P1: ulna (-0.00496718 -0.0316586 0.0019983)
      PathPoint P2: radius (0.0181369 -0.177411 0.00746981)
      PathPoint P3: capitate (0.00371402 -0.0141909 -0.0126831)
      PathPoint P4: thirdmc (-0.00141909 0.00675175 -0.00929058)
      PathPoint P5: thirdmc (0.000376944 -0.0260203 -0.00335925)
      PathPoint P6: 3proxph (0.00113084 -0.0480383 0.00325947)
      PathPoint P7: 3distph (0.000254989 -0.00559873 -0.00250558)
      PathWrap: wrap_object=FDP method=hybrid
    Thelen2003Muscle FDPI: max_isometric_force=68.27 optimal_fiber_length=0.07618091 tendon_slack_length=0.2985193
        pennation_angle_at_optimal=0.1221731
      PathPoint P1: ulna (-0.00615664 -0.0302218 0.0026644)
      PathPoint P2: radius (0.0197926 -0.176611 0.00870685)
      PathPoint P3: capitate (0.00993365 -0.0129492 -0.013437)
      PathPoint P4: secondmc (-0.00478942 0.00735042 -0.00274948)
      PathPoint P5: secondmc (0.00465638 -0.0250779 -0.00553223)
      PathPoint P6: 2proxph (0.00644132 -0.0394129 0.0033925)
      PathPoint P7: 2distph (0.000509989 -0.00509984 -0.00333707)
      PathWrap: wrap_object=FDP method=hybrid
      PathWrap: wrap_object=2ndmcp method=hybrid
    Thelen2003Muscle EDCL: max_isometric_force=13.11 optimal_fiber_length=0.0654014 tendon_slack_length=0.298331
        pennation_angle_at_optimal=0.03490659
      PathPoint P1: humerus (-0.000355488 -0.256229 0.0166192)
      PathPoint P2: EDCpt (0.00132556 -0.0396447 0.0143263)
      PathPoint P3: radius (0.00944904 -0.212238 0.0344277)
      PathPoint P4: fifthmc (-0.0052994 -0.0212309 0.00495571)
      PathPoint P5: 5proxph (-0.00793802 -0.036608 -0.000986715)
      PathPoint P6: 5distph (-0.0015743 0.00075389 0.00127496)
      PathWrap: wrap_object=EDCL method=hybrid range=(3 4)
    Thelen2003Muscle EDCR: max_isometric_force=34.04 optimal_fiber_length=0.06316395 tendon_slack_length=0.3299459
        pennation_angle_at_optimal=0.05235988
      PathPoint P1: humerus (-0.00138641 -0.257162 0.0158371)
      PathPoint P2: EDCpt (0.00265114 -0.0406948 0.0158253)
      PathPoint P3: radius (0.00839283 -0.212828 0.0407652)
      PathPoint P4: fourthmc (-0.00374728 -0.0258318 0.00568744)
      PathPoint P5: 4proxph (-0.00605329 -0.042883 0.00457877)
      PathPoint P6: 4distph (-0.00189581 -0.00415748 0.00267188)
      PathWrap: wrap_object=EDCR method=hybrid
    Thelen2003Muscle EDCM: max_isometric_force=35.32 optimal_fiber_length=0.07337314 tendon_slack_length=0.3395028
        pennation_angle_at_optimal=0.05235988
      PathPoint P1: humerus (0.00045325 -0.257589 0.0173213)
      PathPoint P2: EDCpt (0.00322214 -0.0402564 0.0155805)
      PathPoint P3: radius (0.0137025 -0.212419 0.0401848)
      PathPoint P4: thirdmc (0.00145235 -0.0259649 0.00847017)
      PathPoint P5: 3proxph (0.0019845 -0.0469961 0.0111199)
      PathPoint P6: 3distph (0.000853667 -0.0123173 0.00222841)
      PathWrap: wrap_object=EDCM method=hybrid
    Thelen2003Muscle EDCI: max_isometric_force=18.26 optimal_fiber_length=0.07079442 tendon_slack_length=0.3256543
        pennation_angle_at_optimal=0.05235988
      PathPoint P1: humerus (0.00057767 -0.256825 0.0166103)
      PathPoint P2: EDCpt (0.00232484 -0.0399506 0.0151217)
      PathPoint P3: radius (0.0145876 -0.212333 0.0399278)
      PathPoint P4: secondmc (0.00525506 -0.029446 0.014335)
      PathPoint P5: 2proxph (0.00212863 -0.0122063 0.0113194)
      PathPoint P6: 2proxph (0.00854778 -0.0464639 0.0155102)
      PathPoint P7: 2midph (0.00136365 -0.0104324 0.00644132)
      PathPoint P8: 2midph (0.00288253 -0.0217186 0.00402443)
      PathPoint P9: 2distph (0.000277166 -0.00410205 0.00252775)
      PathWrap: wrap_object=EDCI method=hybrid range=(3 4)
      PathWrap: wrap_object=Secondpm method=hybrid range=(6 7)
      PathWrap: wrap_object=Secondmd method=hybrid range=(8 9)
    Thelen2003Muscle EDM: max_isometric_force=25.25 optimal_fiber_length=0.06796511 tendon_slack_length=0.3242187
        pennation_angle_at_optimal=0.05235988
      PathPoint P1: humerus (0.000790965 -0.257011 0.0164147)
      PathPoint P2: ulna (-0.00929682 -0.0371777 0.0293559)
      PathPoint P3: ulna (-0.00718434 -0.0786662 0.0346941)
      PathPoint P4: radius (0.00432011 -0.215445 0.0349987)
      PathPoint P5: fifthmc (0.00145235 0.0270069 0.00880277)
      PathPoint P6: fifthmc (-0.00595351 -0.0204881 0.00350337)
      PathPoint P7: 5proxph (-0.00598677 -0.0358873 0.0001663)
      PathPoint P8: 5distph (-0.00250558 -0.00370292 0.000687367)
      PathWrap: wrap_object=EDM method=hybrid range=(4 5)
    Thelen2003Muscle EIP: max_isometric_force=21.7 optimal_fiber_length=0.06209085 tendon_slack_length=0.1960764
        pennation_angle_at_optimal=0.1047198
      PathPoint P1: ulna (-0.00374918 -0.158455 0.0350367)
      PathPoint P2: ulna (0.00162718 -0.16623 0.038529)
      PathPoint P3: radius (0.0102389 -0.216796 0.0348655)
      PathPoint P4: secondmc (-0.0119846 0.0169404 0.00754998)
      PathPoint P5: secondmc (0.0048892 -0.0288473 0.0142463)
      PathPoint P6: 2proxph (0.00189581 -0.0114525 0.0104989)
      PathPoint P7: 2proxph (0.00791584 -0.0458209 0.0156654)
      PathPoint P8: 2midph (0.00127496 -0.00996689 0.0066187)
      PathPoint P9: 2midph (0.00325947 -0.0226499 0.00417966)
      PathPoint P10: 2distph (0.00292687 -0.0136698 0.00294903)
      PathWrap: wrap_object=Extensor_ellipse method=hybrid
      PathWrap: wrap_object=Secondpm method=hybrid range=(7 8)
      PathWrap: wrap_object=Secondmd method=hybrid range=(9 10)
    Thelen2003Muscle EPL: max_isometric_force=39.46 optimal_fiber_length=0.05475321 tendon_slack_length=0.2235756
        pennation_angle_at_optimal=0.1047198
      PathPoint P1: ulna (-0.0134361 -0.0923592 0.0280903)
      PathPoint P2: radius (0.00117994 -0.13006 0.0216006)
      PathPoint P3: radius (0.0257114 -0.208127 0.0364261)
      PathPoint P4: radius (0.0321821 -0.21652 0.0438387)
      PathPoint P5: radius (0.0402894 -0.226198 0.039709)
      PathPoint P6: capitate (0.0269183 0.000155211 0.00674066)
      PathPoint P7: trapezium (0.00896907 -0.00509984 0.0109978)
      PathPoint P8: firstmc (0.00727281 -0.00476724 0.00878059)
      PathPoint P9: firstmc (0.0240026 -0.0268296 -0.00590917)
      PathPoint P10: proximal_thumb (0.0127164 -0.00401336 0.00172951)
      PathPoint P11: proximal_thumb (0.0212974 -0.0293796 -0.011508)
      PathPoint P12: distal_thumb (0.00602002 -0.00791584 -0.00514419)
      PathWrap: wrap_object=MPthumb method=hybrid
    Thelen2003Muscle EPB: max_isometric_force=14.2 optimal_fiber_length=0.06896864 tendon_slack_length=0.118013
        pennation_angle_at_optimal=0.1256637
      PathPoint P1: radius (0.0183082 -0.139832 0.0201162)
      PathPoint P2: radius (0.0216577 -0.15089 0.0253593)
      PathPoint P3: radius (0.0364545 -0.187668 0.0364831)
      PathPoint P4: radius (0.0498146 -0.224675 0.0256828)
      PathPoint P5: capitate (0.0346235 0.00283817 -0.00362532)
      PathPoint P6: firstmc1 (0.0159981 -0.00373619 -0.00449007)
      PathPoint P7: firstmc (0.0240912 -0.0255325 -0.0126499)
      PathPoint P8: proximal_thumb (0.0102773 -0.00685152 -0.00617524)
      PathWrap: wrap_object=MPthumb method=hybrid
    Thelen2003Muscle FPL: max_isometric_force=77.2 optimal_fiber_length=0.05643957 tendon_slack_length=0.1981519
        pennation_angle_at_optimal=0.1221731
      PathPoint P1: radius (0.00923972 -0.0899993 0.0168333)
      PathPoint P2: radius (0.0157769 -0.1287 0.0182225)
      PathPoint P3: radius (0.0177848 -0.170636 0.0189172)
      PathPoint P4: radius (0.0361596 -0.220487 0.0150347)
      PathPoint P5: FPLpt (0.0190575 0.00899346 -0.0157743)
      PathPoint P6: FPLpt2 (0.0126847 -0.022504 -0.0213009)
      PathPoint P7: firstmc (-0.00674066 -0.0180046 -0.0104214)
      PathPoint P8: firstmc (0.00230601 -0.025466 -0.0105988)
      PathPoint P9: proximal_thumb (-0.00498898 -0.0204216 -0.005632)
      PathPoint P10: proximal_thumb (0.0065411 -0.0288473 -0.0123505)
      PathPoint P11: distal_thumb (0.00268296 -0.0124946 -0.00456768)
      PathWrap: wrap_object=FPL method=hybrid
      PathWrap: wrap_object=IPthumb method=hybrid
      PathWrap: wrap_object=MPthumb method=hybrid
    Thelen2003Muscle APL: max_isometric_force=59.53 optimal_fiber_length=0.06995054 tendon_slack_length=0.127049
        pennation_angle_at_optimal=0.1308997
      PathPoint P1: radius (0.0109811 -0.0901801 0.0159958)
      PathPoint P2: radius (0.0288325 -0.132934 0.0333714)
      PathPoint P3: radius (0.0379961 -0.152936 0.0323532)
      PathPoint P4: radius (0.0418404 -0.169808 0.0298222)
      PathPoint P5: radius (0.0523838 -0.219661 0.0225331)
      PathPoint P6: APLpt (0.0345158 0.00646469 -0.00759652)
      PathPoint P7: firstmc1 (0.0117297 0.00733934 -0.00686262)
      PathPoint P8: firstmc (0.00697348 0.00358098 -0.00653001)
      PathPoint P9: firstmc (0.00916862 -0.00649675 -0.00669631)
      PathWrap: wrap_object=APL method=hybrid range=(5 6)
    Thelen2003Muscle DELT1_l: max_isometric_force=1142.6 optimal_fiber_length=0.08846485 tendon_slack_length=0.0842954
        pennation_angle_at_optimal=0.3839724
      PathPoint P1: humerus_l (0.007963 -0.105607 -0.00519904)
      PathPoint P2: humerus_l (0.014424 -0.0980537 -0.00366155)
      PathPoint P3: scapula_l (0.0403054 -0.0301526 -0.000917924)
      PathPoint P4: clavicle_l (-0.0129809 0.0102549 -0.0743708)
      PathWrap: wrap_object=delt2hum_l method=hybrid
      PathWrap: wrap_object=DELT1hh_l method=hybrid range=(2 3)
    Thelen2003Muscle DELT2_l: max_isometric_force=1142.6 optimal_fiber_length=0.09894138 tendon_slack_length=0.1005017
        pennation_angle_at_optimal=0.2617994
      PathPoint P1: humerus_l (0.00409703 -0.120964 -0.00497686)
      PathPoint P2: DELT2pt2_l (0.0264165 0.00519589 -0.0466853)
      PathPoint P3: scapula_l (4.63555e-5 0.00272597 -0.0207044)
      PathPoint P4: scapula_l (-0.00999523 -0.00031525 -0.00574865)
      PathWrap: wrap_object=Deltoid2_l method=hybrid
      PathWrap: wrap_object=delt2hum_l method=hybrid
      PathWrap: wrap_object=TMAJ_LAT_PEC_CORBhh_l method=hybrid
    Thelen2003Muscle DELT3_l: max_isometric_force=259.88 optimal_fiber_length=0.1247195 tendon_slack_length=0.03466963
        pennation_angle_at_optimal=0.3141593
      PathPoint P1: scapula_l (-0.0516729 0.00113118 0.0232913)
      PathPoint P2: scapula_l (-0.0671942 -0.0304586 -0.0114323)
      PathPoint P3: humerus_l (0.00183078 -0.0675609 -0.00928719)
      PathWrap: wrap_object=Delt3_l method=hybrid
      PathWrap: wrap_object=delt3hum_l method=hybrid
      PathWrap: wrap_object=TMAJ_LAT_PEC_CORBhh_l method=hybrid
    Thelen2003Muscle SUPSP_l: max_isometric_force=487.82 optimal_fiber_length=0.0626397 tendon_slack_length=0.03627959
        pennation_angle_at_optimal=0.1221731
      PathPoint P1: humerus_l (0.00227514 0.00944717 -0.0230447)
      PathPoint P2: scapula_l (-0.0177837 0.00117755 0.0117847)
      PathPoint P3: scapula_l (-0.0407968 -0.0140193 0.0542877)
      PathWrap: wrap_object=SUPSP_l method=hybrid
    Thelen2003Muscle INFSP_l: max_isometric_force=1210.84 optimal_fiber_length=0.06961148 tendon_slack_length=0.0283978
        pennation_angle_at_optimal=0.3228859
      PathPoint P1: humerus_l (-0.00788299 0.00430144 -0.021756)
      PathPoint P2: scapula_l (-0.068446 -0.0507736 0.0443294)
      PathWrap: wrap_object=INFSP_l method=hybrid
      PathWrap: wrap_object=INFSP_and_TMIN_hum_head_l method=hybrid
    Thelen2003Muscle SUBSC_l: max_isometric_force=1377.81 optimal_fiber_length=0.08068255
        tendon_slack_length=0.03049856 pennation_angle_at_optimal=0.3490659
      PathPoint P1: humerus_l (0.0124688 0.00746529 0.0118289)
      PathPoint P2: scapula_l (-0.0169771 -0.0484277 0.0227814)
      PathPoint P3: scapula_l (-0.067185 -0.0365595 0.0600363)
      PathWrap: wrap_object=SUBSCAP_l method=hybrid
    Thelen2003Muscle TMIN_l: max_isometric_force=354.25 optimal_fiber_length=0.06849367 tendon_slack_length=0.06590552
        pennation_angle_at_optimal=0.418879
      PathPoint P1: humerus_l (-0.000977604 -0.0112335 -0.0191609)
      PathPoint P2: scapula_l (-0.0878337 -0.0740927 0.0439215)
      PathPoint P3: scapula_l (-0.0894099 -0.075298 0.0491231)
      PathWrap: wrap_object=TMIN_l method=hybrid range=(1 2)
      PathWrap: wrap_object=INFSP_and_TMIN_hum_head_l method=hybrid range=(1 2)
      PathWrap: wrap_object=TMINhum_l method=hybrid range=(1 2)
    Thelen2003Muscle TMAJ_l: max_isometric_force=425.39 optimal_fiber_length=0.1506386 tendon_slack_length=0.01855155
        pennation_angle_at_optimal=0.2792527
      PathPoint P1: humerus_l (0.0088695 -0.0481601 0.00504797)
      PathPoint P2: scapula_l (-0.095168 -0.0956781 0.0540466)
      PathPoint P3: scapula_l (-0.0972544 -0.101019 0.0659889)
      PathWrap: wrap_object=TMAJ_LAThum_l method=hybrid
      PathWrap: wrap_object=LAT_TMAJhh_l method=hybrid range=(1 2)
      PathWrap: wrap_object=LAT_TMAJ2hh_l method=hybrid
    Thelen2003Muscle PECM1_l: max_isometric_force=364.41 optimal_fiber_length=0.1366297 tendon_slack_length=0.002653001
        pennation_angle_at_optimal=0.296706
      PathPoint P1: humerus_l (0.0103892 -0.0372465 -0.00693206)
      PathPoint P2: PEC1pt2_l (0.0156848 -0.0392849 0.0056038)
      PathPoint P3: PEC1pt3_l (0.0093041 -0.0146554 -0.122992)
      PathPoint P4: clavicle_l (0.00297632 -0.000120535 -0.0474078)
      PathWrap: wrap_object=Thorax_l method=hybrid
      PathWrap: wrap_object=PEC12hum_l method=hybrid range=(2 3)
      PathWrap: wrap_object=PEC1hh_l method=hybrid
    Thelen2003Muscle PECM2_l: max_isometric_force=515.41 optimal_fiber_length=0.1301269 tendon_slack_length=0.08361946
        pennation_angle_at_optimal=0.4363323
      PathPoint P1: humerus_l (0.0113224 -0.0381174 -0.0069765)
      PathPoint P2: PEC2pt2_l (0.0141114 -0.0443642 0.00667211)
      PathPoint P3: PEC2pt3_l (0.0195987 -0.0404503 -0.123245)
      PathPoint P4: thorax (0.0286598 -0.0363648 -0.0899853)
      PathPoint P5: thorax (0.0256742 -0.0417055 -0.0210567)
      PathWrap: wrap_object=Thorax method=hybrid
      PathWrap: wrap_object=PEC12hum_l method=hybrid range=(2 3)
      PathWrap: wrap_object=TMAJ_LAT_PEC_CORBhh_l method=hybrid
      PathWrap: wrap_object=PEC23hh_l method=hybrid
    Thelen2003Muscle PECM3_l: max_isometric_force=390.55 optimal_fiber_length=0.1290619 tendon_slack_length=0.1230049
        pennation_angle_at_optimal=0.4363323
      PathPoint P1: humerus_l (0.0112779 -0.0388818 -0.00666545)
      PathPoint P2: PEC3pt2_l (0.012072 -0.0500845 0.0175495)
      PathPoint P3: PEC3pt3_l (0.0289805 -0.0689549 -0.111785)
      PathPoint P4: thorax (0.0486781 -0.0780426 -0.0828454)
      PathPoint P5: thorax (0.053073 -0.108056 -0.0351131)
      PathWrap: wrap_object=Thorax method=hybrid
      PathWrap: wrap_object=PEC3hum_l method=hybrid range=(2 3)
      PathWrap: wrap_object=PEC23hh_l method=hybrid
    Thelen2003Muscle LAT1_l: max_isometric_force=389.1 optimal_fiber_length=0.2385013 tendon_slack_length=0.1126778
        pennation_angle_at_optimal=0.4363323
      PathPoint P1: humerus_l (0.00933159 -0.03035 0.00580338)
      PathPoint P2: LAT1pt2_l (-0.0771809 -0.0833383 0.0212497)
      PathPoint P3: LAT1pt3_l (-0.10892 -0.0949732 0.0516871)
      PathPoint P4: thorax (-0.109669 -0.0938146 -0.0307459)
      PathPoint P5: thorax (-0.0888073 -0.108705 -0.00817791)
      PathWrap: wrap_object=TMAJ_LAThum_l method=hybrid
      PathWrap: wrap_object=LAT_TMAJhh_l method=hybrid range=(1 2)
      PathWrap: wrap_object=LAT_TMAJ2hh_l method=hybrid
    Thelen2003Muscle LAT2_l: max_isometric_force=389.1 optimal_fiber_length=0.2172423 tendon_slack_length=0.1649882
        pennation_angle_at_optimal=0.3316126
      PathPoint P1: humerus_l (0.0086029 -0.0361801 0.00543011)
      PathPoint P2: LAT2pt2_l (-0.0741993 -0.0992563 0.0175592)
      PathPoint P3: LAT2pt3_l (-0.0976438 -0.135666 0.0510654)
      PathPoint P4: thorax (-0.101918 -0.156771 -0.0266849)
      PathPoint P5: thorax (-0.0666287 -0.17448 -0.00755668)
      PathWrap: wrap_object=TMAJ_LAThum_l method=hybrid
      PathWrap: wrap_object=LAT_TMAJhh_l method=hybrid range=(1 2)
      PathWrap: wrap_object=LAT_TMAJ2hh_l method=hybrid
    Thelen2003Muscle LAT3_l: max_isometric_force=281.66 optimal_fiber_length=0.2612878 tendon_slack_length=0.1314402
        pennation_angle_at_optimal=0.3665191
      PathPoint P1: humerus_l (0.0107359 -0.0348558 0.00369709)
      PathPoint P2: LAT3pt2_l (-0.0551445 -0.129198 0.0206865)
      PathPoint P3: LAT3pt3_l (-0.0917687 -0.170473 0.0447333)
      PathPoint P4: thorax (-0.103448 -0.179756 -0.0512928)
      PathPoint P5: thorax (-0.0659889 -0.230484 -0.00840972)
      PathWrap: wrap_object=TMAJ_LAThum_l method=hybrid
      PathWrap: wrap_object=LAT_TMAJhh_l method=hybrid range=(1 2)
      PathWrap: wrap_object=LAT_TMAJ2hh_l method=hybrid
    Thelen2003Muscle CORB_l: max_isometric_force=242.46 optimal_fiber_length=0.08284811 tendon_slack_length=0.08622604
        pennation_angle_at_optimal=0
      PathPoint P1: scapula_l (0.01159 -0.0382656 0.0245893)
      PathPoint P2: scapula_l (0.00447838 -0.0645146 0.0144922)
      PathPoint P3: humerus_l (0.00660324 -0.133735 0.00694984)
      PathWrap: wrap_object=CORBhum_l method=hybrid
      PathWrap: wrap_object=TMAJ_LAT_PEC_CORBhh_l method=hybrid
    Thelen2003Muscle TRIlong_l: max_isometric_force=798.52 optimal_fiber_length=0.1187309 tendon_slack_length=0.1267054
        pennation_angle_at_optimal=0.2094395
      PathPoint P1: scapula_l (-0.0423268 -0.0377649 0.0127675)
      PathPoint P2: humerus_l (-0.02412 -0.101679 0.00590114)
      PathPoint P3: humerus_l (-0.028297 -0.201181 0.0108159)
      PathPoint P4: humerus_l (-0.0154905 -0.237796 0.0107359)
      PathPoint P5: ulna_l (-0.0208393 0.00995342 0.000742221)
      PathWrap: wrap_object=TRI_l method=hybrid
      PathWrap: wrap_object=TRIlonghh_l method=hybrid
      PathWrap: wrap_object=TRIlongglen_l method=hybrid
    Thelen2003Muscle TRIlat_l: max_isometric_force=624.3 optimal_fiber_length=0.1006283 tendon_slack_length=0.08665708
        pennation_angle_at_optimal=0.1570796
      PathPoint P1: humerus_l (-0.00532347 -0.112388 -0.00380375)
      PathPoint P2: humerus_l (-0.0208317 -0.129114 -0.00824735)
      PathPoint P3: humerus_l (-0.028297 -0.201181 0.0108159)
      PathPoint P4: humerus_l (-0.0154905 -0.237796 0.0107359)
      PathPoint P5: ulna_l (-0.0208393 0.00995342 0.000742221)
      PathWrap: wrap_object=TRI_l method=hybrid
    Thelen2003Muscle TRImed_l: max_isometric_force=624.3 optimal_fiber_length=0.1005875 tendon_slack_length=0.08025788
        pennation_angle_at_optimal=0.1570796
      PathPoint P1: humerus_l (-0.00744752 -0.121711 0.00805187)
      PathPoint P2: humerus_l (-0.0231158 -0.134544 0.00959831)
      PathPoint P3: humerus_l (-0.028297 -0.201181 0.0108159)
      PathPoint P4: humerus_l (-0.0154905 -0.237796 0.0107359)
      PathPoint P5: ulna_l (-0.0208393 0.00995342 0.000742221)
      PathWrap: wrap_object=TRI_l method=hybrid
    Thelen2003Muscle ANC_l: max_isometric_force=350 optimal_fiber_length=0.02484556 tendon_slack_length=0.01656371
        pennation_angle_at_optimal=0
      PathPoint P1: humerus_l (-0.00661212 -0.252034 -0.00870065)
      PathPoint P2: ulna_l (-0.0240938 -0.00117994 -0.00570941)
      PathWrap: wrap_object=ANC_l method=hybrid
    Thelen2003Muscle SUP_l: max_isometric_force=476 optimal_fiber_length=0.03140175 tendon_slack_length=0.02664391
        pennation_angle_at_optimal=0
      PathPoint P1: radius_l (0.00947765 -0.0580076 -0.000713676)
      PathPoint P2: radius_l (0.0114284 -0.049196 0.00101818)
      PathPoint P3: ulna_l (-0.0129413 -0.0322011 -0.0191551)
      PathWrap: wrap_object=SUP_l method=hybrid
    Thelen2003Muscle BIClong_l: max_isometric_force=624.3 optimal_fiber_length=0.1040344 tendon_slack_length=0.2448451
        pennation_angle_at_optimal=0
      PathPoint P1: scapula_l (-0.0289565 -0.0218171 0.0120999)
      PathPoint P2: scapula_l (-0.0194155 -0.012137 0.0042744)
      PathPoint P3: humerus_l (0.0189387 0.0159349 -0.0091361)
      PathPoint P4: humerus_l (0.0211339 -0.00454139 -0.0106736)
      PathPoint P5: humerus_l (0.0119534 -0.0251242 -0.00120867)
      PathPoint P6: humerus_l (0.00949153 -0.0687519 0.00146639)
      PathPoint P7: humerus_l (0.015135 -0.107758 -0.000213295)
      PathPoint P8: humerus_l (0.020263 -0.155882 0.00559898)
      PathPoint P9: bicpt2_l (0 0 0)
      ConditionalPathPoint P10: bicpt_l (0 0 0) range=(-0.638791 1.5708) coordinate=pro_sup_l
      PathPoint P11: radius_l (-0.00190314 -0.0356838 0.00190314)
      PathWrap: wrap_object=Elbow_BIC_BRD_l method=hybrid
      PathWrap: wrap_object=BIClong_l method=hybrid range=(2 3)
    Thelen2003Muscle BICshort_l: max_isometric_force=435.56 optimal_fiber_length=0.1188582
        tendon_slack_length=0.1730238 pennation_angle_at_optimal=0
      PathPoint P1: scapula_l (0.0117569 -0.0364483 0.0243391)
      PathPoint P2: scapula_l (0.000862296 -0.0621595 0.0147704)
      PathPoint P3: humerus_l (0.00992709 -0.0673299 0.00978488)
      PathPoint P4: humerus_l (0.015135 -0.107758 0.00958938)
      PathPoint P5: humerus_l (0.020263 -0.155882 0.00559898)
      PathPoint P6: bicpt2_l (0 0 0)
      ConditionalPathPoint P7: bicpt_l (0 0 0) range=(-0.638791 1.5708) coordinate=pro_sup_l
      PathPoint P8: radius_l (-0.00190314 -0.0356838 0.00190314)
      PathWrap: wrap_object=Elbow_BIC_BRD_l method=hybrid
    Thelen2003Muscle BRA_l: max_isometric_force=987.26 optimal_fiber_length=0.077148 tendon_slack_length=0.0481051
        pennation_angle_at_optimal=0
      PathPoint P1: humerus_l (0.00604334 -0.15455 0.00319941)
      ConditionalPathPoint P2: humerus_l (0.0168325 -0.253811 0.00982041) range=(0 0.813149) coordinate=elbow_flexion_l
      ConditionalPathPoint P3: ulna_l (0.00473881 -0.0139214 -0.00121801) range=(0 0.813149) coordinate=elbow_flexion_l
      PathPoint P4: ulna_l (-0.00304501 -0.0227425 -0.00085641)
    Thelen2003Muscle BRD_l: max_isometric_force=261.33 optimal_fiber_length=0.161269 tendon_slack_length=0.1242687
        pennation_angle_at_optimal=0
      PathPoint P1: humerus_l (-0.00870952 -0.177416 -0.00198186)
      PathPoint P2: radius_l (0.0340376 -0.121249 -0.0220288)
      PathPoint P3: radius_l (0.0398707 -0.210296 -0.0213151)
      PathWrap: wrap_object=Elbow_BIC_BRD_l method=hybrid
    Thelen2003Muscle ECRL_l: max_isometric_force=304.89 optimal_fiber_length=0.07797753 tendon_slack_length=0.2156416
        pennation_angle_at_optimal=0
      PathPoint P1: humerus_l (-0.00648771 -0.231869 -0.00808738)
      PathPoint P2: radius_l (0.0304026 -0.128109 -0.0264441)
      PathPoint P3: radius_l (0.0403749 -0.225369 -0.0344467)
      PathPoint P4: secondmc_l (0.00276057 0.018182 -0.000886933)
      PathWrap: wrap_object=Elbow_PT_ECRL_l method=hybrid
      PathWrap: wrap_object=ECRL_l method=hybrid
    Thelen2003Muscle ECRB_l: max_isometric_force=100.52 optimal_fiber_length=0.05663329 tendon_slack_length=0.2152065
        pennation_angle_at_optimal=0.1553343
      PathPoint P1: humerus_l (0.0119889 -0.258156 -0.0150906)
      PathPoint P2: radius_l (0.0276431 -0.124522 -0.0226949)
      PathPoint P3: radius_l (0.0337711 -0.217005 -0.0374632)
      PathPoint P4: thirdmc_l (0.00501115 0.0309095 -0.0012417)
      PathWrap: wrap_object=ECRB_l method=hybrid
    Thelen2003Muscle ECU_l: max_isometric_force=93.17 optimal_fiber_length=0.05987402 tendon_slack_length=0.2199552
        pennation_angle_at_optimal=0.06108652
      PathPoint P1: humerus_l (0.000737645 -0.257331 -0.0167081)
      PathPoint P2: ulna_l (-0.0132364 -0.0304597 -0.0280426)
      PathPoint P3: ulna_l (-0.0162242 -0.0516511 -0.027291)
      PathPoint P4: ulna_l (-0.0170616 -0.0910936 -0.0311923)
      PathPoint P5: radius_l (-0.0135218 -0.215967 -0.0331241)
      PathPoint P6: fifthmc_l (-0.000676279 0.022916 -0.00325947)
      PathWrap: wrap_object=ECU_l method=hybrid
    Thelen2003Muscle FCR_l: max_isometric_force=73.96 optimal_fiber_length=0.06068735 tendon_slack_length=0.2357916
        pennation_angle_at_optimal=0.05410521
      PathPoint P1: humerus_l (0.00673654 -0.24712 0.0329273)
      PathPoint P2: radius_l (0.0200781 -0.208802 -0.00120849)
      PathPoint P3: secondmc_l (-0.00382488 0.0212642 0.0102107)
      PathWrap: wrap_object=Elbow_PT_ECRL_l method=hybrid
      PathWrap: wrap_object=FCR_l method=hybrid
    Thelen2003Muscle FCU_l: max_isometric_force=128.93 optimal_fiber_length=0.04919218 tendon_slack_length=0.2561086
        pennation_angle_at_optimal=0.2111848
      PathPoint P1: humerus_l (0.00194632 -0.246532 0.0344826)
      PathPoint P2: FCUpt_l (0.00559797 0 0)
      PathPoint P3: radius_l (0.010296 -0.212457 -0.00922069)
      PathPoint P4: fifthmc_l (0.00170734 0.0188805 0.00365858)
      PathWrap: wrap_object=FCU_l method=hybrid
      PathWrap: wrap_object=Elbow_PT_ECRL_l method=hybrid
    Thelen2003Muscle PL_l: max_isometric_force=26.72 optimal_fiber_length=0.06214688 tendon_slack_length=0.2624196
        pennation_angle_at_optimal=0.06981317
      PathPoint P1: humerus_l (0.00406148 -0.244569 0.0343493)
      PathPoint P2: radius_l (0.0240841 -0.227567 0.00262633)
      PathPoint P3: capitate_l (0.0101664 -0.0210423 0.019446)
      PathPoint P4: thirdmc_l (0.0019845 0.00917971 0.00271622)
      PathWrap: wrap_object=PL_l method=hybrid
      PathWrap: wrap_object=Elbow_PT_ECRL_l method=hybrid
    Thelen2003Muscle PT_l: max_isometric_force=566.22 optimal_fiber_length=0.04629378 tendon_slack_length=0.0922112
        pennation_angle_at_optimal=0.1745329
      PathPoint P1: humerus_l (0.00319941 -0.2452 0.0324384)
      PathPoint P2: ulna_l (0.00805026 -0.0320963 0.0136264)
      PathPoint P3: ptpt_l (0.00473125 -0.000265117 0.00218209)
      ConditionalPathPoint P4: radius_l (0.0224569 -0.0888764 -0.00894474) range=(-1.5708 0.509636)
          coordinate=pro_sup_l
      PathPoint P5: radius_l (0.0241698 -0.10353 -0.018841)
      PathWrap: wrap_object=Elbow_PT_ECRL_l method=hybrid
    Thelen2003Muscle PQ_l: max_isometric_force=75.48 optimal_fiber_length=0.02683418 tendon_slack_length=0.004757829
        pennation_angle_at_optimal=0.1745329
      PathPoint P1: radius_l (0.0308783 -0.190295 -0.0186698)
      PathPoint P2: ulna_l (0.00183653 -0.199563 -0.0345609)
      PathWrap: wrap_object=PQ2_l method=hybrid
      PathWrap: wrap_object=PQ1_l method=hybrid
    Thelen2003Muscle FDSL_l: max_isometric_force=16.55 optimal_fiber_length=0.0514332 tendon_slack_length=0.3378612
        pennation_angle_at_optimal=0.08726646
      PathPoint P1: humerus_l (0.00374154 -0.245271 0.0343404)
      PathPoint P2: radius_l (0.0131031 -0.178114 -0.00195072)
      PathPoint P3: capitate_l (-0.00260536 -0.0154437 0.0152551)
      PathPoint P4: fourthmc_l (-0.00325947 0.00937927 0.013448)
      PathPoint P5: fifthmc_l (-0.000354767 -0.0218184 0.00839256)
      PathPoint P6: 5proxph_l (-0.00358098 -0.039557 0.00462311)
      PathPoint P7: 5midph_l (-0.00288253 -0.0219848 0.00388031)
      PathWrap: wrap_object=FDS_l method=hybrid
      PathWrap: wrap_object=Elbow_PT_ECRL_l method=hybrid
    Thelen2003Muscle FDSR_l: max_isometric_force=57.9 optimal_fiber_length=0.07386117 tendon_slack_length=0.3291639
        pennation_angle_at_optimal=0.06981317
      PathPoint P1: humerus_l (0.004257 -0.247777 0.0331583)
      PathPoint P2: radius_l (0.0149491 -0.17762 -0.00254068)
      PathPoint P3: capitate_l (-0.000909101 -0.0149004 0.0150668)
      PathPoint P4: thirdmc_l (-0.0101331 0.00603111 0.012029)
      PathPoint P5: fourthmc_l (-0.00321511 -0.0258761 0.00850342)
      PathPoint P6: 4proxph_l (-0.0019069 -0.0437588 0.00113084)
      PathPoint P7: 4midph_l (-2.21775e-5 -0.0277276 -0.000321511)
      PathWrap: wrap_object=FDS_l method=hybrid
      PathWrap: wrap_object=Elbow_PT_ECRL_l method=hybrid
    Thelen2003Muscle FDSM_l: max_isometric_force=91.03 optimal_fiber_length=0.07604786 tendon_slack_length=0.299521
        pennation_angle_at_optimal=0.1221731
      PathPoint P1: ulna_l (-0.00636599 -0.025816 0.0018175)
      PathPoint P2: radius_l (0.0180702 -0.178 -0.00403465)
      PathPoint P3: capitate_l (0.0075389 -0.0152663 0.0155102)
      PathPoint P4: thirdmc_l (0.00141909 0.00708435 0.0105544)
      PathPoint P5: thirdmc_l (0.00291577 -0.0274726 0.00202885)
      PathPoint P6: 3proxph_l (0.00279382 -0.04775 -0.00462311)
      PathPoint P7: 3midph_l (0.00171842 -0.0307432 -0.0007428)
      PathWrap: wrap_object=FDS_l method=hybrid
    Thelen2003Muscle FDSI_l: max_isometric_force=61.24 optimal_fiber_length=0.08467505 tendon_slack_length=0.2788699
        pennation_angle_at_optimal=0.1047198
      PathPoint P1: ulna_l (-0.0064326 -0.0268247 0.00130366)
      PathPoint P2: radius_l (0.0204112 -0.17721 -0.00525265)
      PathPoint P3: capitate_l (0.00985604 -0.0151443 0.0153771)
      PathPoint P4: secondmc_l (-0.00451225 -0.000277166 0.00531049)
      PathPoint P5: secondmc_l (0.00337033 -0.024457 0.00641914)
      PathPoint P6: 2proxph_l (0.00473398 -0.0373286 -0.00492245)
      PathPoint P7: 2midph_l (0.00252775 -0.0231488 0.000321511)
      PathWrap: wrap_object=FDS_l method=hybrid
      PathWrap: wrap_object=2ndmcp_l method=hybrid
    Thelen2003Muscle FDPL_l: max_isometric_force=79.65 optimal_fiber_length=0.07581253 tendon_slack_length=0.2853345
        pennation_angle_at_optimal=0.1396263
      PathPoint P1: ulna_l (-0.00597584 -0.0305834 -0.00241698)
      PathPoint P2: radius_l (0.0134076 -0.176192 -0.008193)
      PathPoint P3: capitate_l (-0.000975623 -0.011386 0.0131709)
      PathPoint P4: fourthmc_l (-0.00760541 0.00986706 0.00686262)
      PathPoint P5: fifthmc_l (-0.00205102 -0.0208207 0.00782715)
      PathPoint P6: 5proxph_l (-0.00543244 -0.0384151 0.00662979)
      PathPoint P7: 5distph_l (-0.000354767 -0.0048005 0.00182929)
      PathWrap: wrap_object=FDP_l method=hybrid
    Thelen2003Muscle FDPR_l: max_isometric_force=64.08 optimal_fiber_length=0.08108564 tendon_slack_length=0.2865432
        pennation_angle_at_optimal=0.1221731
      PathPoint P1: ulna_l (-0.00477686 -0.0321059 -0.00259778)
      PathPoint P2: radius_l (0.0150347 -0.177267 -0.00764109)
      PathPoint P3: capitate_l (0.00117518 -0.013049 0.0131265)
      PathPoint P4: thirdmc_l (-0.0115301 0.00524396 0.00891364)
      PathPoint P5: fourthmc_l (-0.00320404 -0.025466 0.00675175)
      PathPoint P6: 4proxph_l (-0.00337033 -0.0443687 0.0008315)
      PathPoint P7: 4distph_l (0.000110867 -0.00731715 0.000731712)
      PathWrap: wrap_object=FDP_l method=hybrid
    Thelen2003Muscle FDPM_l: max_isometric_force=81.65 optimal_fiber_length=0.0849617 tendon_slack_length=0.2981291
        pennation_angle_at_optimal=0.1047198
      PathPoint P1: ulna_l (-0.00496718 -0.0316586 -0.0019983)
      PathPoint P2: radius_l (0.0181369 -0.177411 -0.00746981)
      PathPoint P3: capitate_l (0.00371402 -0.0141909 0.0126831)
      PathPoint P4: thirdmc_l (-0.00141909 0.00675175 0.00929058)
      PathPoint P5: thirdmc_l (0.000376944 -0.0260203 0.00335925)
      PathPoint P6: 3proxph_l (0.00113084 -0.0480383 -0.00325947)
      PathPoint P7: 3distph_l (0.000254989 -0.00559873 0.00250558)
      PathWrap: wrap_object=FDP_l method=hybrid
    Thelen2003Muscle FDPI_l: max_isometric_force=68.27 optimal_fiber_length=0.0761809 tendon_slack_length=0.2985193
        pennation_angle_at_optimal=0.1221731
      PathPoint P1: ulna_l (-0.00615664 -0.0302218 -0.0026644)
      PathPoint P2: radius_l (0.0197926 -0.176611 -0.00870685)
      PathPoint P3: capitate_l (0.00993365 -0.0129492 0.013437)
      PathPoint P4: secondmc_l (-0.00478942 0.00735042 0.00274948)
      PathPoint P5: secondmc_l (0.00465638 -0.0250779 0.00553223)
      PathPoint P6: 2proxph_l (0.00644132 -0.0394129 -0.0033925)
      PathPoint P7: 2distph_l (0.000509989 -0.00509984 0.00333707)
      PathWrap: wrap_object=FDP_l method=hybrid
      PathWrap: wrap_object=2ndmcp_l method=hybrid
    Thelen2003Muscle EDCL_l: max_isometric_force=13.11 optimal_fiber_length=0.06540142 tendon_slack_length=0.2983311
        pennation_angle_at_optimal=0.03490659
      PathPoint P1: humerus_l (-0.000355488 -0.256229 -0.0166192)
      PathPoint P2: EDCpt_l (0.00132556 -0.0396447 -0.0143263)
      PathPoint P3: radius_l (0.00944904 -0.212238 -0.0344277)
      PathPoint P4: fifthmc_l (-0.0052994 -0.0212309 -0.00495571)
      PathPoint P5: 5proxph_l (-0.00793802 -0.036608 0.000986715)
      PathPoint P6: 5distph_l (-0.0015743 0.00075389 -0.00127496)
      PathWrap: wrap_object=EDCL_l method=hybrid range=(3 4)
    Thelen2003Muscle EDCR_l: max_isometric_force=34.04 optimal_fiber_length=0.06316396 tendon_slack_length=0.3299459
        pennation_angle_at_optimal=0.05235988
      PathPoint P1: humerus_l (-0.00138641 -0.257162 -0.0158371)
      PathPoint P2: EDCpt_l (0.00265114 -0.0406948 -0.0158253)
      PathPoint P3: radius_l (0.00839283 -0.212828 -0.0407652)
      PathPoint P4: fourthmc_l (-0.00374728 -0.0258318 -0.00568744)
      PathPoint P5: 4proxph_l (-0.00605329 -0.042883 -0.00457877)
      PathPoint P6: 4distph_l (-0.00189581 -0.00415748 -0.00267188)
      PathWrap: wrap_object=EDCR_l method=hybrid
    Thelen2003Muscle EDCM_l: max_isometric_force=35.32 optimal_fiber_length=0.07337316 tendon_slack_length=0.3395029
        pennation_angle_at_optimal=0.05235988
      PathPoint P1: humerus_l (0.00045325 -0.257589 -0.0173213)
      PathPoint P2: EDCpt_l (0.00322214 -0.0402564 -0.0155805)
      PathPoint P3: radius_l (0.0137025 -0.212419 -0.0401848)
      PathPoint P4: thirdmc_l (0.00145235 -0.0259649 -0.00847017)
      PathPoint P5: 3proxph_l (0.0019845 -0.0469961 -0.0111199)
      PathPoint P6: 3distph_l (0.000853667 -0.0123173 -0.00222841)
      PathWrap: wrap_object=EDCM_l method=hybrid
    Thelen2003Muscle EDCI_l: max_isometric_force=18.26 optimal_fiber_length=0.07079446 tendon_slack_length=0.3256545
        pennation_angle_at_optimal=0.05235988
      PathPoint P1: humerus_l (0.00057767 -0.256825 -0.0166103)
      PathPoint P2: EDCpt_l (0.00232484 -0.0399506 -0.0151217)
      PathPoint P3: radius_l (0.0145876 -0.212333 -0.0399278)
      PathPoint P4: secondmc_l (0.00525506 -0.029446 -0.014335)
      PathPoint P5: 2proxph_l (0.00212863 -0.0122063 -0.0113194)
      PathPoint P6: 2proxph_l (0.00854778 -0.0464639 -0.0155102)
      PathPoint P7: 2midph_l (0.00136365 -0.0104324 -0.00644132)
      PathPoint P8: 2midph_l (0.00288253 -0.0217186 -0.00402443)
      PathPoint P9: 2distph_l (0.000277166 -0.00410205 -0.00252775)
      PathWrap: wrap_object=EDCI_l method=hybrid range=(3 4)
      PathWrap: wrap_object=Secondpm_l method=hybrid range=(6 7)
      PathWrap: wrap_object=Secondmd_l method=hybrid range=(8 9)
    Thelen2003Muscle EDM_l: max_isometric_force=25.25 optimal_fiber_length=0.06796513 tendon_slack_length=0.3242188
        pennation_angle_at_optimal=0.05235988
      PathPoint P1: humerus_l (0.000790965 -0.257011 -0.0164147)
      PathPoint P2: ulna_l (-0.00929682 -0.0371777 -0.0293559)
      PathPoint P3: ulna_l (-0.00718434 -0.0786662 -0.0346941)
      PathPoint P4: radius_l (0.00432011 -0.215445 -0.0349987)
      PathPoint P5: fifthmc_l (0.00145235 0.0270069 -0.00880277)
      PathPoint P6: fifthmc_l (-0.00595351 -0.0204881 -0.00350337)
      PathPoint P7: 5proxph_l (-0.00598677 -0.0358873 -0.0001663)
      PathPoint P8: 5distph_l (-0.00250558 -0.00370292 -0.000687367)
      PathWrap: wrap_object=EDM_l method=hybrid range=(4 5)
    Thelen2003Muscle EIP_l: max_isometric_force=21.7 optimal_fiber_length=0.0620909 tendon_slack_length=0.1960765
        pennation_angle_at_optimal=0.1047198
      PathPoint P1: ulna_l (-0.00374918 -0.158455 -0.0350367)
      PathPoint P2: ulna_l (0.00162718 -0.16623 -0.038529)
      PathPoint P3: radius_l (0.0102389 -0.216796 -0.0348655)
      PathPoint P4: secondmc_l (-0.0119846 0.0169404 -0.00754998)
      PathPoint P5: secondmc_l (0.0048892 -0.0288473 -0.0142463)
      PathPoint P6: 2proxph_l (0.00189581 -0.0114525 -0.0104989)
      PathPoint P7: 2proxph_l (0.00791584 -0.0458209 -0.0156654)
      PathPoint P8: 2midph_l (0.00127496 -0.00996689 -0.0066187)
      PathPoint P9: 2midph_l (0.00325947 -0.0226499 -0.00417966)
      PathPoint P10: 2distph_l (0.00292687 -0.0136698 -0.00294903)
      PathWrap: wrap_object=Extensor_ellipse_l method=hybrid
      PathWrap: wrap_object=Secondpm_l method=hybrid range=(7 8)
      PathWrap: wrap_object=Secondmd_l method=hybrid range=(9 10)
    Thelen2003Muscle EPL_l: max_isometric_force=39.46 optimal_fiber_length=0.05475324 tendon_slack_length=0.2235757
        pennation_angle_at_optimal=0.1047198
      PathPoint P1: ulna_l (-0.0134361 -0.0923592 -0.0280903)
      PathPoint P2: radius_l (0.00117994 -0.13006 -0.0216006)
      PathPoint P3: radius_l (0.0257114 -0.208127 -0.0364261)
      PathPoint P4: radius_l (0.0321821 -0.21652 -0.0438387)
      PathPoint P5: radius_l (0.0402894 -0.226198 -0.039709)
      PathPoint P6: capitate_l (0.0269183 0.000155211 -0.00674066)
      PathPoint P7: trapezium_l (0.00896907 -0.00509984 -0.0109978)
      PathPoint P8: firstmc_l (0.00727281 -0.00476724 -0.00878059)
      PathPoint P9: firstmc_l (0.0240026 -0.0268296 0.00590917)
      PathPoint P10: proximal_thumb_l (0.0127164 -0.00401336 -0.00172951)
      PathPoint P11: proximal_thumb_l (0.0212974 -0.0293796 0.011508)
      PathPoint P12: distal_thumb_l (0.00602002 -0.00791584 0.00514419)
      PathWrap: wrap_object=MPthumb_l method=hybrid
    Thelen2003Muscle EPB_l: max_isometric_force=14.2 optimal_fiber_length=0.06896858 tendon_slack_length=0.1180129
        pennation_angle_at_optimal=0.1256637
      PathPoint P1: radius_l (0.0183082 -0.139832 -0.0201162)
      PathPoint P2: radius_l (0.0216577 -0.15089 -0.0253593)
      PathPoint P3: radius_l (0.0364545 -0.187668 -0.0364831)
      PathPoint P4: radius_l (0.0498146 -0.224675 -0.0256828)
      PathPoint P5: capitate_l (0.0346235 0.00283817 0.00362532)
      PathPoint P6: firstmc1_l (0.0159981 -0.00373619 0.00449007)
      PathPoint P7: firstmc_l (0.0240912 -0.0255325 0.0126499)
      PathPoint P8: proximal_thumb_l (0.0102773 -0.00685152 0.00617524)
      PathWrap: wrap_object=MPthumb_l method=hybrid
    Thelen2003Muscle FPL_l: max_isometric_force=77.2 optimal_fiber_length=0.05643959 tendon_slack_length=0.198152
        pennation_angle_at_optimal=0.1221731
      PathPoint P1: radius_l (0.00923972 -0.0899993 -0.0168333)
      PathPoint P2: radius_l (0.0157769 -0.1287 -0.0182225)
      PathPoint P3: radius_l (0.0177848 -0.170636 -0.0189172)
      PathPoint P4: radius_l (0.0361596 -0.220487 -0.0150347)
      PathPoint P5: FPLpt_l (0.0190575 0.00899346 0.0157743)
      PathPoint P6: FPLpt2_l (0.0126847 -0.022504 0.0213009)
      PathPoint P7: firstmc_l (-0.00674066 -0.0180046 0.0104214)
      PathPoint P8: firstmc_l (0.00230601 -0.025466 0.0105988)
      PathPoint P9: proximal_thumb_l (-0.00498898 -0.0204216 0.005632)
      PathPoint P10: proximal_thumb_l (0.0065411 -0.0288473 0.0123505)
      PathPoint P11: distal_thumb_l (0.00268296 -0.0124946 0.00456768)
      PathWrap: wrap_object=FPL_l method=hybrid
      PathWrap: wrap_object=IPthumb_l method=hybrid
      PathWrap: wrap_object=MPthumb_l method=hybrid
    Thelen2003Muscle APL_l: max_isometric_force=59.53 optimal_fiber_length=0.06995055 tendon_slack_length=0.127049
        pennation_angle_at_optimal=0.1308997
      PathPoint P1: radius_l (0.0109811 -0.0901801 -0.0159958)
      PathPoint P2: radius_l (0.0288325 -0.132934 -0.0333714)
      PathPoint P3: radius_l (0.0379961 -0.152936 -0.0323532)
      PathPoint P4: radius_l (0.0418404 -0.169808 -0.0298222)
      PathPoint P5: radius_l (0.0523838 -0.219661 -0.0225331)
      PathPoint P6: APLpt_l (0.0345158 0.00646469 0.00759652)
      PathPoint P7: firstmc1_l (0.0117297 0.00733934 0.00686262)
      PathPoint P8: firstmc_l (0.00697348 0.00358098 0.00653001)
      PathPoint P9: firstmc_l (0.00916862 -0.00649675 0.00669631)
      PathWrap: wrap_object=APL_l method=hybrid range=(5 6)
    ObjectGroup R_hip_abd: members=(glut_max1_r glut_med1_r glut_med2_r glut_med3_r peri_r sar_r tfl_r)
    ObjectGroup R_hip_flex: members=(glut_med1_r grac_r iliacus_r pect_r psoas_r rect_fem_r sar_r tfl_r)
    ObjectGroup R_hip_inrot: members=(glut_med1_r iliacus_r psoas_r tfl_r)
    ObjectGroup R_hip_exrot: members=(gem_r glut_med3_r peri_r quad_fem_r)
    ObjectGroup R_hip_ext: members=(add_mag2_r bifemlh_r glut_max1_r glut_max2_r glut_max3_r glut_med3_r)
    ObjectGroup R_hip_add: members=(add_mag2_r bifemlh_r grac_r pect_r)
    ObjectGroup R_knee_bend: members=(bifemlh_r bifemsh_r grac_r med_gas_r sar_r)
    ObjectGroup R_knee_ext: members=(rect_fem_r vas_int_r)
    ObjectGroup R_ankle_pf: members=(med_gas_r soleus_r tib_post_r)
    ObjectGroup R_inverter: members=(tib_ant_r tib_post_r)
    ObjectGroup R_ankle_df: members=tib_ant_r
    ObjectGroup L_hip_abd: members=(glut_max1_l glut_med1_l glut_med2_l glut_med3_l peri_l sar_l tfl_l)
    ObjectGroup L_hip_flex: members=(glut_med1_l grac_l iliacus_l pect_l psoas_l rect_fem_l sar_l tfl_l)
    ObjectGroup L_hip_inrot: members=(glut_med1_l iliacus_l psoas_l tfl_l)
    ObjectGroup L_hip_exrot: members=(gem_l glut_med3_l peri_l quad_fem_l)
    ObjectGroup L_hip_ext: members=(add_mag2_l bifemlh_l glut_max1_l glut_max2_l glut_max3_l glut_med3_l)
    ObjectGroup L_hip_add: members=(add_mag2_l bifemlh_l grac_l pect_l)
    ObjectGroup L_knee_bend: members=(bifemlh_l bifemsh_l grac_l med_gas_l sar_l)
    ObjectGroup L_knee_ext: members=(rect_fem_l vas_int_l)
    ObjectGroup L_ankle_pf: members=(med_gas_l soleus_l tib_post_l)
    ObjectGroup L_inverter: members=(tib_ant_l tib_post_l)
    ObjectGroup L_ankle_df: members=tib_ant_l
    ObjectGroup back_ext: members=(ercspn_l ercspn_r)
    ObjectGroup back_rlb: members=(ercspn_r extobl_r intobl_r)
    ObjectGroup back_introt: members=(ercspn_r extobl_l intobl_r)
    ObjectGroup back_llb: members=(ercspn_l extobl_l intobl_l)
    ObjectGroup back_extrot: members=(ercspn_l extobl_r intobl_l)
    ObjectGroup back_flex: members=(extobl_l extobl_r intobl_l intobl_r)
    ObjectGroup shoulder: members=(CORB DELT1 DELT2 DELT3 INFSP LAT1 LAT2 LAT3 PECM1 PECM2 PECM3 SUBSC SUPSP TMAJ TMIN)
    ObjectGroup elbow: members=(ANC BIClong BICshort BRA BRD ECRL PT TRIlat TRIlong TRImed)
    ObjectGroup forearm: members=(APL ECRB ECU EDCI EDCL EDCM EDCR EDM EIP EPB EPL FCR FCU FDPI FDPL FDPM FDPR FDSI FDSL FDSM FDSR FPL PL PQ PT SUP)
    ObjectGroup extensor: members=(ECRB ECU EDCI EDCL EDCM EDCR EDM EIP EPL)
    ObjectGroup radial: members=(APL ECRB EDCI EDCM EIP EPB EPL FCR FDPI FDSI FDSM FPL PL)
    ObjectGroup wrist: members=(ECRB ECU FCR FCU)
    ObjectGroup ulnar: members=(ECU EDCL EDCR EDM FCU FDPL FDPM FDPR FDSL FDSR)
    ObjectGroup flexor: members=(APL EPB FCR FCU FDPI FDPL FDPM FDPR FDSI FDSL FDSM FDSR FPL PL)
    ObjectGroup hand: members=(APL EDCI EDCL EDCM EDCR EDM EIP EPB EPL FDPI FDPL FDPM FDPR FDSI FDSL FDSM FDSR FPL PL)
    ObjectGroup thumb: members=(APL EPB EPL FPL)
    ObjectGroup shoulder_l: members=(CORB_l DELT1_l DELT2_l DELT3_l INFSP_l LAT1_l LAT2_l LAT3_l PECM1_l PECM2_l PECM3_l SUBSC_l SUPSP_l TMAJ_l TMIN_l)
    ObjectGroup elbow_l: members=(ANC_l BIClong_l BICshort_l BRA_l BRD_l ECRL_l PT_l TRIlat_l TRIlong_l TRImed_l)
    ObjectGroup forearm_l: members=(APL_l ECRB_l ECU_l EDCI_l EDCL_l EDCM_l EDCR_l EDM_l EIP_l EPB_l EPL_l FCR_l FCU_l FDPI_l FDPL_l FDPM_l FDPR_l FDSI_l FDSL_l FDSM_l FDSR_l FPL_l PL_l PQ_l PT_l SUP_l)
    ObjectGroup extensor_l: members=(ECRB_l ECU_l EDCI_l EDCL_l EDCM_l EDCR_l EDM_l EIP_l EPL_l)
    ObjectGroup radial_l: members=(APL_l ECRB_l EDCI_l EDCM_l EIP_l EPB_l EPL_l FCR_l FDPI_l FDSI_l FDSM_l FPL_l PL_l)
    ObjectGroup wrist_l: members=(ECRB_l ECU_l FCR_l FCU_l)
    ObjectGroup ulnar_l: members=(ECU_l EDCL_l EDCR_l EDM_l FCU_l FDPL_l FDPM_l FDPR_l FDSL_l FDSR_l)
    ObjectGroup flexor_l: members=(APL_l EPB_l FCR_l FCU_l FDPI_l FDPL_l FDPM_l FDPR_l FDSI_l FDSL_l FDSM_l FDSR_l FPL_l PL_l)
    ObjectGroup hand_l: members=(APL_l EDCI_l EDCL_l EDCM_l EDCR_l EDM_l EIP_l EPB_l EPL_l FDPI_l FDPL_l FDPM_l FDPR_l FDSI_l FDSL_l FDSM_l FDSR_l FPL_l PL_l)
    ObjectGroup thumb_l: members=(APL_l EPB_l EPL_l FPL_l)
  MarkerSet:
    Marker wrist_r_i: lunate (-0.0459313 -0.0059895 -0.00376534)
    Marker wrist_r_o: radius (0.0664411 -0.229858 0.0222061)
    Marker hand_r: 3proxph (-0.00315892 0.0125841 0.0254491)
    Marker elbow_r_o: humerus (0.01967 -0.249778 0.0346699)
    Marker elbow_r_i: humerus (-0.00244319 -0.253191 -0.0521277)
    Marker shoulder_r: scapula (-0.0101482 0.0100407 0.00132462)
    Marker shoulder_l: scapula_l (-0.0101483 0.0100406 -0.00132466)
